Tue 01/11/2022
06:17 PM
$PROBLEM PDLIDR
$INPUT ID AMT TIME DV EVID  CMT
$DATA PDLIDR.csv IGNORE=C
$SUBROUTINES ADVAN16 TOL=4
$MODEL NCOMPARTMENTS=3

$PK
MU_1=LOG(THETA(3))
MU_2=LOG(THETA(4))
MU_3=LOG(THETA(5))
MU_4=LOG(THETA(6))
MU_5=LOG(THETA(7))
MXSTEP=2000000000
KEL=THETA(1)
V=THETA(2)
K0=EXP(MU_1+ETA(1))
K1=EXP(MU_2+ETA(2))
SMAX=EXP(MU_3+ETA(3))
SC50=EXP(MU_4+ETA(4))
;  TAUy
TAU1=EXP(MU_5+ETA(5))
; Initial conditions
A_0(1)=0
A_0(2)=K0/K1
A_0(3)=K0*TAU1

$DES
; AD_x_y is the State value of A(x) delayed for time TAUy.
; AP_x_y is the State value of A(x) in the past, for time delay TAUy.
AP_2_1=K0/K1
;BASE EQUATIONS
CC=A(1)/V
DADT(1)=-KEL*A(1)
DADT(2)=K0*(1+SMAX*CC/(SC50+CC))-K1*A(2)
DADT(3)=K1*A(2)-K1*AD_2_1

$ERROR

Y1=LOG(A(3))
IF(CMT==3) IPRED=Y1
IF(CMT==3) Y=IPRED+EPS(1)

$THETA
0.25 FIX    ; 1: KEL
1    FIX    ; 2: V
(0,0.5,5)   ; 3: K0
(0,0.05,0.5); 4: K1
(0,50,500)  ; 5: SMAX
(0,1,10)    ; 6: SC50
(5,20,200)  ; 7: TR

$OMEGA BLOCK(5) VALUES(0.2,0.001)

$SIGMA
0.01
$EST METHOD=SAEM INTERACTION ISAMPLE=2 NBURN=200 NITER=200 PRINT=10 NOHABORT CTYPE=3 SIGL=3 RANMETHOD=3S2P
$EST METHOD=IMP INTERACTION MAPITER=0 NITER=200 ISAMPLE=300 CTYPE=3 PRINT=1
$COV UNCONDITIONAL MATRIX=R
$TABLE ID TIME IPRED EVID CMT NOPRINT ONEHEADER
FILE=PDLIDR.tab

NM-TRAN MESSAGES
 WARNINGS AND ERRORS (IF ANY) FOR PROBLEM    1
 (WARNING  2) NM-TRAN INFERS THAT THE DATA ARE POPULATION.
 (WARNING  3) THERE MAY BE AN ERROR IN THE ABBREVIATED CODE. THE FOLLOWING
 ONE OR MORE RANDOM VARIABLES ARE DEFINED WITH "IF" STATEMENTS THAT DO NOT
 PROVIDE DEFINITIONS FOR BOTH THE "THEN" AND "ELSE" CASES. IF ALL
 CONDITIONS FAIL, THE VALUES OF THESE VARIABLES WILL BE ZERO.
   IPRED Y
 (WARNING  83) FUNCTIONS ARE USED IN ABBREVIATED CODE, BUT THE $SUBROUTINES
 RECORD DOES NOT INCLUDE THE "OTHER" OPTION.

1NONLINEAR MIXED EFFECTS MODEL PROGRAM (NONMEM) VERSION 7.5.1
 ORIGINALLY DEVELOPED BY STUART BEAL, LEWIS SHEINER, AND ALISON BOECKMANN
 CURRENT DEVELOPERS ARE ROBERT BAUER, ICON DEVELOPMENT SOLUTIONS,
 AND ALISON BOECKMANN. IMPLEMENTATION, EFFICIENCY, AND STANDARDIZATION
 PERFORMED BY NOUS INFOSYSTEMS.
 PROBLEM NO.:         1
 PDLIDR
 TOT. NO. OF OBS RECS:     3125
 TOT. NO. OF INDIVIDUALS:      125
 GENERAL NONLINEAR KINETICS MODEL WITH STIFF/NONSTIFF AND DELAY EQUATIONS (RADAR5, ADVAN16)
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 #TBLN:      1
 #METH: Stochastic Approximation Expectation-Maximization
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
 #TERM:
 STOCHASTIC PORTION WAS NOT COMPLETED
 REDUCED STOCHASTIC PORTION WAS COMPLETED

 ETABAR IS THE ARITHMETIC MEAN OF THE ETA-ESTIMATES,
 AND THE P-VALUE IS GIVEN FOR THE NULL HYPOTHESIS THAT THE TRUE MEAN IS 0.

 ETABAR:        -2.3273E-06  2.0354E-05  7.6759E-07 -3.8333E-07  1.0044E-05
 SE:             2.1746E-03  1.4795E-02  3.9898E-03  6.9911E-03  1.9502E-02
 N:                     125         125         125         125         125

 P VAL.:         9.9915E-01  9.9890E-01  9.9985E-01  9.9996E-01  9.9959E-01

 ETASHRINKSD(%)  4.0977E+01  8.7375E+00  4.4420E+01  4.9983E+01  1.6248E+00
 ETASHRINKVR(%)  6.5163E+01  1.6712E+01  6.9109E+01  7.4983E+01  3.2233E+00
 EBVSHRINKSD(%)  4.0996E+01  8.7668E+00  4.4434E+01  4.9993E+01  1.6376E+00
 EBVSHRINKVR(%)  6.5185E+01  1.6765E+01  6.9124E+01  7.4993E+01  3.2483E+00
 RELATIVEINF(%)  1.9831E+00  7.1260E+01  8.7007E+00  1.5269E+01  1.0000E-10
 EPSSHRINKSD(%)  4.4417E+00
 EPSSHRINKVR(%)  8.6861E+00


 TOTAL DATA POINTS NORMALLY DISTRIBUTED (N):         3125
 N*LOG(2PI) CONSTANT TO OBJECTIVE FUNCTION:    5743.3658325292045
 OBJECTIVE FUNCTION VALUE WITHOUT CONSTANT:   -14248.615891917265
 OBJECTIVE FUNCTION VALUE WITH CONSTANT:      -8505.2500593880613
 REPORTED OBJECTIVE FUNCTION DOES NOT CONTAIN CONSTANT

 TOTAL EFFECTIVE ETAS (NIND*NETA):                           625
 NIND*NETA*LOG(2PI) CONSTANT TO OBJECTIVE FUNCTION:    1148.6731665058408
 OBJECTIVE FUNCTION VALUE WITHOUT CONSTANT:   -14248.615891917265
 OBJECTIVE FUNCTION VALUE WITH CONSTANT:      -13099.942725411423
 REPORTED OBJECTIVE FUNCTION DOES NOT CONTAIN CONSTANT


 #TERE:
 Elapsed estimation  time in seconds:  1052.33
 Elapsed covariance  time in seconds:     0.10

 ********************                STOCHASTIC APPROXIMATION EXPECTATION-MAXIMIZATION               ********************
 #OBJT:**************                        FINAL VALUE OF LIKELIHOOD FUNCTION                      ********************
 #OBJV:********************************************   -14248.616       **************************************************

 ********************                STOCHASTIC APPROXIMATION EXPECTATION-MAXIMIZATION               ********************
 ********************                             FINAL PARAMETER ESTIMATE                           ********************

 THETA - VECTOR OF FIXED EFFECTS PARAMETERS   *********
         TH 1      TH 2      TH 3      TH 4      TH 5      TH 6      TH 7
         2.50E-01  1.00E+00  4.92E-01  4.96E-02  5.12E+01  1.02E+00  1.99E+01

 OMEGA - COV MATRIX FOR RANDOM EFFECTS - ETAS  ********
         ETA1      ETA2      ETA3      ETA4      ETA5
 ETA1
+        1.70E-03
 ETA2
+        2.72E-04  3.29E-02
 ETA3
+       -3.21E-03 -2.02E-04  6.44E-03
 ETA4
+       -4.69E-03  4.30E-03  8.77E-03  2.44E-02
 ETA5
+       -4.42E-03  1.57E-03  7.02E-03  1.40E-02  4.91E-02

 SIGMA - COV MATRIX FOR RANDOM EFFECTS - EPSILONS  ****
         EPS1
 EPS1
+        9.37E-03

 OMEGA - CORR MATRIX FOR RANDOM EFFECTS - ETAS  *******
         ETA1      ETA2      ETA3      ETA4      ETA5
 ETA1
+        4.12E-02
 ETA2
+        3.64E-02  1.81E-01
 ETA3
+       -9.72E-01 -1.39E-02  8.03E-02
 ETA4
+       -7.28E-01  1.52E-01  6.99E-01  1.56E-01
 ETA5
+       -4.84E-01  3.91E-02  3.95E-01  4.04E-01  2.22E-01

 SIGMA - CORR MATRIX FOR RANDOM EFFECTS - EPSILONS  ***
         EPS1
 EPS1
+        9.68E-02

 ********************                STOCHASTIC APPROXIMATION EXPECTATION-MAXIMIZATION               ********************
 ********************                          STANDARD ERROR OF ESTIMATE (S)                        ********************

 THETA - VECTOR OF FIXED EFFECTS PARAMETERS   *********
         TH 1      TH 2      TH 3      TH 4      TH 5      TH 6      TH 7
         0.00E+00  0.00E+00  5.03E-03  9.98E-04  8.08E-01  3.67E-02  4.85E-01

 OMEGA - COV MATRIX FOR RANDOM EFFECTS - ETAS  ********
         ETA1      ETA2      ETA3      ETA4      ETA5
 ETA1
+        1.20E-03
 ETA2
+        1.93E-03  5.71E-03
 ETA3
+        2.04E-03  3.21E-03  3.72E-03
 ETA4
+        3.87E-03  8.41E-03  7.18E-03  1.74E-02
 ETA5
+        2.21E-03  5.58E-03  3.93E-03  1.00E-02  9.12E-03

 SIGMA - COV MATRIX FOR RANDOM EFFECTS - EPSILONS  ****
         EPS1
 EPS1
+        2.98E-04

 OMEGA - CORR MATRIX FOR RANDOM EFFECTS - ETAS  *******
         ETA1      ETA2      ETA3      ETA4      ETA5
 ETA1
+        1.46E-02
 ETA2
+        2.58E-01  1.58E-02
 ETA3
+        5.29E-02  2.21E-01  2.32E-02
 ETA4
+        2.71E-01  2.73E-01  2.76E-01  5.57E-02
 ETA5
+        2.13E-01  1.38E-01  1.88E-01  1.97E-01  2.06E-02

 SIGMA - CORR MATRIX FOR RANDOM EFFECTS - EPSILONS  ***
         EPS1
 EPS1
+        1.54E-03
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 #TBLN:      2
 #METH: Importance Sampling
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
 #TERM:
 OPTIMIZATION WAS COMPLETED

 ETABAR IS THE ARITHMETIC MEAN OF THE ETA-ESTIMATES,
 AND THE P-VALUE IS GIVEN FOR THE NULL HYPOTHESIS THAT THE TRUE MEAN IS 0.

 ETABAR:        -5.6465E-06  2.9355E-06  3.7409E-06  9.1366E-05  1.2763E-05
 SE:             3.0327E-03  1.4713E-02  5.5233E-03  1.0218E-02  1.9768E-02
 N:                     125         125         125         125         125

 P VAL.:         9.9851E-01  9.9984E-01  9.9946E-01  9.9287E-01  9.9948E-01

 ETASHRINKSD(%)  4.0373E+01  9.4505E+00  4.2296E+01  4.4950E+01  2.1010E+00
 ETASHRINKVR(%)  6.4446E+01  1.8008E+01  6.6703E+01  6.9695E+01  4.1579E+00
 EBVSHRINKSD(%)  4.0291E+01  9.3474E+00  4.2195E+01  4.4902E+01  2.1210E+00
 EBVSHRINKVR(%)  6.4349E+01  1.7821E+01  6.6586E+01  6.9642E+01  4.1969E+00
 RELATIVEINF(%)  1.3481E+00  1.0000E+02  9.3534E+00  1.4165E+01  1.0000E-10
 EPSSHRINKSD(%)  4.6183E+00
 EPSSHRINKVR(%)  9.0233E+00


 TOTAL DATA POINTS NORMALLY DISTRIBUTED (N):         3125
 N*LOG(2PI) CONSTANT TO OBJECTIVE FUNCTION:    5743.3658325292045
 OBJECTIVE FUNCTION VALUE WITHOUT CONSTANT:   -10451.007550964636
 OBJECTIVE FUNCTION VALUE WITH CONSTANT:      -4707.6417184354314
 REPORTED OBJECTIVE FUNCTION DOES NOT CONTAIN CONSTANT

 TOTAL EFFECTIVE ETAS (NIND*NETA):                           625


 #TERE:
 Elapsed estimation  time in seconds:  3744.05

 Number of Negative Eigenvalues in Matrix=           2
 Most negative value=  -21014885.383107502
 Most positive value=   2565623.6772675412
 Forcing positive definiteness
 Root mean square deviation of matrix from original=    1.9769880540104174

 Elapsed covariance  time in seconds:    20.91

 ********************                               IMPORTANCE SAMPLING                              ********************
 #OBJT:**************                        FINAL VALUE OF OBJECTIVE FUNCTION                       ********************
 #OBJV:********************************************   -10451.008       **************************************************

 ********************                               IMPORTANCE SAMPLING                              ********************
 ********************                             FINAL PARAMETER ESTIMATE                           ********************

 THETA - VECTOR OF FIXED EFFECTS PARAMETERS   *********
         TH 1      TH 2      TH 3      TH 4      TH 5      TH 6      TH 7
         2.50E-01  1.00E+00  4.91E-01  4.98E-02  5.12E+01  1.03E+00  2.00E+01

 OMEGA - COV MATRIX FOR RANDOM EFFECTS - ETAS  ********
         ETA1      ETA2      ETA3      ETA4      ETA5
 ETA1
+        3.23E-03
 ETA2
+       -1.21E-04  3.30E-02
 ETA3
+       -5.99E-03 -3.76E-04  1.15E-02
 ETA4
+       -9.72E-03  3.27E-03  1.90E-02  4.31E-02
 ETA5
+       -5.76E-03  2.52E-03  9.15E-03  1.92E-02  5.10E-02

 SIGMA - COV MATRIX FOR RANDOM EFFECTS - EPSILONS  ****
         EPS1
 EPS1
+        9.32E-03

 OMEGA - CORR MATRIX FOR RANDOM EFFECTS - ETAS  *******
         ETA1      ETA2      ETA3      ETA4      ETA5
 ETA1
+        5.69E-02
 ETA2
+       -1.18E-02  1.82E-01
 ETA3
+       -9.85E-01 -1.93E-02  1.07E-01
 ETA4
+       -8.23E-01  8.67E-02  8.53E-01  2.08E-01
 ETA5
+       -4.49E-01  6.14E-02  3.79E-01  4.10E-01  2.26E-01

 SIGMA - CORR MATRIX FOR RANDOM EFFECTS - EPSILONS  ***
         EPS1
 EPS1
+        9.65E-02

 ********************                               IMPORTANCE SAMPLING                              ********************
 ********************                          STANDARD ERROR OF ESTIMATE (R)                        ********************

 THETA - VECTOR OF FIXED EFFECTS PARAMETERS   *********
         TH 1      TH 2      TH 3      TH 4      TH 5      TH 6      TH 7
         0.00E+00  0.00E+00  5.49E-03  9.26E-04  9.07E-01  3.95E-02  4.44E-01

 OMEGA - COV MATRIX FOR RANDOM EFFECTS - ETAS  ********
         ETA1      ETA2      ETA3      ETA4      ETA5
 ETA1
+        1.95E-03
 ETA2
+        2.60E-03  5.34E-03
 ETA3
+        2.77E-03  3.43E-03  4.87E-03
 ETA4
+        5.05E-03  9.20E-03  9.21E-03  2.06E-02
 ETA5
+        2.65E-03  4.91E-03  4.62E-03  1.03E-02  7.25E-03

 SIGMA - COV MATRIX FOR RANDOM EFFECTS - EPSILONS  ****
         EPS1
 EPS1
+        2.54E-04

 OMEGA - CORR MATRIX FOR RANDOM EFFECTS - ETAS  *******
         ETA1      ETA2      ETA3      ETA4      ETA5
 ETA1
+        1.71E-02
 ETA2
+        2.51E-01  1.47E-02
 ETA3
+        6.93E-02  1.77E-01  2.28E-02
 ETA4
+        2.30E-01  2.32E-01  1.14E-01  4.95E-02
 ETA5
+        1.82E-01  1.17E-01  1.57E-01  1.65E-01  1.60E-02

 SIGMA - CORR MATRIX FOR RANDOM EFFECTS - EPSILONS  ***
         EPS1
 EPS1
+        1.32E-03
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 Elapsed postprocess time in seconds:     4.55
 Elapsed finaloutput time in seconds:     0.63
 #CPUT: Total CPU Time in Seconds,     4813.328
