Tue 12/07/2021
10:28 AM
;DDE
$SIZES MAXNRDS=2 PAST_SIZE=20000
$PROBLEM DDDE Model of Lymphocyte Trafficking
; turn off second derivative assessments, sometimes even 1st derivatives if only simulating
$ABBR DERIV2=NO DERIV2=NOCOMMON DERIV1=NO
$ABBR FUNCTION GAMMACDF(GCDF,4)
$INPUT ID AMT TIME DV EVID MDV
$DATA lympho.dat IGNORE=C
$SUBROUTINES ADVAN16 TOL=6 ATOL=6
$MODEL NCOMPARTMENTS=3

$PK
CALLFL=-2
MXSTEP=2000000000
AB0=THETA(1)
SHAZ0=THETA(2)
KOUT=THETA(3)
U1SHAZ0=THETA(4)
NU=THETA(5)
IMAX=THETA(6)
IC50=THETA(7)
CL=THETA(8)
VP=THETA(9)

U2=(1-U1SHAZ0)/SHAZ0
KIN=AB0*KOUT*U2*SHAZ0
GNU=EXP(GAMLN(NU))
QQ=(U1SHAZ0)**(1.0/NU)
BETA=U2*QQ/(1.0-QQ)

; Initial conditions
A_0(1)=0.0
A_0(2)=AB0
A_0(3)=KIN/U2
TEND=-LOG(0.0001)/U2 ; TEND is calculated to be when exp(-u2*t)<=0.001, so should be enough

$DES
DADT(1)=0.0
DADT(2)=0.0
DADT(3)=0.0
 CP=A(1)/VP
 EMAX=1.0-IMAX*CP/(IC50+CP)

ADC1=0.0
ADC2=0.0

;DOC1 30 TA CA GQ(U,0.0,TEND)
IUU=0.0 ; IUU=INTEGRATED U=U1+U2
DEN=GNU
;DOC2 30 TZ CZ GQ(U,0.0,TA)
TAU2=TA-TZ
IF(TAU2<0.0) TAU2=0.0
AP_1_2=0.0
CPD2=AD_1_2/VP
EMAX2=1.0-IMAX*CPD2/(IC50+CPD2)
U1TZ=BETA*((BETA*TZ)**(NU-1.0))*EXP(-BETA*TZ)
DEN=DEN-U1TZ
GCDF(1)=TZ
GCDF(2)=NU
GCDF(3)=BETA
DENZ=GNU-GAMMACDF(GCDF)
IUU=IUU+CZ*(EMAX2*U1TZ/DENZ+U2)
;ENDDOC2

GCDF(1)=TA
GCDF(2)=NU
GCDF(3)=BETA
DENZ2=GNU-GAMMACDF(GCDF)
U1=BETA*((BETA*TA)**(NU-1.0))*EXP(-BETA*TA)/DENZ2
SHAZ=EXP(-IUU)
TAU1=TA
AP_2_1=AB0
CPD=AD_2_1
ADC1=ADC1+CA*CPD*U1*SHAZ
ADC2=ADC2+CA*CPD*(U1*EMAX+U2)*SHAZ
;ENDDOC1

 DADT(1)=-CL*CP
 DADT(2)=KIN-KOUT*A(2)+KOUT*EMAX*ADC1
 DADT(3)=KOUT*A(2)-KOUT*ADC2

$ERROR
CC=A(1)/VP
Y1=1.0
IPRED=CC
A2=A(2)
A3=A(3)
Y=IPRED*(1.0+EPS(1))

$THETA
31.4
48.0
0.137
0.5
1.0
1.0
4.34
9471.0
70961.0


$OMEGA (0.0 fixed)x5
$SIGMA (0.0 fixed)

$SIML (122345) ONLYSIM SUBP=1
$TABLE TIME IPRED A2 A3 NOPRINT NOAPPEND FILE=lympho.tab ONEHEADER FORMAT=S1PE20.13

NM-TRAN MESSAGES
 WARNING: -prdefault OPTION IS OVER-RIDING USER SPECIFIED MAXNRDS VALUE OF 2 WITH 30
THEREFORE OVER-RIDING -prdefault
 WARNINGS AND ERRORS (IF ANY) FOR PROBLEM    1
 (WARNING  2) NM-TRAN INFERS THAT THE DATA ARE POPULATION.
 (WARNING  46) ETA VARIABLES ARE NOT USED, BUT DATA ARE POPULATION TYPE.
 (WARNING  83) FUNCTIONS ARE USED IN ABBREVIATED CODE, BUT THE $SUBROUTINES
 RECORD DOES NOT INCLUDE THE "OTHER" OPTION.

1NONLINEAR MIXED EFFECTS MODEL PROGRAM (NONMEM) VERSION 7.5.1
 ORIGINALLY DEVELOPED BY STUART BEAL, LEWIS SHEINER, AND ALISON BOECKMANN
 CURRENT DEVELOPERS ARE ROBERT BAUER, ICON DEVELOPMENT SOLUTIONS,
 AND ALISON BOECKMANN. IMPLEMENTATION, EFFICIENCY, AND STANDARDIZATION
 PERFORMED BY NOUS INFOSYSTEMS.
 PROBLEM NO.:         1
 DDDE Model of Lymphocyte Trafficking
 TOT. NO. OF OBS RECS:       20
 TOT. NO. OF INDIVIDUALS:        1
 GENERAL NONLINEAR KINETICS MODEL WITH STIFF/NONSTIFF AND DELAY EQUATIONS (RADAR5, ADVAN16)
 PROBLEM NO.:           1      SUBPROBLEM NO.:           1
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 SIMULATION STEP PERFORMED
 Elapsed simulation  time in seconds:     1.14
 Elapsed finaloutput time in seconds:     0.01
 #CPUT: Total CPU Time in Seconds,        1.203
