Mon 03/20/2023
07:09 PM
$PROBLEM Log Linear Model Visual Acuity
$INPUT C ID TIME DOSEQ MDV DV
$DATA ed50s_fit.dat ignore=@

$PRED
MU_1=LOG(THETA(1))
MU_2=LOG(THETA(2))
MU_3=LOG(THETA(3))
MU_4=LOG(THETA(4))

IF(MDV==1) THEN
DOSE=DOSEQ
ELSE
DOSE=DOSE
ENDIF

VA0=EXP(MU_1+ETA(1))
KK=EXP(MU_2+ETA(2))
BETA=EXP(MU_3+ETA(3))

ALPHALL=EXP(MU_4+ETA(4))

EE=ALPHALL*LOG(DOSE+1.0)

IPRED=VA0+(1.0-EXP(-KK*TIME))*(EE-BETA*VA0)
Y=IPRED + EPS(1)

$THETA
55.0     ;[VA0]
0.005    ;[KK]
0.2      ; [BETA]
3.5     ; ALPHALL]

$OMEGA 0.07 0.5 1.0 0.122
$SIGMA 28.0

$EST METHOD=1 INTERACTION MAXEVAL=999 PRINT=1 NOHABORT
$COV MATRIX=R PRINT=E UNCONDITIONAL

NM-TRAN MESSAGES
 WARNINGS AND ERRORS (IF ANY) FOR PROBLEM    1
 (WARNING  2) NM-TRAN INFERS THAT THE DATA ARE POPULATION.
Note: Analytical 2nd Derivatives are constructed in FSUBS but are never used.
      You may insert $ABBR DERIV2=NO after the first $PROB to save FSUBS construction and compilation time

1NONLINEAR MIXED EFFECTS MODEL PROGRAM (NONMEM) VERSION 7.5.2
 ORIGINALLY DEVELOPED BY STUART BEAL, LEWIS SHEINER, AND ALISON BOECKMANN
 CURRENT DEVELOPERS ARE ROBERT BAUER, ICON DEVELOPMENT SOLUTIONS,
 AND ALISON BOECKMANN. IMPLEMENTATION, EFFICIENCY, AND STANDARDIZATION
 PERFORMED BY NOUS INFOSYSTEMS.
 PROBLEM NO.:         1
 Log Linear Model Visual Acuity
 TOT. NO. OF OBS RECS:      900
 TOT. NO. OF INDIVIDUALS:      300
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 #TBLN:      1
 #METH: First Order Conditional Estimation with Interaction
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
 #TERM:
0MINIMIZATION SUCCESSFUL
 NO. OF FUNCTION EVALUATIONS USED:      204
 NO. OF SIG. DIGITS IN FINAL EST.:  3.6

 ETABAR IS THE ARITHMETIC MEAN OF THE ETA-ESTIMATES,
 AND THE P-VALUE IS GIVEN FOR THE NULL HYPOTHESIS THAT THE TRUE MEAN IS 0.

 ETABAR:         1.8838E-02  8.0355E-03  1.5333E-01  7.5215E-02
 SE:             1.5085E-02  6.9639E-03  3.2687E-02  1.7666E-02
 N:                     300         300         300         300

 P VAL.:         2.1173E-01  2.4855E-01  2.7249E-06  2.0676E-05

 ETASHRINKSD(%)  7.8667E+00  7.0458E+01  2.7088E+01  5.0545E+01
 ETASHRINKVR(%)  1.5115E+01  9.1273E+01  4.6838E+01  7.5542E+01
 EBVSHRINKSD(%)  6.3562E+00  7.0773E+01  2.6175E+01  5.0051E+01
 EBVSHRINKVR(%)  1.2308E+01  9.1458E+01  4.5499E+01  7.5051E+01
 RELATIVEINF(%)  8.6689E+01  8.3394E+00  3.7675E+01  1.7443E+01
 EPSSHRINKSD(%)  3.5993E+01
 EPSSHRINKVR(%)  5.9032E+01


 TOTAL DATA POINTS NORMALLY DISTRIBUTED (N):          900
 N*LOG(2PI) CONSTANT TO OBJECTIVE FUNCTION:    1654.08935976841
 OBJECTIVE FUNCTION VALUE WITHOUT CONSTANT:    5564.44291774665
 OBJECTIVE FUNCTION VALUE WITH CONSTANT:       7218.53227751506
 REPORTED OBJECTIVE FUNCTION DOES NOT CONTAIN CONSTANT

 TOTAL EFFECTIVE ETAS (NIND*NETA):                          1200


 #TERE:
 Elapsed estimation  time in seconds:     3.96
 Elapsed covariance  time in seconds:     2.88
 Elapsed postprocess time in seconds:     0.00

 ********************               FIRST ORDER CONDITIONAL ESTIMATION WITH INTERACTION              ********************
 #OBJT:**************                       MINIMUM VALUE OF OBJECTIVE FUNCTION                      ********************
 #OBJV:********************************************     5564.443       **************************************************

 ********************               FIRST ORDER CONDITIONAL ESTIMATION WITH INTERACTION              ********************
 ********************                             FINAL PARAMETER ESTIMATE                           ********************

 THETA - VECTOR OF FIXED EFFECTS PARAMETERS   *********
         TH 1      TH 2      TH 3      TH 4
         5.45E+01  5.65E-03  2.48E-01  2.97E+00

 OMEGA - COV MATRIX FOR RANDOM EFFECTS - ETAS  ********
         ETA1      ETA2      ETA3      ETA4
 ETA1
+        8.04E-02
 ETA2
+        0.00E+00  1.67E-01
 ETA3
+        0.00E+00  0.00E+00  6.03E-01
 ETA4
+        0.00E+00  0.00E+00  0.00E+00  3.83E-01

 SIGMA - COV MATRIX FOR RANDOM EFFECTS - EPSILONS  ****
         EPS1
 EPS1
+        3.46E+01

 OMEGA - CORR MATRIX FOR RANDOM EFFECTS - ETAS  *******
         ETA1      ETA2      ETA3      ETA4
 ETA1
+        2.84E-01
 ETA2
+        0.00E+00  4.08E-01
 ETA3
+        0.00E+00  0.00E+00  7.76E-01
 ETA4
+        0.00E+00  0.00E+00  0.00E+00  6.19E-01

 SIGMA - CORR MATRIX FOR RANDOM EFFECTS - EPSILONS  ***
         EPS1
 EPS1
+        5.88E+00

 ********************               FIRST ORDER CONDITIONAL ESTIMATION WITH INTERACTION              ********************
 ********************                            STANDARD ERROR OF ESTIMATE                          ********************

 THETA - VECTOR OF FIXED EFFECTS PARAMETERS   *********
         TH 1      TH 2      TH 3      TH 4
         9.65E-01  5.16E-04  2.18E-02  3.15E-01

 OMEGA - COV MATRIX FOR RANDOM EFFECTS - ETAS  ********
         ETA1      ETA2      ETA3      ETA4
 ETA1
+        7.67E-03
 ETA2
+       .........  8.74E-02
 ETA3
+       ......... .........  8.82E-02
 ETA4
+       ......... ......... .........  9.32E-02

 SIGMA - COV MATRIX FOR RANDOM EFFECTS - EPSILONS  ****
         EPS1
 EPS1
+        3.06E+00

 OMEGA - CORR MATRIX FOR RANDOM EFFECTS - ETAS  *******
         ETA1      ETA2      ETA3      ETA4
 ETA1
+        1.35E-02
 ETA2
+       .........  1.07E-01
 ETA3
+       ......... .........  5.68E-02
 ETA4
+       ......... ......... .........  7.53E-02

 SIGMA - CORR MATRIX FOR RANDOM EFFECTS - EPSILONS  ***
         EPS1
 EPS1
+        2.60E-01

 ********************               FIRST ORDER CONDITIONAL ESTIMATION WITH INTERACTION              ********************
 ********************                          COVARIANCE MATRIX OF ESTIMATE                         ********************

            TH 1      TH 2      TH 3      TH 4      OM11      OM12      OM13      OM14      OM22      OM23      OM24      OM33
             OM34      OM44      SG11
 TH 1
+        9.31E-01
 TH 2
+        1.14E-05  2.66E-07
 TH 3
+        2.09E-03 -1.72E-06  4.74E-04
 TH 4
+       -2.59E-04 -2.06E-05  4.34E-03  9.90E-02
 OM11
+       -6.65E-04  6.49E-08 -7.15E-06  2.25E-05  5.88E-05
 OM12
+       ......... ......... ......... ......... ......... .........
 OM13
+       ......... ......... ......... ......... ......... ......... .........
 OM14
+       ......... ......... ......... ......... ......... ......... ......... .........
 OM22
+       -2.06E-03 -9.26E-06  6.19E-05  1.32E-03  1.71E-05 ......... ......... .........  7.64E-03
 OM23
+       ......... ......... ......... ......... ......... ......... ......... ......... ......... .........
 OM24
+       ......... ......... ......... ......... ......... ......... ......... ......... ......... ......... .........
 OM33
+       -7.79E-03  4.03E-07 -1.07E-03 -9.65E-03  2.08E-05 ......... ......... .........  2.90E-04 ......... .........  7.78E-03
 OM34
+       ......... ......... ......... ......... ......... ......... ......... ......... ......... ......... ......... .........
         .........
 OM44
+       -4.34E-04  1.80E-06 -8.56E-04 -1.95E-02 -4.77E-06 ......... ......... ......... -1.83E-04 ......... .........  1.38E-03
         .........  8.69E-03
 SG11
+        9.47E-02  1.17E-04  2.77E-03 -5.59E-03 -2.77E-03 ......... ......... ......... -9.37E-02 ......... ......... -3.16E-02
         ......... -5.80E-03  9.39E+00

 ********************               FIRST ORDER CONDITIONAL ESTIMATION WITH INTERACTION              ********************
 ********************                          CORRELATION MATRIX OF ESTIMATE                        ********************

            TH 1      TH 2      TH 3      TH 4      OM11      OM12      OM13      OM14      OM22      OM23      OM24      OM33
             OM34      OM44      SG11
 TH 1
+        9.65E-01
 TH 2
+        2.28E-02  5.16E-04
 TH 3
+        9.95E-02 -1.53E-01  2.18E-02
 TH 4
+       -8.52E-04 -1.27E-01  6.33E-01  3.15E-01
 OM11
+       -8.99E-02  1.64E-02 -4.28E-02  9.32E-03  7.67E-03
 OM12
+       ......... ......... ......... ......... ......... .........
 OM13
+       ......... ......... ......... ......... ......... ......... .........
 OM14
+       ......... ......... ......... ......... ......... ......... ......... .........
 OM22
+       -2.44E-02 -2.05E-01  3.25E-02  4.80E-02  2.56E-02 ......... ......... .........  8.74E-02
 OM23
+       ......... ......... ......... ......... ......... ......... ......... ......... ......... .........
 OM24
+       ......... ......... ......... ......... ......... ......... ......... ......... ......... ......... .........
 OM33
+       -9.15E-02  8.84E-03 -5.55E-01 -3.48E-01  3.07E-02 ......... ......... .........  3.76E-02 ......... .........  8.82E-02
 OM34
+       ......... ......... ......... ......... ......... ......... ......... ......... ......... ......... ......... .........
         .........
 OM44
+       -4.83E-03  3.73E-02 -4.22E-01 -6.64E-01 -6.68E-03 ......... ......... ......... -2.24E-02 ......... .........  1.68E-01
         .........  9.32E-02
 SG11
+        3.20E-02  7.43E-02  4.16E-02 -5.80E-03 -1.18E-01 ......... ......... ......... -3.50E-01 ......... ......... -1.17E-01
         ......... -2.03E-02  3.06E+00
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
 ********************               FIRST ORDER CONDITIONAL ESTIMATION WITH INTERACTION              ********************
 ********************                      EIGENVALUES OF COR MATRIX OF ESTIMATE                     ********************

             1         2         3         4         5         6         7         8         9
         2.62E-01  3.66E-01  6.18E-01  8.28E-01  9.02E-01  9.70E-01  1.10E+00  1.49E+00  2.46E+00
 Elapsed finaloutput time in seconds:     0.02
 #CPUT: Total CPU Time in Seconds,        6.844
