Mon 01/04/2021
07:03 PM
$PROBLEM WARFARIN PK, not using design priors in data file
$INPUT ID TIME AMT RATE EVID MDV DV TSTRAT TMIN TMAX STRAT STRATF REPX
$DATA warfarin_desprior4.csv ignore=C

$SUBROUTINES ADVAN2 TRANS1

$PK
MU_1=LOG(THETA(1))
MU_2=LOG(THETA(2))
MU_3=LOG(THETA(3))
KA=EXP(MU_1+ETA(1))
K=EXP(MU_2+ETA(2))
V=EXP(MU_3+ETA(3))
S2=V
F1=1.0

$ERROR
IPRED=A(2)/V
Y=IPRED + IPRED*EPS(1)+EPS(2)

$THETA
2.0 ;[KA]
0.25  ;[K]
15.0  ;[V]

$OMEGA 1.0 0.25 0.1
$SIGMA 0.0225 0.25

$DESIGN GROUPSIZE=12.5 FIMTYPE=1 VARCROSS=1 APPROX=FO
        STRAT=STRAT STRATF=STRATF
$TABLE ID STRAT STRATF TIME TSTRAT TMIN TMAX EVID MDV IPRED NOAPPEND NOPRINT FILE=warfarin_desprior_opt4.tab

NM-TRAN MESSAGES
 WARNINGS AND ERRORS (IF ANY) FOR PROBLEM    1
 (WARNING  2) NM-TRAN INFERS THAT THE DATA ARE POPULATION.
Note: Analytical 2nd Derivatives are constructed in FSUBS but are never used.
      You may insert $ABBR DERIV2=NO after the first $PROB to save FSUBS construction and compilation time

1NONLINEAR MIXED EFFECTS MODEL PROGRAM (NONMEM) VERSION 7.5.1
 ORIGINALLY DEVELOPED BY STUART BEAL, LEWIS SHEINER, AND ALISON BOECKMANN
 CURRENT DEVELOPERS ARE ROBERT BAUER, ICON DEVELOPMENT SOLUTIONS,
 AND ALISON BOECKMANN. IMPLEMENTATION, EFFICIENCY, AND STANDARDIZATION
 PERFORMED BY NOUS INFOSYSTEMS.
 PROBLEM NO.:         1
 WARFARIN PK, not using design priors in data file
 TOT. NO. OF OBS RECS:       12
 TOT. NO. OF INDIVIDUALS:        4
 ONE COMPARTMENT MODEL WITH FIRST-ORDER ABSORPTION (ADVAN2)
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 #TBLN:      1
 #METH: First Order (Evaluation): D-OPTIMALITY
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
 #TERM:

 ETABAR IS THE ARITHMETIC MEAN OF THE ETA-ESTIMATES,
 AND THE P-VALUE IS GIVEN FOR THE NULL HYPOTHESIS THAT THE TRUE MEAN IS 0.

 ETABAR:         0.0000E+00  0.0000E+00  0.0000E+00
 SE:             0.0000E+00  0.0000E+00  0.0000E+00
 N:                       4           4           4

 P VAL.:         1.0000E+00  1.0000E+00  1.0000E+00

 ETASHRINKSD(%)  1.0000E+02  1.0000E+02  1.0000E+02
 ETASHRINKVR(%)  1.0000E+02  1.0000E+02  1.0000E+02
 EBVSHRINKSD(%)  2.3194E+01  2.6628E+01  3.1144E+01
 EBVSHRINKVR(%)  4.1008E+01  4.6165E+01  5.2588E+01
 RELATIVEINF(%)  4.2963E+01  3.9018E+01  2.9476E+01
 EPSSHRINKSD(%)  1.0000E+02  1.0000E+02
 EPSSHRINKVR(%)  1.0000E+02  1.0000E+02


 #TERE:
 Elapsed opt. design time in seconds:     0.02
 Elapsed postprocess time in seconds:     0.01

 ********************                      FIRST ORDER (EVALUATION): D-OPTIMALITY                    ********************
 #OBJT:**************                MINIMUM VALUE OF OBJECTIVE FUNCTION: D-OPTIMALITY               ********************
 #OBJV:********************************************      -36.130       **************************************************

 ********************                      FIRST ORDER (EVALUATION): D-OPTIMALITY                    ********************
 ********************                             FINAL PARAMETER ESTIMATE                           ********************

 THETA - VECTOR OF FIXED EFFECTS PARAMETERS   *********
         TH 1      TH 2      TH 3
         2.00E+00  2.50E-01  1.50E+01

 OMEGA - COV MATRIX FOR RANDOM EFFECTS - ETAS  ********
         ETA1      ETA2      ETA3
 ETA1
+        1.00E+00
 ETA2
+        0.00E+00  2.50E-01
 ETA3
+        0.00E+00  0.00E+00  1.00E-01

 SIGMA - COV MATRIX FOR RANDOM EFFECTS - EPSILONS  ****
         EPS1      EPS2
 EPS1
+        2.25E-02
 EPS2
+        0.00E+00  2.50E-01

 OMEGA - CORR MATRIX FOR RANDOM EFFECTS - ETAS  *******
         ETA1      ETA2      ETA3
 ETA1
+        1.00E+00
 ETA2
+        0.00E+00  5.00E-01
 ETA3
+        0.00E+00  0.00E+00  3.16E-01

 SIGMA - CORR MATRIX FOR RANDOM EFFECTS - EPSILONS  ***
         EPS1      EPS2
 EPS1
+        1.50E-01
 EPS2
+        0.00E+00  5.00E-01

 ********************                      FIRST ORDER (EVALUATION): D-OPTIMALITY                    ********************
 ********************                            STANDARD ERROR OF ESTIMATE                          ********************

 THETA - VECTOR OF FIXED EFFECTS PARAMETERS   *********
         TH 1      TH 2      TH 3
         4.12E-01  2.86E-02  1.19E+00

 OMEGA - COV MATRIX FOR RANDOM EFFECTS - ETAS  ********
         ETA1      ETA2      ETA3
 ETA1
+        3.04E-01
 ETA2
+       .........  9.22E-02
 ETA3
+       ......... .........  4.35E-02

 SIGMA - COV MATRIX FOR RANDOM EFFECTS - EPSILONS  ****
         EPS1      EPS2
 EPS1
+        1.57E-02
 EPS2
+       .........  1.10E-01

 OMEGA - CORR MATRIX FOR RANDOM EFFECTS - ETAS  *******
         ETA1      ETA2      ETA3
 ETA1
+        1.52E-01
 ETA2
+       .........  9.22E-02
 ETA3
+       ......... .........  6.88E-02

 SIGMA - CORR MATRIX FOR RANDOM EFFECTS - EPSILONS  ***
         EPS1      EPS2
 EPS1
+        5.24E-02
 EPS2
+       .........  1.10E-01

 ********************                      FIRST ORDER (EVALUATION): D-OPTIMALITY                    ********************
 ********************                          COVARIANCE MATRIX OF ESTIMATE                         ********************

     TH 1 | TH 1      TH 2 | TH 1      TH 2 | TH 2      TH 3 | TH 1      TH 3 | TH 2      TH 3 | TH 3    OM11 | TH 1
     1.70E-01        -4.01E-03         8.15E-04         2.33E-01        -1.69E-02         1.42E+00         0.00E+00
   OM11 | TH 2      OM11 | TH 3      OM11 | OM11      OM22 | TH 1      OM22 | TH 2      OM22 | TH 3      OM22 | OM11
     0.00E+00         0.00E+00         9.22E-02         0.00E+00         0.00E+00         0.00E+00         5.86E-04
   OM22 | OM22      OM33 | TH 1      OM33 | TH 2      OM33 | TH 3      OM33 | OM11      OM33 | OM22      OM33 | OM33
     8.51E-03         0.00E+00         0.00E+00         0.00E+00        -8.07E-04        -5.35E-04         1.89E-03
   SG11 | TH 1      SG11 | TH 2      SG11 | TH 3      SG11 | OM11      SG11 | OM22      SG11 | OM33      SG11 | SG11
     0.00E+00         0.00E+00         0.00E+00        -5.28E-04         1.68E-04        -2.51E-04         2.48E-04
   SG22 | TH 1      SG22 | TH 2      SG22 | TH 3      SG22 | OM11      SG22 | OM22      SG22 | OM33      SG22 | SG11
     0.00E+00         0.00E+00         0.00E+00        -5.27E-04        -2.83E-03         7.05E-04        -1.15E-03
   SG22 | SG22
     1.22E-02

 ********************                      FIRST ORDER (EVALUATION): D-OPTIMALITY                    ********************
 ********************                          CORRELATION MATRIX OF ESTIMATE                        ********************

     TH 1 | TH 1      TH 2 | TH 1      TH 2 | TH 2      TH 3 | TH 1      TH 3 | TH 2      TH 3 | TH 3    OM11 | TH 1
     4.12E-01        -3.40E-01         2.86E-02         4.75E-01        -4.96E-01         1.19E+00         0.00E+00
   OM11 | TH 2      OM11 | TH 3      OM11 | OM11      OM22 | TH 1      OM22 | TH 2      OM22 | TH 3      OM22 | OM11
     0.00E+00         0.00E+00         3.04E-01         0.00E+00         0.00E+00         0.00E+00         2.09E-02
   OM22 | OM22      OM33 | TH 1      OM33 | TH 2      OM33 | TH 3      OM33 | OM11      OM33 | OM22      OM33 | OM33
     9.22E-02         0.00E+00         0.00E+00         0.00E+00        -6.11E-02        -1.33E-01         4.35E-02
   SG11 | TH 1      SG11 | TH 2      SG11 | TH 3      SG11 | OM11      SG11 | OM22      SG11 | OM33      SG11 | SG11
     0.00E+00         0.00E+00         0.00E+00        -1.11E-01         1.16E-01        -3.66E-01         1.57E-02
   SG22 | TH 1      SG22 | TH 2      SG22 | TH 3      SG22 | OM11      SG22 | OM22      SG22 | OM33      SG22 | SG11
     0.00E+00         0.00E+00         0.00E+00        -1.57E-02        -2.78E-01         1.47E-01        -6.65E-01
   SG22 | SG22
     1.10E-01
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 Elapsed finaloutput time in seconds:     0.02
 #CPUT: Total CPU Time in Seconds,        0.125
