Thu 01/07/2021
12:36 AM
$PROBLEM WARFARIN
$INPUT ID TIME AMT RATE EVID MDV DV TSTRAT TMIN TMAX
$DATA warfarin_pfim2.csv ignore=C

$SUBROUTINES ADVAN2 TRANS2

$PK
MU_1=LOG(THETA(1))
MU_2=LOG(THETA(2))
MU_3=LOG(THETA(3))
;MU_4=LOG(THETA(4))
CL=EXP(MU_1+ETA(1))
V=EXP(MU_2+ETA(2))
KA=EXP(MU_3+ETA(3))
gamma=THETA(4)
S2=V
F1=1.0

$ERROR
IPRED=A(2)/V
Y=IPRED + (IPRED**gamma)*EPS(1)

$THETA
0.15 ;[CL]
8.0  ;[V]
1.0  ;[KA]
1.0 ;[gamma]

$OMEGA (0.07) (0.02) (0.6)
$SIGMA 0.01

$DESIGN GROUPSIZE=32 FIMTYPE=1 VARCROSS=1 APPROX=FO
$EST GRD=TS(4) SIGL=10

NM-TRAN MESSAGES
 WARNINGS AND ERRORS (IF ANY) FOR PROBLEM    1
 (WARNING  2) NM-TRAN INFERS THAT THE DATA ARE POPULATION.
 (WARNING  97) A RANDOM QUANTITY IS RAISED TO A POWER. IF THE RESULT AFFECTS
 THE VALUE OF THE OBJECTIVE FUNCTION, THE USER SHOULD ENSURE THAT THE
 RANDOM QUANTITY IS NEVER 0 WHEN THE POWER IS < 1.
Note: Analytical 2nd Derivatives are constructed in FSUBS but are never used.
      You may insert $ABBR DERIV2=NO after the first $PROB to save FSUBS construction and compilation time

1NONLINEAR MIXED EFFECTS MODEL PROGRAM (NONMEM) VERSION 7.5.1
 ORIGINALLY DEVELOPED BY STUART BEAL, LEWIS SHEINER, AND ALISON BOECKMANN
 CURRENT DEVELOPERS ARE ROBERT BAUER, ICON DEVELOPMENT SOLUTIONS,
 AND ALISON BOECKMANN. IMPLEMENTATION, EFFICIENCY, AND STANDARDIZATION
 PERFORMED BY NOUS INFOSYSTEMS.
 PROBLEM NO.:         1
 WARFARIN
 TOT. NO. OF OBS RECS:        8
 TOT. NO. OF INDIVIDUALS:        1
 ONE COMPARTMENT MODEL WITH FIRST-ORDER ABSORPTION (ADVAN2)
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 #TBLN:      1
 #METH: First Order (Evaluation): D-OPTIMALITY
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
 #TERM:

 ETABAR IS THE ARITHMETIC MEAN OF THE ETA-ESTIMATES,
 AND THE P-VALUE IS GIVEN FOR THE NULL HYPOTHESIS THAT THE TRUE MEAN IS 0.

 ETABAR:         0.0000E+00  0.0000E+00  0.0000E+00
 SE:             0.0000E+00  0.0000E+00  0.0000E+00
 N:                       1           1           1

 P VAL.:         1.0000E+00  1.0000E+00  1.0000E+00

 ETASHRINKSD(%)  1.0000E+02  1.0000E+02  1.0000E+02
 ETASHRINKVR(%)  1.0000E+02  1.0000E+02  1.0000E+02
 EBVSHRINKSD(%)  1.2059E+00  8.9505E+00  1.4889E+00
 EBVSHRINKVR(%)  2.3973E+00  1.7100E+01  2.9557E+00
 RELATIVEINF(%)  9.7483E+01  8.2560E+01  9.6748E+01
 EPSSHRINKSD(%)  2.0943E+01
 EPSSHRINKVR(%)  3.7500E+01


 #TERE:
 Elapsed opt. design time in seconds:     0.02
 Elapsed postprocess time in seconds:     0.00

 ********************                      FIRST ORDER (EVALUATION): D-OPTIMALITY                    ********************
 #OBJT:**************                MINIMUM VALUE OF OBJECTIVE FUNCTION: D-OPTIMALITY               ********************
 #OBJV:********************************************      -56.669       **************************************************

 ********************                      FIRST ORDER (EVALUATION): D-OPTIMALITY                    ********************
 ********************                             FINAL PARAMETER ESTIMATE                           ********************

 THETA - VECTOR OF FIXED EFFECTS PARAMETERS   *********
         TH 1      TH 2      TH 3      TH 4
         1.50E-01  8.00E+00  1.00E+00  1.00E+00

 OMEGA - COV MATRIX FOR RANDOM EFFECTS - ETAS  ********
         ETA1      ETA2      ETA3
 ETA1
+        7.00E-02
 ETA2
+        0.00E+00  2.00E-02
 ETA3
+        0.00E+00  0.00E+00  6.00E-01

 SIGMA - COV MATRIX FOR RANDOM EFFECTS - EPSILONS  ****
         EPS1
 EPS1
+        1.00E-02

 OMEGA - CORR MATRIX FOR RANDOM EFFECTS - ETAS  *******
         ETA1      ETA2      ETA3
 ETA1
+        2.65E-01
 ETA2
+        0.00E+00  1.41E-01
 ETA3
+        0.00E+00  0.00E+00  7.75E-01

 SIGMA - CORR MATRIX FOR RANDOM EFFECTS - EPSILONS  ***
         EPS1
 EPS1
+        1.00E-01

 ********************                      FIRST ORDER (EVALUATION): D-OPTIMALITY                    ********************
 ********************                            STANDARD ERROR OF ESTIMATE                          ********************

 THETA - VECTOR OF FIXED EFFECTS PARAMETERS   *********
         TH 1      TH 2      TH 3      TH 4
         7.11E-03  2.20E-01  1.39E-01  1.21E-01

 OMEGA - COV MATRIX FOR RANDOM EFFECTS - ETAS  ********
         ETA1      ETA2      ETA3
 ETA1
+        1.79E-02
 ETA2
+       .........  6.07E-03
 ETA3
+       ......... .........  1.55E-01

 SIGMA - COV MATRIX FOR RANDOM EFFECTS - EPSILONS  ****
         EPS1
 EPS1
+        3.85E-03

 OMEGA - CORR MATRIX FOR RANDOM EFFECTS - ETAS  *******
         ETA1      ETA2      ETA3
 ETA1
+        3.39E-02
 ETA2
+       .........  2.15E-02
 ETA3
+       ......... .........  9.98E-02

 SIGMA - CORR MATRIX FOR RANDOM EFFECTS - EPSILONS  ***
         EPS1
 EPS1
+        1.92E-02

 ********************                      FIRST ORDER (EVALUATION): D-OPTIMALITY                    ********************
 ********************                          COVARIANCE MATRIX OF ESTIMATE                         ********************

     TH 1 | TH 1      TH 2 | TH 1      TH 2 | TH 2      TH 3 | TH 1      TH 3 | TH 2      TH 3 | TH 3      TH 4 | TH 1
     5.05E-05         5.43E-05         4.86E-02         1.03E-05         1.71E-03         1.94E-02         0.00E+00
     TH 4 | TH 2      TH 4 | TH 3      TH 4 | TH 4    OM11 | TH 1      OM11 | TH 2      OM11 | TH 3      OM11 | TH 4
     0.00E+00         0.00E+00         1.47E-02         0.00E+00         0.00E+00         0.00E+00         3.25E-05
   OM11 | OM11      OM22 | TH 1      OM22 | TH 2      OM22 | TH 3      OM22 | TH 4      OM22 | OM11      OM22 | OM22
     3.22E-04         0.00E+00         0.00E+00         0.00E+00        -1.88E-05        -8.28E-08         3.69E-05
   OM33 | TH 1      OM33 | TH 2      OM33 | TH 3      OM33 | TH 4      OM33 | OM11      OM33 | OM22      OM33 | OM33
     0.00E+00         0.00E+00         0.00E+00         2.85E-05         2.18E-07        -2.04E-06         2.39E-02
   SG11 | TH 1      SG11 | TH 2      SG11 | TH 3      SG11 | TH 4      SG11 | OM11      SG11 | OM22      SG11 | OM33
     0.00E+00         0.00E+00         0.00E+00        -4.46E-04        -1.19E-06         6.03E-08        -2.95E-06
   SG11 | SG11
     1.48E-05

 ********************                      FIRST ORDER (EVALUATION): D-OPTIMALITY                    ********************
 ********************                          CORRELATION MATRIX OF ESTIMATE                        ********************

     TH 1 | TH 1      TH 2 | TH 1      TH 2 | TH 2      TH 3 | TH 1      TH 3 | TH 2      TH 3 | TH 3      TH 4 | TH 1
     7.11E-03         3.47E-02         2.20E-01         1.04E-02         5.56E-02         1.39E-01         0.00E+00
     TH 4 | TH 2      TH 4 | TH 3      TH 4 | TH 4    OM11 | TH 1      OM11 | TH 2      OM11 | TH 3      OM11 | TH 4
     0.00E+00         0.00E+00         1.21E-01         0.00E+00         0.00E+00         0.00E+00         1.49E-02
   OM11 | OM11      OM22 | TH 1      OM22 | TH 2      OM22 | TH 3      OM22 | TH 4      OM22 | OM11      OM22 | OM22
     1.79E-02         0.00E+00         0.00E+00         0.00E+00        -2.56E-02        -7.60E-04         6.07E-03
   OM33 | TH 1      OM33 | TH 2      OM33 | TH 3      OM33 | TH 4      OM33 | OM11      OM33 | OM22      OM33 | OM33
     0.00E+00         0.00E+00         0.00E+00         1.52E-03         7.86E-05        -2.18E-03         1.55E-01
   SG11 | TH 1      SG11 | TH 2      SG11 | TH 3      SG11 | TH 4      SG11 | OM11      SG11 | OM22      SG11 | OM33
     0.00E+00         0.00E+00         0.00E+00        -9.57E-01        -1.73E-02         2.58E-03        -4.95E-03
   SG11 | SG11
     3.85E-03
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 Elapsed finaloutput time in seconds:     0.02
 #CPUT: Total CPU Time in Seconds,        0.141
