Wed 01/06/2021
04:42 PM
$PROBLEM WARFARIN, EVALUATION
$INPUT ID TIME AMT RATE EVID MDV DV TSTRAT TMIN TMAX
$DATA warfarin_pfim2.csv ignore=@ REPL=32

$SUBROUTINES ADVAN2 TRANS2

$PK
MU_1=LOG(THETA(1))
MU_2=LOG(THETA(2))
MU_3=LOG(THETA(3))
gamma=THETA(4)
CL=EXP(MU_1+ETA(1))
V=EXP(MU_2+ETA(2))
KA=EXP(MU_3+ETA(3))
S2=V
F1=1.0

$ERROR
IPRED=A(2)/V
Y=IPRED + (IPRED**gamma)*EPS(1)

$THETA
0.15 ;[CL]
8.0  ;[V]
1.0  ;[KA]
1.0 ;[gamma]

$OMEGA (0.07) (0.02) (0.6)
$SIGMA 0.01

;$DESIGN GROUPSIZE=32 FIMTYPE=1 VARCROSS=1 APPROX=FO

$SIML (11232456) SUBP=1
$EST METHOD=1 INTERACTION NOHABORT MAXEVAL=0 PRINT=1 NSIG=3
$COV UNCONDITIONAL MATRIX=R

NM-TRAN MESSAGES
 WARNINGS AND ERRORS (IF ANY) FOR PROBLEM    1
 (WARNING  2) NM-TRAN INFERS THAT THE DATA ARE POPULATION.
 (WARNING  97) A RANDOM QUANTITY IS RAISED TO A POWER. IF THE RESULT AFFECTS
 THE VALUE OF THE OBJECTIVE FUNCTION, THE USER SHOULD ENSURE THAT THE
 RANDOM QUANTITY IS NEVER 0 WHEN THE POWER IS < 1.
Note: Analytical 2nd Derivatives are constructed in FSUBS but are never used.
      You may insert $ABBR DERIV2=NO after the first $PROB to save FSUBS construction and compilation time

1NONLINEAR MIXED EFFECTS MODEL PROGRAM (NONMEM) VERSION 7.5.1
 ORIGINALLY DEVELOPED BY STUART BEAL, LEWIS SHEINER, AND ALISON BOECKMANN
 CURRENT DEVELOPERS ARE ROBERT BAUER, ICON DEVELOPMENT SOLUTIONS,
 AND ALISON BOECKMANN. IMPLEMENTATION, EFFICIENCY, AND STANDARDIZATION
 PERFORMED BY NOUS INFOSYSTEMS.
 PROBLEM NO.:         1
 WARFARIN, EVALUATION
 TOT. NO. OF DATA RECS:       288
 TOT. NO. OF OBS RECS:      256
 TOT. NO. OF INDIVIDUALS:       32
 ONE COMPARTMENT MODEL WITH FIRST-ORDER ABSORPTION (ADVAN2)
 PROBLEM NO.:           1      SUBPROBLEM NO.:           1
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 SIMULATION STEP PERFORMED
 Elapsed simulation  time in seconds:     0.01
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 Elapsed evaluation time in seconds:     0.03
 Elapsed covariance  time in seconds:     1.24
 Elapsed postprocess time in seconds:     0.00

 ********************         FIRST ORDER CONDITIONAL ESTIMATION WITH INTERACTION (EVALUATION)       ********************
 #OBJT:**************                       MINIMUM VALUE OF OBJECTIVE FUNCTION                      ********************
 #OBJV:********************************************       18.800       **************************************************

 ********************         FIRST ORDER CONDITIONAL ESTIMATION WITH INTERACTION (EVALUATION)       ********************
 ********************                             FINAL PARAMETER ESTIMATE                           ********************

 THETA - VECTOR OF FIXED EFFECTS PARAMETERS   *********
         TH 1      TH 2      TH 3      TH 4
         1.50E-01  8.00E+00  1.00E+00  1.00E+00

 OMEGA - COV MATRIX FOR RANDOM EFFECTS - ETAS  ********
         ETA1      ETA2      ETA3
 ETA1
+        7.00E-02
 ETA2
+        0.00E+00  2.00E-02
 ETA3
+        0.00E+00  0.00E+00  6.00E-01

 SIGMA - COV MATRIX FOR RANDOM EFFECTS - EPSILONS  ****
         EPS1
 EPS1
+        1.00E-02

 OMEGA - CORR MATRIX FOR RANDOM EFFECTS - ETAS  *******
         ETA1      ETA2      ETA3
 ETA1
+        2.65E-01
 ETA2
+        0.00E+00  1.41E-01
 ETA3
+        0.00E+00  0.00E+00  7.75E-01

 SIGMA - CORR MATRIX FOR RANDOM EFFECTS - EPSILONS  ***
         EPS1
 EPS1
+        1.00E-01

 ********************         FIRST ORDER CONDITIONAL ESTIMATION WITH INTERACTION (EVALUATION)       ********************
 ********************                            STANDARD ERROR OF ESTIMATE                          ********************

 THETA - VECTOR OF FIXED EFFECTS PARAMETERS   *********
         TH 1      TH 2      TH 3      TH 4
         7.52E-03  2.22E-01  1.37E-01  8.47E-02

 OMEGA - COV MATRIX FOR RANDOM EFFECTS - ETAS  ********
         ETA1      ETA2      ETA3
 ETA1
+        2.10E-02
 ETA2
+       .........  6.42E-03
 ETA3
+       ......... .........  1.79E-01

 SIGMA - COV MATRIX FOR RANDOM EFFECTS - EPSILONS  ****
         EPS1
 EPS1
+        2.65E-03

 OMEGA - CORR MATRIX FOR RANDOM EFFECTS - ETAS  *******
         ETA1      ETA2      ETA3
 ETA1
+        3.96E-02
 ETA2
+       .........  2.27E-02
 ETA3
+       ......... .........  1.15E-01

 SIGMA - CORR MATRIX FOR RANDOM EFFECTS - EPSILONS  ***
         EPS1
 EPS1
+        1.32E-02

 ********************         FIRST ORDER CONDITIONAL ESTIMATION WITH INTERACTION (EVALUATION)       ********************
 ********************                          COVARIANCE MATRIX OF ESTIMATE                         ********************

            TH 1      TH 2      TH 3      TH 4      OM11      OM12      OM13      OM22      OM23      OM33      SG11
 TH 1
+        5.66E-05
 TH 2
+        3.86E-05  4.95E-02
 TH 3
+        6.49E-06  1.60E-03  1.89E-02
 TH 4
+       -7.53E-06  8.13E-04  4.91E-06  7.18E-03
 OM11
+       -6.49E-05  9.42E-05  1.96E-05  3.00E-05  4.40E-04
 OM12
+       ......... ......... ......... ......... ......... .........
 OM13
+       ......... ......... ......... ......... ......... ......... .........
 OM22
+       -3.89E-07 -2.85E-04  5.01E-06  8.92E-06 -1.71E-07 ......... .........  4.13E-05
 OM23
+       ......... ......... ......... ......... ......... ......... ......... ......... .........
 OM33
+        2.14E-07  1.07E-04 -7.55E-04 -7.22E-04  2.04E-05 ......... .........  1.91E-05 .........  3.19E-02
 SG11
+        4.17E-07 -1.23E-05 -2.83E-06 -2.01E-04 -1.11E-06 ......... ......... -8.14E-07 .........  1.07E-05  7.01E-06

 ********************         FIRST ORDER CONDITIONAL ESTIMATION WITH INTERACTION (EVALUATION)       ********************
 ********************                          CORRELATION MATRIX OF ESTIMATE                        ********************

            TH 1      TH 2      TH 3      TH 4      OM11      OM12      OM13      OM22      OM23      OM33      SG11
 TH 1
+        7.52E-03
 TH 2
+        2.30E-02  2.22E-01
 TH 3
+        6.27E-03  5.24E-02  1.37E-01
 TH 4
+       -1.18E-02  4.31E-02  4.22E-04  8.47E-02
 OM11
+       -4.11E-01  2.02E-02  6.81E-03  1.69E-02  2.10E-02
 OM12
+       ......... ......... ......... ......... ......... .........
 OM13
+       ......... ......... ......... ......... ......... ......... .........
 OM22
+       -8.04E-03 -1.99E-01  5.68E-03  1.64E-02 -1.27E-03 ......... .........  6.42E-03
 OM23
+       ......... ......... ......... ......... ......... ......... ......... ......... .........
 OM33
+        1.59E-04  2.69E-03 -3.07E-02 -4.76E-02  5.44E-03 ......... .........  1.66E-02 .........  1.79E-01
 SG11
+        2.09E-02 -2.08E-02 -7.77E-03 -8.94E-01 -2.01E-02 ......... ......... -4.79E-02 .........  2.26E-02  2.65E-03
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 Elapsed finaloutput time in seconds:     0.03
 #CPUT: Total CPU Time in Seconds,        1.672
