Thu 09/23/2021
12:16 PM
; Control problem for sde system.  No SDE matters done.  From Christoffer Tornoe, Examle 2
$PROBLEM PK ODE HANDS ON ONE

$INPUT ID TIME DV AMT CMT FLAG

$DATA   sde_ex2_base.dat
        IGNORE=@

$SUBROUTINE ADVAN6 TOL 10 DP

$MODEL
       COMP = (CENTRAL);

$PK
  IF(NEWIND.NE.2) OT = 0

  TVCL  = THETA(1)
  CL    = TVCL*EXP(ETA(1))

  TVVD  = THETA(2)
  VD    = TVVD*EXP(ETA(2))

$DES
 DADT(1) = - CL/VD*A(1) ;+SGW1

$ERROR

     IPRED = A(1)/VD
     IRES  = DV - IPRED
     W     = THETA(3)
     IWRES = IRES/W
     Y     = IPRED+W*EPS(1)

$THETA (0,10)               ;1 CL
$THETA (0,32)               ;2 VD
$THETA (0, 2)               ;4 SIGMA

$OMEGA 0.1                  ;1 CL
$OMEGA 0.01                 ;2 VD

$SIGMA 1 FIX                ; PK

$EST MAXEVAL=9999 METHOD=1 LAPLACE NUMERICAL SLOW INTER NOABORT SIGDIGITS=3 PRINT=1
$COV MATRIX=R

$TABLE ID TIME FLAG AMT CMT IPRED IRES IWRES
       ONEHEADER NOPRINT FILE=sde_ex2_base.tab

NM-TRAN MESSAGES
 WARNINGS AND ERRORS (IF ANY) FOR PROBLEM    1
 (WARNING  2) NM-TRAN INFERS THAT THE DATA ARE POPULATION.
Note: Analytical 2nd Derivatives are constructed in FSUBS but are never used.
      You may insert $ABBR DERIV2=NO after the first $PROB to save FSUBS construction and compilation time

1NONLINEAR MIXED EFFECTS MODEL PROGRAM (NONMEM) VERSION 7.5.1
 ORIGINALLY DEVELOPED BY STUART BEAL, LEWIS SHEINER, AND ALISON BOECKMANN
 CURRENT DEVELOPERS ARE ROBERT BAUER, ICON DEVELOPMENT SOLUTIONS,
 AND ALISON BOECKMANN. IMPLEMENTATION, EFFICIENCY, AND STANDARDIZATION
 PERFORMED BY NOUS INFOSYSTEMS.
 PROBLEM NO.:         1
 PK ODE HANDS ON ONE
 TOT. NO. OF OBS RECS:      540
 TOT. NO. OF INDIVIDUALS:       30
 GENERAL NONLINEAR KINETICS MODEL (DVERK1, ADVAN6)
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 #TBLN:      1
 #METH: Laplacian Conditional Estimation with Interaction
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
 #TERM:
0MINIMIZATION SUCCESSFUL
 HOWEVER, PROBLEMS OCCURRED WITH THE MINIMIZATION.
 REGARD THE RESULTS OF THE ESTIMATION STEP CAREFULLY, AND ACCEPT THEM ONLY
 AFTER CHECKING THAT THE COVARIANCE STEP PRODUCES REASONABLE OUTPUT.
 NO. OF FUNCTION EVALUATIONS USED:      152
 NO. OF SIG. DIGITS IN FINAL EST.:  3.5

 ETABAR IS THE ARITHMETIC MEAN OF THE ETA-ESTIMATES,
 AND THE P-VALUE IS GIVEN FOR THE NULL HYPOTHESIS THAT THE TRUE MEAN IS 0.

 ETABAR:        -3.2829E-04 -3.4874E-03
 SE:             5.7273E-02  6.3135E-02
 N:                      30          30

 P VAL.:         9.9543E-01  9.5595E-01

 ETASHRINKSD(%)  2.1394E+00  1.9365E+00
 ETASHRINKVR(%)  4.2330E+00  3.8355E+00
 EBVSHRINKSD(%)  1.5684E+00  1.5059E+00
 EBVSHRINKVR(%)  3.1123E+00  2.9891E+00
 RELATIVEINF(%)  9.6886E+01  9.7009E+01
 EPSSHRINKSD(%)  5.4826E+00
 EPSSHRINKVR(%)  1.0665E+01


 TOTAL DATA POINTS NORMALLY DISTRIBUTED (N):          540
 N*LOG(2PI) CONSTANT TO OBJECTIVE FUNCTION:    992.453615861047
 OBJECTIVE FUNCTION VALUE WITHOUT CONSTANT:    1363.13243339164
 OBJECTIVE FUNCTION VALUE WITH CONSTANT:       2355.58604925269
 REPORTED OBJECTIVE FUNCTION DOES NOT CONTAIN CONSTANT

 TOTAL EFFECTIVE ETAS (NIND*NETA):                            60


 #TERE:
 Elapsed estimation  time in seconds:     6.05
 Elapsed covariance  time in seconds:     1.88
 Elapsed postprocess time in seconds:     0.04

 ********************                LAPLACIAN CONDITIONAL ESTIMATION WITH INTERACTION               ********************
 #OBJT:**************                       MINIMUM VALUE OF OBJECTIVE FUNCTION                      ********************
 #OBJV:********************************************     1363.132       **************************************************

 ********************                LAPLACIAN CONDITIONAL ESTIMATION WITH INTERACTION               ********************
 ********************                             FINAL PARAMETER ESTIMATE                           ********************

 THETA - VECTOR OF FIXED EFFECTS PARAMETERS   *********
         TH 1      TH 2      TH 3
         1.07E+01  3.24E+01  1.75E+00

 OMEGA - COV MATRIX FOR RANDOM EFFECTS - ETAS  ********
         ETA1      ETA2
 ETA1
+        1.03E-01
 ETA2
+        0.00E+00  1.24E-01

 SIGMA - COV MATRIX FOR RANDOM EFFECTS - EPSILONS  ****
         EPS1
 EPS1
+        1.00E+00

 OMEGA - CORR MATRIX FOR RANDOM EFFECTS - ETAS  *******
         ETA1      ETA2
 ETA1
+        3.21E-01
 ETA2
+        0.00E+00  3.53E-01

 SIGMA - CORR MATRIX FOR RANDOM EFFECTS - EPSILONS  ***
         EPS1
 EPS1
+        1.00E+00

 ********************                LAPLACIAN CONDITIONAL ESTIMATION WITH INTERACTION               ********************
 ********************                            STANDARD ERROR OF ESTIMATE                          ********************

 THETA - VECTOR OF FIXED EFFECTS PARAMETERS   *********
         TH 1      TH 2      TH 3
         6.26E-01  2.10E+00  5.61E-02

 OMEGA - COV MATRIX FOR RANDOM EFFECTS - ETAS  ********
         ETA1      ETA2
 ETA1
+        2.64E-02
 ETA2
+       .........  3.33E-02

 SIGMA - COV MATRIX FOR RANDOM EFFECTS - EPSILONS  ****
         EPS1
 EPS1
+       .........

 OMEGA - CORR MATRIX FOR RANDOM EFFECTS - ETAS  *******
         ETA1      ETA2
 ETA1
+        4.11E-02
 ETA2
+       .........  4.73E-02

 SIGMA - CORR MATRIX FOR RANDOM EFFECTS - EPSILONS  ***
         EPS1
 EPS1
+       .........

 ********************                LAPLACIAN CONDITIONAL ESTIMATION WITH INTERACTION               ********************
 ********************                          COVARIANCE MATRIX OF ESTIMATE                         ********************

            TH 1      TH 2      TH 3      OM11      OM12      OM22      SG11
 TH 1
+        3.91E-01
 TH 2
+        2.29E-02  4.42E+00
 TH 3
+        1.96E-04 -1.66E-03  3.14E-03
 OM11
+        3.07E-04  2.35E-03  2.54E-05  6.95E-04
 OM12
+       ......... ......... ......... ......... .........
 OM22
+       -1.61E-04  4.86E-04 -3.10E-05 -1.44E-05 .........  1.11E-03
 SG11
+       ......... ......... ......... ......... ......... ......... .........

 ********************                LAPLACIAN CONDITIONAL ESTIMATION WITH INTERACTION               ********************
 ********************                          CORRELATION MATRIX OF ESTIMATE                        ********************

            TH 1      TH 2      TH 3      OM11      OM12      OM22      SG11
 TH 1
+        6.26E-01
 TH 2
+        1.74E-02  2.10E+00
 TH 3
+        5.59E-03 -1.41E-02  5.61E-02
 OM11
+        1.86E-02  4.24E-02  1.72E-02  2.64E-02
 OM12
+       ......... ......... ......... ......... .........
 OM22
+       -7.73E-03  6.93E-03 -1.66E-02 -1.64E-02 .........  3.33E-02
 SG11
+       ......... ......... ......... ......... ......... ......... .........
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 Elapsed finaloutput time in seconds:     0.06
 #CPUT: Total CPU Time in Seconds,        8.000
