Thu 09/23/2021
12:19 PM
; Based on sde_ex2_base.ctl, with SDE equations put in, and .csv file modified.  From Christoffer Tornoe, example 2, and can work with NONMEM VI
; Using XVID data item method as data file type
$PROBLEM PK ODE HANDS ON ONE
$INPUT ID TIME DV AMT CMT FLAG MDV EVID SDE QA=XVID1 QB=XVID2 QZ=XVID3
$DATA   sde_ex2_xvid.dat
        IGNORE=@
$SUBROUTINE ADVAN6 TOL 10 DP
$MODEL
       COMP = (CENTRAL);
       COMP = (P1)

$THETA (0,10)               ;1 CL
$THETA (0,32)               ;2 VD
$THETA (0, 2)               ;4 SIGMA
$THETA (0,1) ; SGW1

$OMEGA 0.1                  ;1 CL
$OMEGA 0.01                 ;2 VD

$SIGMA 1 FIX                ; PK

$PK
  IF(NEWIND.NE.2) OT = 0
  TVCL  = THETA(1)
  CL    = TVCL*EXP(ETA(1))
  TVVD  = THETA(2)
  VD    = TVVD*EXP(ETA(2))
SGW1 = THETA(4)

IF(NEWIND.NE.2) THEN
  AHT1 = 0
  PHT1 = 0
ENDIF

IF(EVID.NE.3) THEN
  A1 = A(1)
  A2 = A(2)
ELSE
  A1 = A1
  A2 = A2
ENDIF

IF(EVID.EQ.0) OBS = DV

IF(EVID.GT.2.AND.SDE.EQ.2) THEN
  RVAR = A2*(1/VD)**2+ THETA(3)**2
  K1   = A2*(1/VD)/RVAR
  AHT1 = A1 + K1*(OBS -( A1/VD))
  PHT1 = A2 - K1*RVAR*K1
ENDIF

IF(EVID.GT.2.AND.SDE.EQ.3) THEN
  AHT1 = A1
  PHT1 = 0
ENDIF

IF(EVID.GT.2.AND.SDE.EQ.4) THEN
  AHT1 = 0
  PHT1 = A2
ENDIF

IF(A_0FLG.EQ.1) THEN
  A_0(1) = AHT1
  A_0(2) = PHT1
ENDIF

$DES
 DADT(1) = - CL/VD*A(1) ;+0
DADT(2) = (-CL/VD)*(A(2))+(-CL/VD)*(A(2))+SGW1*SGW1

$ERROR (OBS ONLY)
     IPRED = A(1)/VD
     IRES  = DV - IPRED
W=SQRT(A(2)*(1/VD)**2+ THETA(3)**2)
     IWRES = IRES/W
     Y     = IPRED+W*EPS(1)
$EST MAXEVAL=9999 METHOD=1 LAPLACE NUMERICAL SLOW INTER NOABORT SIGDIGITS=3 PRINT=1
$COV MATRIX=R
$TABLE ID TIME FLAG AMT CMT IPRED IRES IWRES EVID
       ONEHEADER NOPRINT FILE=sde_ex2_foce_xvid.tab

NM-TRAN MESSAGES
 WARNINGS AND ERRORS (IF ANY) FOR PROBLEM    1
 (WARNING  2) NM-TRAN INFERS THAT THE DATA ARE POPULATION.
 (WARNING  3) THERE MAY BE AN ERROR IN THE ABBREVIATED CODE. THE FOLLOWING
 ONE OR MORE RANDOM VARIABLES ARE DEFINED WITH "IF" STATEMENTS THAT DO NOT
 PROVIDE DEFINITIONS FOR BOTH THE "THEN" AND "ELSE" CASES. IF ALL
 CONDITIONS FAIL, THE VALUES OF THESE VARIABLES WILL BE ZERO.
   RVAR K1
Note: Analytical 2nd Derivatives are constructed in FSUBS but are never used.
      You may insert $ABBR DERIV2=NO after the first $PROB to save FSUBS construction and compilation time

1NONLINEAR MIXED EFFECTS MODEL PROGRAM (NONMEM) VERSION 7.5.1
 ORIGINALLY DEVELOPED BY STUART BEAL, LEWIS SHEINER, AND ALISON BOECKMANN
 CURRENT DEVELOPERS ARE ROBERT BAUER, ICON DEVELOPMENT SOLUTIONS,
 AND ALISON BOECKMANN. IMPLEMENTATION, EFFICIENCY, AND STANDARDIZATION
 PERFORMED BY NOUS INFOSYSTEMS.
 PROBLEM NO.:         1
 PK ODE HANDS ON ONE
 TOT. NO. OF OBS RECS:      540
 TOT. NO. OF INDIVIDUALS:       30
 GENERAL NONLINEAR KINETICS MODEL (DVERK1, ADVAN6)
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 #TBLN:      1
 #METH: Laplacian Conditional Estimation with Interaction
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
 #TERM:
0MINIMIZATION SUCCESSFUL
 NO. OF FUNCTION EVALUATIONS USED:      189
 NO. OF SIG. DIGITS IN FINAL EST.:  3.5

 ETABAR IS THE ARITHMETIC MEAN OF THE ETA-ESTIMATES,
 AND THE P-VALUE IS GIVEN FOR THE NULL HYPOTHESIS THAT THE TRUE MEAN IS 0.

 ETABAR:         1.4607E-02  1.8859E-03
 SE:             4.4277E-02  6.1657E-02
 N:                      30          30

 P VAL.:         7.4147E-01  9.7560E-01

 ETASHRINKSD(%)  1.1100E+01  1.9647E+00
 ETASHRINKVR(%)  2.0968E+01  3.8909E+00
 EBVSHRINKSD(%)  1.0795E+01  1.7065E+00
 EBVSHRINKVR(%)  2.0425E+01  3.3839E+00
 RELATIVEINF(%)  7.9540E+01  9.6574E+01
 EPSSHRINKSD(%)  4.7788E+00
 EPSSHRINKVR(%)  9.3292E+00


 TOTAL DATA POINTS NORMALLY DISTRIBUTED (N):          540
 N*LOG(2PI) CONSTANT TO OBJECTIVE FUNCTION:    992.453615861047
 OBJECTIVE FUNCTION VALUE WITHOUT CONSTANT:    1211.13662769341
 OBJECTIVE FUNCTION VALUE WITH CONSTANT:       2203.59024355445
 REPORTED OBJECTIVE FUNCTION DOES NOT CONTAIN CONSTANT

 TOTAL EFFECTIVE ETAS (NIND*NETA):                            60


 #TERE:
 Elapsed estimation  time in seconds:    26.21
 Elapsed covariance  time in seconds:    12.95
 Elapsed postprocess time in seconds:     0.16

 ********************                LAPLACIAN CONDITIONAL ESTIMATION WITH INTERACTION               ********************
 #OBJT:**************                       MINIMUM VALUE OF OBJECTIVE FUNCTION                      ********************
 #OBJV:********************************************     1211.137       **************************************************

 ********************                LAPLACIAN CONDITIONAL ESTIMATION WITH INTERACTION               ********************
 ********************                             FINAL PARAMETER ESTIMATE                           ********************

 THETA - VECTOR OF FIXED EFFECTS PARAMETERS   *********
         TH 1      TH 2      TH 3      TH 4
         1.08E+01  3.24E+01  9.08E-01  5.32E+01

 OMEGA - COV MATRIX FOR RANDOM EFFECTS - ETAS  ********
         ETA1      ETA2
 ETA1
+        7.44E-02
 ETA2
+        0.00E+00  1.19E-01

 SIGMA - COV MATRIX FOR RANDOM EFFECTS - EPSILONS  ****
         EPS1
 EPS1
+        1.00E+00

 OMEGA - CORR MATRIX FOR RANDOM EFFECTS - ETAS  *******
         ETA1      ETA2
 ETA1
+        2.73E-01
 ETA2
+        0.00E+00  3.44E-01

 SIGMA - CORR MATRIX FOR RANDOM EFFECTS - EPSILONS  ***
         EPS1
 EPS1
+        1.00E+00

 ********************                LAPLACIAN CONDITIONAL ESTIMATION WITH INTERACTION               ********************
 ********************                            STANDARD ERROR OF ESTIMATE                          ********************

 THETA - VECTOR OF FIXED EFFECTS PARAMETERS   *********
         TH 1      TH 2      TH 3      TH 4
         6.17E-01  2.08E+00  7.87E-02  3.93E+00

 OMEGA - COV MATRIX FOR RANDOM EFFECTS - ETAS  ********
         ETA1      ETA2
 ETA1
+        2.41E-02
 ETA2
+       .........  3.19E-02

 SIGMA - COV MATRIX FOR RANDOM EFFECTS - EPSILONS  ****
         EPS1
 EPS1
+       .........

 OMEGA - CORR MATRIX FOR RANDOM EFFECTS - ETAS  *******
         ETA1      ETA2
 ETA1
+        4.42E-02
 ETA2
+       .........  4.63E-02

 SIGMA - CORR MATRIX FOR RANDOM EFFECTS - EPSILONS  ***
         EPS1
 EPS1
+       .........

 ********************                LAPLACIAN CONDITIONAL ESTIMATION WITH INTERACTION               ********************
 ********************                          COVARIANCE MATRIX OF ESTIMATE                         ********************

            TH 1      TH 2      TH 3      TH 4      OM11      OM12      OM22      SG11
 TH 1
+        3.81E-01
 TH 2
+        2.69E-02  4.34E+00
 TH 3
+       -2.35E-03  4.55E-05  6.19E-03
 TH 4
+        1.52E-01  2.35E-01 -2.04E-01  1.55E+01
 OM11
+       -2.87E-03 -2.66E-03  1.07E-04 -1.08E-02  5.81E-04
 OM12
+       ......... ......... ......... ......... ......... .........
 OM22
+       -1.47E-04  3.70E-05  5.59E-05 -4.26E-03 -1.87E-05 .........  1.02E-03
 SG11
+       ......... ......... ......... ......... ......... ......... ......... .........

 ********************                LAPLACIAN CONDITIONAL ESTIMATION WITH INTERACTION               ********************
 ********************                          CORRELATION MATRIX OF ESTIMATE                        ********************

            TH 1      TH 2      TH 3      TH 4      OM11      OM12      OM22      SG11
 TH 1
+        6.17E-01
 TH 2
+        2.09E-02  2.08E+00
 TH 3
+       -4.85E-02  2.77E-04  7.87E-02
 TH 4
+        6.27E-02  2.87E-02 -6.60E-01  3.93E+00
 OM11
+       -1.93E-01 -5.30E-02  5.64E-02 -1.14E-01  2.41E-02
 OM12
+       ......... ......... ......... ......... ......... .........
 OM22
+       -7.46E-03  5.57E-04  2.23E-02 -3.40E-02 -2.44E-02 .........  3.19E-02
 SG11
+       ......... ......... ......... ......... ......... ......... ......... .........
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 Elapsed finaloutput time in seconds:     0.07
 #CPUT: Total CPU Time in Seconds,       39.438
