Thu 09/23/2021
12:20 PM
; Using the SDE in-line equations after the manner of Christoffer Tornoe, but MU modeling theta(1) and theta(2).
; Note that IMP method results are similar in sde_ex2_impo and sde_ex2_imp_mu, since this method did not
; rely on NMTRAN having
; exposure to analytical SDE equations.  But ITS and Laplace in sde_ex2_impo is not correct, relative to sde_ex2_impo_mu.
; Although their LAPLACE OBJ's are far apart, in fact the parameters are similar.
$PROBLEM PK ODE HANDS ON ONE
$INPUT ID HOUR DV AMT CMT FLAG EVID MDV SDE TIME
$DATA   sde_ex2.dat
        IGNORE=@
$SUBROUTINE ADVAN6 TOL 10 DP
$MODEL
       COMP = (CENTRAL);
       COMP = (P1)

$THETA (0,2.3)               ;1 CL
$THETA (0,3.5)               ;2 VD
$THETA (0, 2)               ;4 SIGMA
$THETA (0,1) ; SGW1

$OMEGA 0.1                  ;1 CL
$OMEGA 0.01                 ;2 VD

$SIGMA 1 FIX                ; PK

$PK
  IF(NEWIND.NE.2) OT = 0

  MU_1  = THETA(1)
  CL    = EXP(MU_1+ETA(1))
  MU_2  = THETA(2)
  VD    = EXP(MU_2+ETA(2))
  SGW1 = THETA(4)

IF(NEWIND.NE.2) THEN
  AHT1 = 0
  PHT1 = 0
ENDIF

IF(EVID.NE.3) THEN
  A1 = A(1)
  A2 = A(2)
ELSE
  A1 = A1
  A2 = A2
ENDIF

IF(EVID.EQ.0) OBS = DV

IF(EVID.GT.2.AND.SDE.EQ.2) THEN
  RVAR = A2*(1/VD)**2+ THETA(3)**2
  K1   = A2*(1/VD)/RVAR
  AHT1 = A1 + K1*(OBS -( A1/VD))
  PHT1 = A2 - K1*RVAR*K1
ENDIF

IF(EVID.GT.2.AND.SDE.EQ.3) THEN
  AHT1 = A1
  PHT1 = 0
ENDIF

IF(EVID.GT.2.AND.SDE.EQ.4) THEN
  AHT1 = 0
  PHT1 = A2
ENDIF

IF(A_0FLG.EQ.1) THEN
  A_0(1) = AHT1
  A_0(2) = PHT1
ENDIF

$DES
 DADT(1) = - CL/VD*A(1) ;+0
DADT(2) = (-CL/VD)*(A(2))+(-CL/VD)*(A(2))+SGW1*SGW1

$ERROR (OBS ONLY)
     IPRED = A(1)/VD
     IRES  = DV - IPRED
W=SQRT(ABS(A(2))*(1/VD)**2+ THETA(3)**2)
     IWRES = IRES/W
     Y     = IPRED+W*EPS(1)

$EST METHOD=ITS INTERACTION LAPLACE NUMERICAL SLOW NOABORT PRINT=1 CTYPE=3
$EST METHOD=IMP INTERACTION NOABORT SIGL=5 PRINT=1 IACCEPT=1.0 CTYPE=3
$EST MAXEVAL=9999 METHOD=1 LAPLACE INTER NOABORT NUMERICAL SLOW NSIG=3 PRINT=1
$COV MATRIX=R
$TABLE ID TIME FLAG AMT CMT IPRED IRES IWRES EVID
       ONEHEADER NOPRINT FILE=sde_ex2_imp_mu.tab

NM-TRAN MESSAGES
 WARNINGS AND ERRORS (IF ANY) FOR PROBLEM    1
 (WARNING  2) NM-TRAN INFERS THAT THE DATA ARE POPULATION.
 (WARNING  3) THERE MAY BE AN ERROR IN THE ABBREVIATED CODE. THE FOLLOWING
 ONE OR MORE RANDOM VARIABLES ARE DEFINED WITH "IF" STATEMENTS THAT DO NOT
 PROVIDE DEFINITIONS FOR BOTH THE "THEN" AND "ELSE" CASES. IF ALL
 CONDITIONS FAIL, THE VALUES OF THESE VARIABLES WILL BE ZERO.
   RVAR K1
 (WARNING  26) THE DERIVATIVE OF THE ABSOLUTE VALUE OF A RANDOM VARIABLE IS
 BEING COMPUTED. IF THE ABSOLUTE VALUE AFFECTS THE VALUE OF THE OBJECTIVE
 FUNCTION, THE USER SHOULD ENSURE THAT THE RANDOM VARIABLE IS ALWAYS
 POSITIVE OR ALWAYS NEGATIVE.
 (MU_WARNING 24) ABBREVIATED CODE IS TOO COMPLEX. UNABLE TO CHECK USE OF MU_ VARIABLES.
Note: Analytical 2nd Derivatives are constructed in FSUBS but are never used.
      You may insert $ABBR DERIV2=NO after the first $PROB to save FSUBS construction and compilation time

1NONLINEAR MIXED EFFECTS MODEL PROGRAM (NONMEM) VERSION 7.5.1
 ORIGINALLY DEVELOPED BY STUART BEAL, LEWIS SHEINER, AND ALISON BOECKMANN
 CURRENT DEVELOPERS ARE ROBERT BAUER, ICON DEVELOPMENT SOLUTIONS,
 AND ALISON BOECKMANN. IMPLEMENTATION, EFFICIENCY, AND STANDARDIZATION
 PERFORMED BY NOUS INFOSYSTEMS.
 PROBLEM NO.:         1
 PK ODE HANDS ON ONE
 TOT. NO. OF OBS RECS:      540
 TOT. NO. OF INDIVIDUALS:       30
 GENERAL NONLINEAR KINETICS MODEL (DVERK1, ADVAN6)
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 #TBLN:      1
 #METH: Iterative Two Stage
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
 #TERM:
 OPTIMIZATION WAS COMPLETED

 ETABAR IS THE ARITHMETIC MEAN OF THE ETA-ESTIMATES,
 AND THE P-VALUE IS GIVEN FOR THE NULL HYPOTHESIS THAT THE TRUE MEAN IS 0.

 ETABAR:        -1.8754E-05 -1.1413E-05
 SE:             4.4021E-02  6.1628E-02
 N:                      30          30

 P VAL.:         9.9966E-01  9.9985E-01

 ETASHRINKSD(%)  1.0854E+01  1.7157E+00
 ETASHRINKVR(%)  2.0530E+01  3.4020E+00
 EBVSHRINKSD(%)  1.0862E+01  1.7185E+00
 EBVSHRINKVR(%)  2.0545E+01  3.4074E+00
 RELATIVEINF(%)  7.9421E+01  9.6550E+01
 EPSSHRINKSD(%)  4.7476E+00
 EPSSHRINKVR(%)  9.2698E+00


 TOTAL DATA POINTS NORMALLY DISTRIBUTED (N):          540
 N*LOG(2PI) CONSTANT TO OBJECTIVE FUNCTION:    992.453615861047
 OBJECTIVE FUNCTION VALUE WITHOUT CONSTANT:    1211.24834629237
 OBJECTIVE FUNCTION VALUE WITH CONSTANT:       2203.70196215341
 REPORTED OBJECTIVE FUNCTION DOES NOT CONTAIN CONSTANT

 TOTAL EFFECTIVE ETAS (NIND*NETA):                            60


 #TERE:
 Elapsed estimation  time in seconds:     8.61
 Elapsed covariance  time in seconds:     0.02

 ********************                               ITERATIVE TWO STAGE                              ********************
 #OBJT:**************                        FINAL VALUE OF OBJECTIVE FUNCTION                       ********************
 #OBJV:********************************************     1211.248       **************************************************

 ********************                               ITERATIVE TWO STAGE                              ********************
 ********************                             FINAL PARAMETER ESTIMATE                           ********************

 THETA - VECTOR OF FIXED EFFECTS PARAMETERS   *********
         TH 1      TH 2      TH 3      TH 4
         2.40E+00  3.48E+00  9.07E-01  5.33E+01

 OMEGA - COV MATRIX FOR RANDOM EFFECTS - ETAS  ********
         ETA1      ETA2
 ETA1
+        7.32E-02
 ETA2
+        0.00E+00  1.18E-01

 SIGMA - COV MATRIX FOR RANDOM EFFECTS - EPSILONS  ****
         EPS1
 EPS1
+        1.00E+00

 OMEGA - CORR MATRIX FOR RANDOM EFFECTS - ETAS  *******
         ETA1      ETA2
 ETA1
+        2.70E-01
 ETA2
+        0.00E+00  3.43E-01

 SIGMA - CORR MATRIX FOR RANDOM EFFECTS - EPSILONS  ***
         EPS1
 EPS1
+        1.00E+00

 ********************                               ITERATIVE TWO STAGE                              ********************
 ********************                          STANDARD ERROR OF ESTIMATE (S)                        ********************

 THETA - VECTOR OF FIXED EFFECTS PARAMETERS   *********
         TH 1      TH 2      TH 3      TH 4
         6.27E-02  8.18E-02  8.65E-02  4.30E+00

 OMEGA - COV MATRIX FOR RANDOM EFFECTS - ETAS  ********
         ETA1      ETA2
 ETA1
+        3.43E-02
 ETA2
+        0.00E+00  3.96E-02

 SIGMA - COV MATRIX FOR RANDOM EFFECTS - EPSILONS  ****
         EPS1
 EPS1
+        0.00E+00

 OMEGA - CORR MATRIX FOR RANDOM EFFECTS - ETAS  *******
         ETA1      ETA2
 ETA1
+        6.34E-02
 ETA2
+       .........  5.77E-02

 SIGMA - CORR MATRIX FOR RANDOM EFFECTS - EPSILONS  ***
         EPS1
 EPS1
+       .........

 ********************                               ITERATIVE TWO STAGE                              ********************
 ********************                        COVARIANCE MATRIX OF ESTIMATE (S)                       ********************

            TH 1      TH 2      TH 3      TH 4      OM11      OM12      OM22      SG11
 TH 1
+        3.93E-03
 TH 2
+        8.38E-04  6.69E-03
 TH 3
+       -1.36E-03  1.73E-03  7.48E-03
 TH 4
+        7.89E-02 -6.90E-02 -2.00E-01  1.85E+01
 OM11
+       -8.00E-04 -7.44E-04  5.76E-04 -2.84E-02  1.18E-03
 OM12
+       ......... ......... ......... ......... ......... .........
 OM22
+       -7.62E-05 -1.55E-03  5.71E-05  2.40E-02  1.07E-04  0.00E+00  1.57E-03
 SG11
+       ......... ......... ......... ......... ......... ......... ......... .........

 ********************                               ITERATIVE TWO STAGE                              ********************
 ********************                        CORRELATION MATRIX OF ESTIMATE (S)                      ********************

            TH 1      TH 2      TH 3      TH 4      OM11      OM12      OM22      SG11
 TH 1
+        6.27E-02
 TH 2
+        1.63E-01  8.18E-02
 TH 3
+       -2.50E-01  2.44E-01  8.65E-02
 TH 4
+        2.93E-01 -1.97E-01 -5.38E-01  4.30E+00
 OM11
+       -3.72E-01 -2.65E-01  1.94E-01 -1.93E-01  3.43E-02
 OM12
+       ......... ......... ......... ......... ......... .........
 OM22
+       -3.06E-02 -4.78E-01  1.67E-02  1.41E-01  7.88E-02  0.00E+00  3.96E-02
 SG11
+       ......... ......... ......... ......... ......... ......... ......... .........
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 #TBLN:      2
 #METH: Importance Sampling
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
 #TERM:
 OPTIMIZATION WAS COMPLETED

 ETABAR IS THE ARITHMETIC MEAN OF THE ETA-ESTIMATES,
 AND THE P-VALUE IS GIVEN FOR THE NULL HYPOTHESIS THAT THE TRUE MEAN IS 0.

 ETABAR:        -2.9781E-03  2.3678E-03
 SE:             4.4842E-02  6.1761E-02
 N:                      30          30

 P VAL.:         9.4705E-01  9.6942E-01

 ETASHRINKSD(%)  1.0391E+01  1.8693E+00
 ETASHRINKVR(%)  1.9701E+01  3.7037E+00
 EBVSHRINKSD(%)  1.0928E+01  1.6905E+00
 EBVSHRINKVR(%)  2.0661E+01  3.3524E+00
 RELATIVEINF(%)  7.9311E+01  9.6614E+01
 EPSSHRINKSD(%)  4.9295E+00
 EPSSHRINKVR(%)  9.6160E+00


 TOTAL DATA POINTS NORMALLY DISTRIBUTED (N):          540
 N*LOG(2PI) CONSTANT TO OBJECTIVE FUNCTION:    992.453615861047
 OBJECTIVE FUNCTION VALUE WITHOUT CONSTANT:    1210.75309142988
 OBJECTIVE FUNCTION VALUE WITH CONSTANT:       2203.20670729093
 REPORTED OBJECTIVE FUNCTION DOES NOT CONTAIN CONSTANT

 TOTAL EFFECTIVE ETAS (NIND*NETA):                            60


 #TERE:
 Elapsed estimation  time in seconds:    31.83
 Elapsed covariance  time in seconds:    11.47

 ********************                               IMPORTANCE SAMPLING                              ********************
 #OBJT:**************                        FINAL VALUE OF OBJECTIVE FUNCTION                       ********************
 #OBJV:********************************************     1210.753       **************************************************

 ********************                               IMPORTANCE SAMPLING                              ********************
 ********************                             FINAL PARAMETER ESTIMATE                           ********************

 THETA - VECTOR OF FIXED EFFECTS PARAMETERS   *********
         TH 1      TH 2      TH 3      TH 4
         2.38E+00  3.48E+00  9.07E-01  5.32E+01

 OMEGA - COV MATRIX FOR RANDOM EFFECTS - ETAS  ********
         ETA1      ETA2
 ETA1
+        7.51E-02
 ETA2
+        0.00E+00  1.19E-01

 SIGMA - COV MATRIX FOR RANDOM EFFECTS - EPSILONS  ****
         EPS1
 EPS1
+        1.00E+00

 OMEGA - CORR MATRIX FOR RANDOM EFFECTS - ETAS  *******
         ETA1      ETA2
 ETA1
+        2.74E-01
 ETA2
+        0.00E+00  3.45E-01

 SIGMA - CORR MATRIX FOR RANDOM EFFECTS - EPSILONS  ***
         EPS1
 EPS1
+        1.00E+00

 ********************                               IMPORTANCE SAMPLING                              ********************
 ********************                          STANDARD ERROR OF ESTIMATE (R)                        ********************

 THETA - VECTOR OF FIXED EFFECTS PARAMETERS   *********
         TH 1      TH 2      TH 3      TH 4
         5.63E-02  6.41E-02  7.83E-02  3.89E+00

 OMEGA - COV MATRIX FOR RANDOM EFFECTS - ETAS  ********
         ETA1      ETA2
 ETA1
+        2.55E-02
 ETA2
+        0.00E+00  3.44E-02

 SIGMA - COV MATRIX FOR RANDOM EFFECTS - EPSILONS  ****
         EPS1
 EPS1
+        0.00E+00

 OMEGA - CORR MATRIX FOR RANDOM EFFECTS - ETAS  *******
         ETA1      ETA2
 ETA1
+        4.64E-02
 ETA2
+       .........  4.99E-02

 SIGMA - CORR MATRIX FOR RANDOM EFFECTS - EPSILONS  ***
         EPS1
 EPS1
+       .........

 ********************                               IMPORTANCE SAMPLING                              ********************
 ********************                        COVARIANCE MATRIX OF ESTIMATE (R)                       ********************

            TH 1      TH 2      TH 3      TH 4      OM11      OM12      OM22      SG11
 TH 1
+        3.17E-03
 TH 2
+       -6.47E-05  4.11E-03
 TH 3
+       -1.47E-04  2.46E-05  6.14E-03
 TH 4
+        8.60E-03  5.48E-03 -2.01E-01  1.51E+01
 OM11
+       -5.78E-05 -9.78E-06  1.57E-04 -1.19E-02  6.48E-04
 OM12
+       ......... ......... ......... ......... ......... .........
 OM22
+       -1.02E-05 -2.25E-05  7.99E-05 -6.05E-03  7.38E-05  0.00E+00  1.18E-03
 SG11
+       ......... ......... ......... ......... ......... ......... ......... .........

 ********************                               IMPORTANCE SAMPLING                              ********************
 ********************                        CORRELATION MATRIX OF ESTIMATE (R)                      ********************

            TH 1      TH 2      TH 3      TH 4      OM11      OM12      OM22      SG11
 TH 1
+        5.63E-02
 TH 2
+       -1.80E-02  6.41E-02
 TH 3
+       -3.34E-02  4.90E-03  7.83E-02
 TH 4
+        3.93E-02  2.20E-02 -6.60E-01  3.89E+00
 OM11
+       -4.04E-02 -6.00E-03  7.88E-02 -1.20E-01  2.55E-02
 OM12
+       ......... ......... ......... ......... ......... .........
 OM22
+       -5.25E-03 -1.02E-02  2.96E-02 -4.53E-02  8.42E-02  0.00E+00  3.44E-02
 SG11
+       ......... ......... ......... ......... ......... ......... ......... .........
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 #TBLN:      3
 #METH: Laplacian Conditional Estimation with Interaction
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
 #TERM:
0MINIMIZATION SUCCESSFUL
 NO. OF FUNCTION EVALUATIONS USED:      105
 NO. OF SIG. DIGITS IN FINAL EST.:  3.3

 ETABAR IS THE ARITHMETIC MEAN OF THE ETA-ESTIMATES,
 AND THE P-VALUE IS GIVEN FOR THE NULL HYPOTHESIS THAT THE TRUE MEAN IS 0.

 ETABAR:         1.4677E-02  2.0258E-03
 SE:             4.4277E-02  6.1657E-02
 N:                      30          30

 P VAL.:         7.4027E-01  9.7379E-01

 ETASHRINKSD(%)  1.1092E+01  1.9644E+00
 ETASHRINKVR(%)  2.0954E+01  3.8901E+00
 EBVSHRINKSD(%)  1.0796E+01  1.7063E+00
 EBVSHRINKVR(%)  2.0427E+01  3.3836E+00
 RELATIVEINF(%)  7.9538E+01  9.6575E+01
 EPSSHRINKSD(%)  4.7801E+00
 EPSSHRINKVR(%)  9.3318E+00


 TOTAL DATA POINTS NORMALLY DISTRIBUTED (N):          540
 N*LOG(2PI) CONSTANT TO OBJECTIVE FUNCTION:    992.453615861047
 OBJECTIVE FUNCTION VALUE WITHOUT CONSTANT:    1211.13662289577
 OBJECTIVE FUNCTION VALUE WITH CONSTANT:       2203.59023875681
 REPORTED OBJECTIVE FUNCTION DOES NOT CONTAIN CONSTANT

 TOTAL EFFECTIVE ETAS (NIND*NETA):                            60


 #TERE:
 Elapsed estimation  time in seconds:    17.07
 Elapsed covariance  time in seconds:    10.75
 Elapsed postprocess time in seconds:     0.15

 ********************                LAPLACIAN CONDITIONAL ESTIMATION WITH INTERACTION               ********************
 #OBJT:**************                       MINIMUM VALUE OF OBJECTIVE FUNCTION                      ********************
 #OBJV:********************************************     1211.137       **************************************************

 ********************                LAPLACIAN CONDITIONAL ESTIMATION WITH INTERACTION               ********************
 ********************                             FINAL PARAMETER ESTIMATE                           ********************

 THETA - VECTOR OF FIXED EFFECTS PARAMETERS   *********
         TH 1      TH 2      TH 3      TH 4
         2.38E+00  3.48E+00  9.08E-01  5.32E+01

 OMEGA - COV MATRIX FOR RANDOM EFFECTS - ETAS  ********
         ETA1      ETA2
 ETA1
+        7.44E-02
 ETA2
+        0.00E+00  1.19E-01

 SIGMA - COV MATRIX FOR RANDOM EFFECTS - EPSILONS  ****
         EPS1
 EPS1
+        1.00E+00

 OMEGA - CORR MATRIX FOR RANDOM EFFECTS - ETAS  *******
         ETA1      ETA2
 ETA1
+        2.73E-01
 ETA2
+        0.00E+00  3.44E-01

 SIGMA - CORR MATRIX FOR RANDOM EFFECTS - EPSILONS  ***
         EPS1
 EPS1
+        1.00E+00

 ********************                LAPLACIAN CONDITIONAL ESTIMATION WITH INTERACTION               ********************
 ********************                            STANDARD ERROR OF ESTIMATE                          ********************

 THETA - VECTOR OF FIXED EFFECTS PARAMETERS   *********
         TH 1      TH 2      TH 3      TH 4
         5.63E-02  6.40E-02  7.87E-02  3.93E+00

 OMEGA - COV MATRIX FOR RANDOM EFFECTS - ETAS  ********
         ETA1      ETA2
 ETA1
+        2.50E-02
 ETA2
+       .........  3.19E-02

 SIGMA - COV MATRIX FOR RANDOM EFFECTS - EPSILONS  ****
         EPS1
 EPS1
+       .........

 OMEGA - CORR MATRIX FOR RANDOM EFFECTS - ETAS  *******
         ETA1      ETA2
 ETA1
+        4.58E-02
 ETA2
+       .........  4.63E-02

 SIGMA - CORR MATRIX FOR RANDOM EFFECTS - EPSILONS  ***
         EPS1
 EPS1
+       .........

 ********************                LAPLACIAN CONDITIONAL ESTIMATION WITH INTERACTION               ********************
 ********************                          COVARIANCE MATRIX OF ESTIMATE                         ********************

            TH 1      TH 2      TH 3      TH 4      OM11      OM12      OM22      SG11
 TH 1
+        3.17E-03
 TH 2
+       -7.53E-05  4.10E-03
 TH 3
+       -1.74E-04  2.56E-05  6.19E-03
 TH 4
+        1.03E-02  5.17E-03 -2.05E-01  1.55E+01
 OM11
+       -1.07E-04 -5.81E-06  1.61E-04 -1.26E-02  6.24E-04
 OM12
+       ......... ......... ......... ......... ......... .........
 OM22
+       -8.78E-06  2.10E-06  6.04E-05 -4.75E-03  8.16E-06 .........  1.02E-03
 SG11
+       ......... ......... ......... ......... ......... ......... ......... .........

 ********************                LAPLACIAN CONDITIONAL ESTIMATION WITH INTERACTION               ********************
 ********************                          CORRELATION MATRIX OF ESTIMATE                        ********************

            TH 1      TH 2      TH 3      TH 4      OM11      OM12      OM22      SG11
 TH 1
+        5.63E-02
 TH 2
+       -2.09E-02  6.40E-02
 TH 3
+       -3.94E-02  5.08E-03  7.87E-02
 TH 4
+        4.63E-02  2.05E-02 -6.61E-01  3.93E+00
 OM11
+       -7.57E-02 -3.63E-03  8.17E-02 -1.28E-01  2.50E-02
 OM12
+       ......... ......... ......... ......... ......... .........
 OM22
+       -4.89E-03  1.03E-03  2.41E-02 -3.79E-02  1.03E-02 .........  3.19E-02
 SG11
+       ......... ......... ......... ......... ......... ......... ......... .........
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 Elapsed finaloutput time in seconds:     0.17
 #CPUT: Total CPU Time in Seconds,       80.500
