Thu 09/23/2021
03:39 PM
; Based on sde_ex2_base.ctl, using SDE.f90 OTHER file, and .dat file modified.  From Christoffer Tornoe, example 2
$PROBLEM PK ODE HANDS ON ONE
$ABBR DES=FULL ; Must have this, so DA array is simple-mapped.

$INPUT ID TIME DV AMT CMT FLAG MDV SDE ; Add SDE data item.  Should have values between 0 and 5, as described in comments of SDE.f90
; The data item SDE must be added. It has values of 0,1,2,3,4, or 5:
; SDE (SDE data item)=0, BEGINNING OF SUBJECT, OR WHENEVER YOU WANT TO INITIALIZE SDE SYSTEM (SOMETIMES YOU WANT TO DO THIS
; EVEN WITHIN A SUBJECT, LIKE A NEW OCCASION)
; SDE=1, FIRST OBSERVATION OF PRESENT TIME.
; SDE=2 LAST OBSERVATION FOR PRESENT TIME.
; SDE=5 FIRST AND LAST OBSERVATION FOR PRESENT TIME.
; SDE=6, MIDDLE OBSERVAION FOR PRESENT TIME.
; THUS:
; DOSE RECORD, TIME=0, THEN SDE=0
; PK OBSERVATION, TIME=0.1, SDE=1
; PD OBSERVATION, TIME=0.1, SDE=6
; EFFICACY OBSERVATION, TIME=0.1, SDE=2  (SDE=2 SINCE NEXT RECORD HAS A NEW TIME)
; PK OBSERVATION, TIME=0.2, SDE=1
; PD OBSERVATION, TIME=0.2, SDE=2
; PK OBSERVATION, TIME=0.5, SDE=5
; PK OBSERVATION, TIME=1.0, SDE=5

$DATA   sde_ex2o.dat
        IGNORE=@

$SUBROUTINE ADVAN6 TOL=9 DP OTHER=SDE.f90

; nde=number of base equations, ncmt=number of observation compartments
$ABBR DECLARE SGW(3) ; need at least nde of these
$MODEL
       COMP = (CENTRAL); there are nde base states from original sde_ex2_base.ctl
       COMP = (DFDX1)  ; need to add ncmt observation compartments for SDE
       COMP = (DPDT11) ; Will need (nde+1)*nde/2 of these for SDE

$PK
  IF(NEWIND.NE.2) OT = 0

  MU_1  = THETA(1)
  CL    = EXP(MU_1+ETA(1))
  MU_2  = THETA(2)
  VD    = EXP(MU_2+ETA(2))
  SGW1 = THETA(4) ;  Add estimable scalar for modeling the SDE noise.
  NCMT=1.0 ; number of compartments.  Added for calls to SDE_DER and SDE_CADD
  NDE=1.0 ; Number of original, base ODEs.  Added for calls to SDE_DER and SDE_CADD

$DES
 FIRSTEM=1 ; MAke sure FIRSTEM=1 so that DA arrays (Derivatives of DADT() wrt A()), are calculated, even when IMP is done.
 DADT(1) = - CL/VD*A(1) ; Original base derivative from sde_ex2_base.ctl
; NEXT DERIVATIVES ARE ACUALLY PREDICTIVE VALUES FOR COMPARTMENTS 1 AND 2, RESPECTIVELY
;  Derivatives of these with respect to A() will be calculated symbolically by DES routine created by NMTRAN
 DADT(2) = A(1)/VD ;  Add output equations, required for each CMT value.
; DUMMY PLACEMENT FOR DERIVATIVES OF THE STOCHASTIC ERROR SYSTEM.  THESE ARE FILLED OUT BY SDE_DER
SGW(1)=SGW1 ; Specify SGW with appropriate index , for appropriate DES equation number
;  the DA() array THEN contains all derivatives of DADT (=DXDT) with respect to A(=X).
; number of base model derivative equations (nde)=1, Number of compartments (ncmt)=1.
; DA is a reserved array, dimensioned DA(IR,*)
"LAST
"      CALL SDE_DER(DADT,A,DA,IR,SGW,NDE,NCMT)

$ERROR (OBS ONLY)

     IPRED = A(1)/VD
     IRES  = DV - IPRED
     W     = THETA(3)
     IWRES = IRES/W
     WS=1000.0
; CENTRAL COMPARTMENT, PLASMA LEVELS
; EPS(1) = USER MODEL ERROR CONTRIBUTION
; EPS(2) = STOCHASTIC ERROR CONTRIBUTION.  THE WS IS JUST A PLACEHOLDER COEFFICIENT.  SDE_CADD WILL REPLACE THIS
; WITH THE CORRECT VALUE
     Y     = IPRED+W*EPS(1) + WS*EPS(2)
; SDE_CADD WILL EVALUATE THE TRUE COEFFICIENTS (WS) TO THE STOCHASTIC COMPONENTS.
;  In general, if you have nmcmt observation compartments, then first ncmt EPS() will pertain to
; measurement error, and the second ncmt set of EPS() will pertain to stochastic errors.
;  This means you cannot have L2 type correlations, and prop+additive should be packaged into a single EPS().
;  For two obervations, you may have:
;  IF(CMT==1) THEN
;  IPRED=A(1)/V
;  W=SQRT(THETA((5)*THETA(5)*IPED*IPRED+THETA(6)*THETA(6))
;  Y=IPRED+W*EPS(1)+WS*EPS(3)
;  ENDIF
;  IF(CMT==2) THEN
;  IPRED=A(2)/V
;  W=SQRT(THETA((7)*THETA(7)*IPED*IPRED+THETA(8)*THETA(8))
;  Y=IPRED+W*EPS(2)+WS*EPS(4)
;  ENDIF

; Number of compartments=1, number of base model derivative equations=1
"LAST
"       CALL SDE_CADD(A,HH,TIME,DV,CMT,NDE,NCMT,SDE)

$THETA (0,2.3)               ;1 CL
$THETA (0,3.5)               ;2 VD
$THETA (0, 2)               ;4 SIGMA
$THETA (0,1) ; SGW1

$OMEGA 0.1                  ;1 CL
$OMEGA 0.01                 ;2 VD

$SIGMA (1 FIX) (1 FIX)               ; PK

$EST METHOD=ITS INTERACTION LAPLACE NUMERICAL SLOW NOABORT PRINT=1 CTYPE=3 SIGL=5
$EST METHOD=IMP INTERACTION NOABORT SIGL=5 PRINT=1 IACCEPT=1.0 CTYPE=3
$EST MAXEVAL=9999 METHOD=1 LAPLACE INTER NOABORT NUMERICAL SLOW NSIG=3 PRINT=1 SIGL=9
$COV MATRIX=R UNCONDITIONAL

$TABLE ID TIME FLAG AMT CMT IPRED IRES IWRES
       ONEHEADER NOPRINT FILE=sde_ex2_impo.tab

NM-TRAN MESSAGES
 WARNINGS AND ERRORS (IF ANY) FOR PROBLEM    1
 (WARNING  2) NM-TRAN INFERS THAT THE DATA ARE POPULATION.
 (WARNING  45) $DES: VALUES HAVE NOT BEEN ASSIGNED TO ALL DADT VARIABLES.
 UNUSED COMPARTMENTS SHOULD BE OFF.
Note: Analytical 2nd Derivatives are constructed in FSUBS but are never used.
      You may insert $ABBR DERIV2=NO after the first $PROB to save FSUBS construction and compilation time

1NONLINEAR MIXED EFFECTS MODEL PROGRAM (NONMEM) VERSION 7.5.1
 ORIGINALLY DEVELOPED BY STUART BEAL, LEWIS SHEINER, AND ALISON BOECKMANN
 CURRENT DEVELOPERS ARE ROBERT BAUER, ICON DEVELOPMENT SOLUTIONS,
 AND ALISON BOECKMANN. IMPLEMENTATION, EFFICIENCY, AND STANDARDIZATION
 PERFORMED BY NOUS INFOSYSTEMS.
 PROBLEM NO.:         1
 PK ODE HANDS ON ONE
 TOT. NO. OF OBS RECS:      540
 TOT. NO. OF INDIVIDUALS:       30
 GENERAL NONLINEAR KINETICS MODEL (DVERK1, ADVAN6)
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 #TBLN:      1
 #METH: Iterative Two Stage
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
 #TERM:
 OPTIMIZATION WAS COMPLETED

 ETABAR IS THE ARITHMETIC MEAN OF THE ETA-ESTIMATES,
 AND THE P-VALUE IS GIVEN FOR THE NULL HYPOTHESIS THAT THE TRUE MEAN IS 0.

 ETABAR:         8.0922E-04  9.3056E-05
 SE:             4.7426E-02  6.1818E-02
 N:                      30          30

 P VAL.:         9.8639E-01  9.9880E-01

 ETASHRINKSD(%)  5.1395E+00  1.8674E+00
 ETASHRINKVR(%)  1.0015E+01  3.6999E+00
 EBVSHRINKSD(%)  4.6241E+00  1.8122E+00
 EBVSHRINKVR(%)  9.0345E+00  3.5916E+00
 RELATIVEINF(%)  9.0960E+01  9.6402E+01
 EPSSHRINKSD(%)  7.2003E+00  7.2003E+00
 EPSSHRINKVR(%)  1.3882E+01  1.3882E+01


 TOTAL DATA POINTS NORMALLY DISTRIBUTED (N):          540
 N*LOG(2PI) CONSTANT TO OBJECTIVE FUNCTION:    992.453615861047
 OBJECTIVE FUNCTION VALUE WITHOUT CONSTANT:    1253.07224209645
 OBJECTIVE FUNCTION VALUE WITH CONSTANT:       2245.52585795749
 REPORTED OBJECTIVE FUNCTION DOES NOT CONTAIN CONSTANT

 TOTAL EFFECTIVE ETAS (NIND*NETA):                            60


 #TERE:
 Elapsed estimation  time in seconds:    36.73
 Elapsed covariance  time in seconds:     0.01

 ********************                               ITERATIVE TWO STAGE                              ********************
 #OBJT:**************                        FINAL VALUE OF OBJECTIVE FUNCTION                       ********************
 #OBJV:********************************************     1253.072       **************************************************

 ********************                               ITERATIVE TWO STAGE                              ********************
 ********************                             FINAL PARAMETER ESTIMATE                           ********************

 THETA - VECTOR OF FIXED EFFECTS PARAMETERS   *********
         TH 1      TH 2      TH 3      TH 4
         2.40E+00  3.47E+00  1.00E+00  5.25E+01

 OMEGA - COV MATRIX FOR RANDOM EFFECTS - ETAS  ********
         ETA1      ETA2
 ETA1
+        7.50E-02
 ETA2
+        0.00E+00  1.19E-01

 SIGMA - COV MATRIX FOR RANDOM EFFECTS - EPSILONS  ****
         EPS1      EPS2
 EPS1
+        1.00E+00
 EPS2
+        0.00E+00  1.00E+00

 OMEGA - CORR MATRIX FOR RANDOM EFFECTS - ETAS  *******
         ETA1      ETA2
 ETA1
+        2.74E-01
 ETA2
+        0.00E+00  3.45E-01

 SIGMA - CORR MATRIX FOR RANDOM EFFECTS - EPSILONS  ***
         EPS1      EPS2
 EPS1
+        1.00E+00
 EPS2
+        0.00E+00  1.00E+00

 ********************                               ITERATIVE TWO STAGE                              ********************
 ********************                          STANDARD ERROR OF ESTIMATE (S)                        ********************

 THETA - VECTOR OF FIXED EFFECTS PARAMETERS   *********
         TH 1      TH 2      TH 3      TH 4
         5.78E-02  7.89E-02  9.10E-02  2.30E+00

 OMEGA - COV MATRIX FOR RANDOM EFFECTS - ETAS  ********
         ETA1      ETA2
 ETA1
+        2.77E-02
 ETA2
+        0.00E+00  3.83E-02

 SIGMA - COV MATRIX FOR RANDOM EFFECTS - EPSILONS  ****
         EPS1      EPS2
 EPS1
+        0.00E+00
 EPS2
+        0.00E+00  0.00E+00

 OMEGA - CORR MATRIX FOR RANDOM EFFECTS - ETAS  *******
         ETA1      ETA2
 ETA1
+        5.06E-02
 ETA2
+       .........  5.55E-02

 SIGMA - CORR MATRIX FOR RANDOM EFFECTS - EPSILONS  ***
         EPS1      EPS2
 EPS1
+       .........
 EPS2
+       ......... .........

 ********************                               ITERATIVE TWO STAGE                              ********************
 ********************                        COVARIANCE MATRIX OF ESTIMATE (S)                       ********************

            TH 1      TH 2      TH 3      TH 4      OM11      OM12      OM22      SG11      SG12      SG22
 TH 1
+        3.34E-03
 TH 2
+        7.39E-04  6.23E-03
 TH 3
+       -1.13E-03  2.40E-03  8.28E-03
 TH 4
+        2.39E-02 -6.49E-02 -1.86E-01  5.30E+00
 OM11
+       -5.26E-04 -3.34E-04  4.53E-04 -5.07E-03  7.69E-04
 OM12
+       ......... ......... ......... ......... ......... .........
 OM22
+       -2.95E-04 -1.13E-03  4.06E-04  4.42E-04  1.24E-04  0.00E+00  1.47E-03
 SG11
+       ......... ......... ......... ......... ......... ......... ......... .........
 SG12
+       ......... ......... ......... ......... ......... ......... ......... ......... .........
 SG22
+       ......... ......... ......... ......... ......... ......... ......... ......... ......... .........

 ********************                               ITERATIVE TWO STAGE                              ********************
 ********************                        CORRELATION MATRIX OF ESTIMATE (S)                      ********************

            TH 1      TH 2      TH 3      TH 4      OM11      OM12      OM22      SG11      SG12      SG22
 TH 1
+        5.78E-02
 TH 2
+        1.62E-01  7.89E-02
 TH 3
+       -2.15E-01  3.34E-01  9.10E-02
 TH 4
+        1.79E-01 -3.57E-01 -8.89E-01  2.30E+00
 OM11
+       -3.28E-01 -1.52E-01  1.80E-01 -7.95E-02  2.77E-02
 OM12
+       ......... ......... ......... ......... ......... .........
 OM22
+       -1.33E-01 -3.75E-01  1.16E-01  5.02E-03  1.17E-01  0.00E+00  3.83E-02
 SG11
+       ......... ......... ......... ......... ......... ......... ......... .........
 SG12
+       ......... ......... ......... ......... ......... ......... ......... ......... .........
 SG22
+       ......... ......... ......... ......... ......... ......... ......... ......... ......... .........
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 #TBLN:      2
 #METH: Importance Sampling
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
 #TERM:
 OPTIMIZATION WAS COMPLETED

 ETABAR IS THE ARITHMETIC MEAN OF THE ETA-ESTIMATES,
 AND THE P-VALUE IS GIVEN FOR THE NULL HYPOTHESIS THAT THE TRUE MEAN IS 0.

 ETABAR:        -3.1272E-03  2.2694E-03
 SE:             4.4462E-02  6.1701E-02
 N:                      30          30

 P VAL.:         9.4393E-01  9.7066E-01

 ETASHRINKSD(%)  1.1634E+01  2.3091E+00
 ETASHRINKVR(%)  2.1914E+01  4.5649E+00
 EBVSHRINKSD(%)  1.0808E+01  1.6866E+00
 EBVSHRINKVR(%)  2.0449E+01  3.3448E+00
 RELATIVEINF(%)  7.9524E+01  9.6622E+01
 EPSSHRINKSD(%)  4.8343E+00  4.8343E+00
 EPSSHRINKVR(%)  9.4349E+00  9.4349E+00


 TOTAL DATA POINTS NORMALLY DISTRIBUTED (N):          540
 N*LOG(2PI) CONSTANT TO OBJECTIVE FUNCTION:    992.453615861047
 OBJECTIVE FUNCTION VALUE WITHOUT CONSTANT:    1210.79229321802
 OBJECTIVE FUNCTION VALUE WITH CONSTANT:       2203.24590907907
 REPORTED OBJECTIVE FUNCTION DOES NOT CONTAIN CONSTANT

 TOTAL EFFECTIVE ETAS (NIND*NETA):                            60


 #TERE:
 Elapsed estimation  time in seconds:    50.65
 Elapsed covariance  time in seconds:    17.48

 ********************                               IMPORTANCE SAMPLING                              ********************
 #OBJT:**************                        FINAL VALUE OF OBJECTIVE FUNCTION                       ********************
 #OBJV:********************************************     1210.792       **************************************************

 ********************                               IMPORTANCE SAMPLING                              ********************
 ********************                             FINAL PARAMETER ESTIMATE                           ********************

 THETA - VECTOR OF FIXED EFFECTS PARAMETERS   *********
         TH 1      TH 2      TH 3      TH 4
         2.38E+00  3.48E+00  9.09E-01  5.30E+01

 OMEGA - COV MATRIX FOR RANDOM EFFECTS - ETAS  ********
         ETA1      ETA2
 ETA1
+        7.59E-02
 ETA2
+        0.00E+00  1.20E-01

 SIGMA - COV MATRIX FOR RANDOM EFFECTS - EPSILONS  ****
         EPS1      EPS2
 EPS1
+        1.00E+00
 EPS2
+        0.00E+00  1.00E+00

 OMEGA - CORR MATRIX FOR RANDOM EFFECTS - ETAS  *******
         ETA1      ETA2
 ETA1
+        2.76E-01
 ETA2
+        0.00E+00  3.46E-01

 SIGMA - CORR MATRIX FOR RANDOM EFFECTS - EPSILONS  ***
         EPS1      EPS2
 EPS1
+        1.00E+00
 EPS2
+        0.00E+00  1.00E+00

 ********************                               IMPORTANCE SAMPLING                              ********************
 ********************                          STANDARD ERROR OF ESTIMATE (R)                        ********************

 THETA - VECTOR OF FIXED EFFECTS PARAMETERS   *********
         TH 1      TH 2      TH 3      TH 4
         5.65E-02  6.43E-02  7.81E-02  3.87E+00

 OMEGA - COV MATRIX FOR RANDOM EFFECTS - ETAS  ********
         ETA1      ETA2
 ETA1
+        2.65E-02
 ETA2
+        0.00E+00  3.51E-02

 SIGMA - COV MATRIX FOR RANDOM EFFECTS - EPSILONS  ****
         EPS1      EPS2
 EPS1
+        0.00E+00
 EPS2
+        0.00E+00  0.00E+00

 OMEGA - CORR MATRIX FOR RANDOM EFFECTS - ETAS  *******
         ETA1      ETA2
 ETA1
+        4.81E-02
 ETA2
+       .........  5.08E-02

 SIGMA - CORR MATRIX FOR RANDOM EFFECTS - EPSILONS  ***
         EPS1      EPS2
 EPS1
+       .........
 EPS2
+       ......... .........

 ********************                               IMPORTANCE SAMPLING                              ********************
 ********************                        COVARIANCE MATRIX OF ESTIMATE (R)                       ********************

            TH 1      TH 2      TH 3      TH 4      OM11      OM12      OM22      SG11      SG12      SG22
 TH 1
+        3.20E-03
 TH 2
+       -6.41E-05  4.13E-03
 TH 3
+       -1.55E-04  2.89E-05  6.10E-03
 TH 4
+        9.40E-03  5.13E-03 -1.99E-01  1.50E+01
 OM11
+       -7.18E-05 -9.82E-06  1.56E-04 -1.19E-02  7.04E-04
 OM12
+       ......... ......... ......... ......... ......... .........
 OM22
+       -1.43E-05 -1.96E-05  7.09E-05 -5.29E-03  8.77E-05  0.00E+00  1.23E-03
 SG11
+       ......... ......... ......... ......... ......... ......... ......... .........
 SG12
+       ......... ......... ......... ......... ......... ......... ......... ......... .........
 SG22
+       ......... ......... ......... ......... ......... ......... ......... ......... ......... .........

 ********************                               IMPORTANCE SAMPLING                              ********************
 ********************                        CORRELATION MATRIX OF ESTIMATE (R)                      ********************

            TH 1      TH 2      TH 3      TH 4      OM11      OM12      OM22      SG11      SG12      SG22
 TH 1
+        5.65E-02
 TH 2
+       -1.77E-02  6.43E-02
 TH 3
+       -3.50E-02  5.75E-03  7.81E-02
 TH 4
+        4.30E-02  2.06E-02 -6.59E-01  3.87E+00
 OM11
+       -4.79E-02 -5.76E-03  7.52E-02 -1.16E-01  2.65E-02
 OM12
+       ......... ......... ......... ......... ......... .........
 OM22
+       -7.22E-03 -8.69E-03  2.59E-02 -3.90E-02  9.42E-02  0.00E+00  3.51E-02
 SG11
+       ......... ......... ......... ......... ......... ......... ......... .........
 SG12
+       ......... ......... ......... ......... ......... ......... ......... ......... .........
 SG22
+       ......... ......... ......... ......... ......... ......... ......... ......... ......... .........
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 #TBLN:      3
 #METH: Laplacian Conditional Estimation with Interaction
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
 #TERM:
0MINIMIZATION TERMINATED
 DUE TO ROUNDING ERRORS (ERROR=134)
 NO. OF FUNCTION EVALUATIONS USED:       62
 NO. OF SIG. DIGITS IN FINAL EST.:  2.7
 ADDITIONAL PROBLEMS OCCURRED WITH THE MINIMIZATION.
 REGARD THE RESULTS OF THE ESTIMATION STEP CAREFULLY, AND ACCEPT THEM ONLY
 AFTER CHECKING THAT THE COVARIANCE STEP PRODUCES REASONABLE OUTPUT.

 ETABAR IS THE ARITHMETIC MEAN OF THE ETA-ESTIMATES,
 AND THE P-VALUE IS GIVEN FOR THE NULL HYPOTHESIS THAT THE TRUE MEAN IS 0.

 ETABAR:         3.3706E-02 -8.5058E-03
 SE:             4.7837E-02  6.2007E-02
 N:                      30          30

 P VAL.:         4.8106E-01  8.9089E-01

 ETASHRINKSD(%)  4.9239E+00  1.9181E+00
 ETASHRINKVR(%)  9.6053E+00  3.7994E+00
 EBVSHRINKSD(%)  4.9011E+00  1.7600E+00
 EBVSHRINKVR(%)  9.5619E+00  3.4891E+00
 RELATIVEINF(%)  9.0435E+01  9.6508E+01
 EPSSHRINKSD(%)  3.2845E+00  3.2845E+00
 EPSSHRINKVR(%)  6.4612E+00  6.4612E+00


 TOTAL DATA POINTS NORMALLY DISTRIBUTED (N):          540
 N*LOG(2PI) CONSTANT TO OBJECTIVE FUNCTION:    992.453615861047
 OBJECTIVE FUNCTION VALUE WITHOUT CONSTANT:    1251.44814984088
 OBJECTIVE FUNCTION VALUE WITH CONSTANT:       2243.90176570192
 REPORTED OBJECTIVE FUNCTION DOES NOT CONTAIN CONSTANT

 TOTAL EFFECTIVE ETAS (NIND*NETA):                            60


 #TERE:
 Elapsed estimation  time in seconds:    31.61
0R MATRIX ALGORITHMICALLY NON-POSITIVE-SEMIDEFINITE
 BUT NONSINGULAR
0COVARIANCE STEP ABORTED
 Elapsed covariance  time in seconds:    37.79
 Elapsed postprocess time in seconds:     0.51

 ********************                LAPLACIAN CONDITIONAL ESTIMATION WITH INTERACTION               ********************
 #OBJT:**************                       MINIMUM VALUE OF OBJECTIVE FUNCTION                      ********************
 #OBJV:********************************************     1251.448       **************************************************

 ********************                LAPLACIAN CONDITIONAL ESTIMATION WITH INTERACTION               ********************
 ********************                             FINAL PARAMETER ESTIMATE                           ********************

 THETA - VECTOR OF FIXED EFFECTS PARAMETERS   *********
         TH 1      TH 2      TH 3      TH 4
         2.36E+00  3.48E+00  9.08E-01  5.29E+01

 OMEGA - COV MATRIX FOR RANDOM EFFECTS - ETAS  ********
         ETA1      ETA2
 ETA1
+        7.59E-02
 ETA2
+        0.00E+00  1.20E-01

 SIGMA - COV MATRIX FOR RANDOM EFFECTS - EPSILONS  ****
         EPS1      EPS2
 EPS1
+        1.00E+00
 EPS2
+        0.00E+00  1.00E+00

 OMEGA - CORR MATRIX FOR RANDOM EFFECTS - ETAS  *******
         ETA1      ETA2
 ETA1
+        2.76E-01
 ETA2
+        0.00E+00  3.46E-01

 SIGMA - CORR MATRIX FOR RANDOM EFFECTS - EPSILONS  ***
         EPS1      EPS2
 EPS1
+        1.00E+00
 EPS2
+        0.00E+00  1.00E+00
 Elapsed finaloutput time in seconds:     0.05
 #CPUT: Total CPU Time in Seconds,      174.953
