Thu 09/23/2021
12:10 PM
; Base model, without SDE processing.
$PROBLEM EX4model1

$INPUT ID TIME DV MDV EVID AMT CMT AGE SEX BSA

$DATA sde_ex4_base.dat
      IGNORE @

$SUBROUTINE ADVAN6 TOL 6 DP

$MODEL
COMP=(CENTRAL)
COMP=(PERIPH)
COMP=(ISR)

$THETA (0 0.1) ; ISR0
$THETA (0 0.6) ; W

$OMEGA 0.5     ; ISR0

$SIGMA 1 FIX

$PK
T12A=4.52
ALPHA=LOG(2)/T12A
FRACA=0.78
FRACB=1-FRACA
T12B=0.14*AGE+29.2
BETA=LOG(2)/T12B
K21=(FRACA*BETA+FRACB*ALPHA)/(FRACA+FRACB)
K10=(ALPHA*BETA)/K21
K12=ALPHA+BETA-K21-K10
V1=1
IF (SEX.EQ.0) V1=1.92*BSA+0.64
IF (SEX.EQ.1) V1=1.11*BSA+2.04

TVISR0=THETA(1)
ISR0=TVISR0*EXP(ETA(1))

F1=ISR0/K10
F2=K12*F1/K21
F3=ISR0

ISR=A(3)
ISRV=0

$DES
DADT(1) = A(3)-K10*A(1)-K12*A(1)+K21*A(2)
DADT(2) = K12*A(1)-K21*A(2)
DADT(3) = 0

$ERROR
IPRED=A(1)/V1
IRES=DV-IPRED
W=THETA(2)
IWRES=IRES/W
Y=IPRED+W*EPS(1)

$ESTIMATION MAXEVALS=9999 METHOD=1 INTERACTION NOABORT SIGDIGITS=3 PRINT=5

$COVARIANCE

$TABLE ID TIME EVID IPRED IRES IWRES
       TVISR0 W
       ISR ISRV
       AGE SEX BSA
       NOPRINT ONEHEADER FILE=sde_ex4_base.tab

NM-TRAN MESSAGES
 WARNINGS AND ERRORS (IF ANY) FOR PROBLEM    1
 (WARNING  2) NM-TRAN INFERS THAT THE DATA ARE POPULATION.
Note: Analytical 2nd Derivatives are constructed in FSUBS but are never used.
      You may insert $ABBR DERIV2=NO after the first $PROB to save FSUBS construction and compilation time

1NONLINEAR MIXED EFFECTS MODEL PROGRAM (NONMEM) VERSION 7.5.1
 ORIGINALLY DEVELOPED BY STUART BEAL, LEWIS SHEINER, AND ALISON BOECKMANN
 CURRENT DEVELOPERS ARE ROBERT BAUER, ICON DEVELOPMENT SOLUTIONS,
 AND ALISON BOECKMANN. IMPLEMENTATION, EFFICIENCY, AND STANDARDIZATION
 PERFORMED BY NOUS INFOSYSTEMS.
 PROBLEM NO.:         1
 EX4model1
 TOT. NO. OF OBS RECS:      420
 TOT. NO. OF INDIVIDUALS:       12
 GENERAL NONLINEAR KINETICS MODEL (DVERK1, ADVAN6)
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 #TBLN:      1
 #METH: First Order Conditional Estimation with Interaction
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
 #TERM:
0MINIMIZATION SUCCESSFUL
 NO. OF FUNCTION EVALUATIONS USED:       82
 NO. OF SIG. DIGITS IN FINAL EST.:  3.1

 ETABAR IS THE ARITHMETIC MEAN OF THE ETA-ESTIMATES,
 AND THE P-VALUE IS GIVEN FOR THE NULL HYPOTHESIS THAT THE TRUE MEAN IS 0.

 ETABAR:         3.7246E-03
 SE:             1.0596E-01
 N:                      12

 P VAL.:         9.7196E-01

 ETASHRINKSD(%)  2.0921E+00
 ETASHRINKVR(%)  4.1403E+00
 EBVSHRINKSD(%)  1.4734E+00
 EBVSHRINKVR(%)  2.9250E+00
 RELATIVEINF(%)  9.7075E+01
 EPSSHRINKSD(%)  1.3776E+00
 EPSSHRINKVR(%)  2.7363E+00


 TOTAL DATA POINTS NORMALLY DISTRIBUTED (N):          420
 N*LOG(2PI) CONSTANT TO OBJECTIVE FUNCTION:    771.908367891925
 OBJECTIVE FUNCTION VALUE WITHOUT CONSTANT:   -97.4764517349925
 OBJECTIVE FUNCTION VALUE WITH CONSTANT:       674.431916156933
 REPORTED OBJECTIVE FUNCTION DOES NOT CONTAIN CONSTANT

 TOTAL EFFECTIVE ETAS (NIND*NETA):                            12


 #TERE:
 Elapsed estimation  time in seconds:     5.27
 Elapsed covariance  time in seconds:     1.99
 Elapsed postprocess time in seconds:     0.12

 ********************               FIRST ORDER CONDITIONAL ESTIMATION WITH INTERACTION              ********************
 #OBJT:**************                       MINIMUM VALUE OF OBJECTIVE FUNCTION                      ********************
 #OBJV:********************************************      -97.476       **************************************************

 ********************               FIRST ORDER CONDITIONAL ESTIMATION WITH INTERACTION              ********************
 ********************                             FINAL PARAMETER ESTIMATE                           ********************

 THETA - VECTOR OF FIXED EFFECTS PARAMETERS   *********
         TH 1      TH 2
         4.07E-01  5.12E-01

 OMEGA - COV MATRIX FOR RANDOM EFFECTS - ETAS  ********
         ETA1
 ETA1
+        1.41E-01

 SIGMA - COV MATRIX FOR RANDOM EFFECTS - EPSILONS  ****
         EPS1
 EPS1
+        1.00E+00

 OMEGA - CORR MATRIX FOR RANDOM EFFECTS - ETAS  *******
         ETA1
 ETA1
+        3.75E-01

 SIGMA - CORR MATRIX FOR RANDOM EFFECTS - EPSILONS  ***
         EPS1
 EPS1
+        1.00E+00

 ********************               FIRST ORDER CONDITIONAL ESTIMATION WITH INTERACTION              ********************
 ********************                            STANDARD ERROR OF ESTIMATE                          ********************

 THETA - VECTOR OF FIXED EFFECTS PARAMETERS   *********
         TH 1      TH 2
         4.55E-02  4.83E-02

 OMEGA - COV MATRIX FOR RANDOM EFFECTS - ETAS  ********
         ETA1
 ETA1
+        5.00E-02

 SIGMA - COV MATRIX FOR RANDOM EFFECTS - EPSILONS  ****
         EPS1
 EPS1
+       .........

 OMEGA - CORR MATRIX FOR RANDOM EFFECTS - ETAS  *******
         ETA1
 ETA1
+        6.67E-02

 SIGMA - CORR MATRIX FOR RANDOM EFFECTS - EPSILONS  ***
         EPS1
 EPS1
+       .........

 ********************               FIRST ORDER CONDITIONAL ESTIMATION WITH INTERACTION              ********************
 ********************                          COVARIANCE MATRIX OF ESTIMATE                         ********************

            TH 1      TH 2      OM11      SG11
 TH 1
+        2.07E-03
 TH 2
+        1.77E-03  2.33E-03
 OM11
+       -1.19E-03 -6.94E-04  2.50E-03
 SG11
+       ......... ......... ......... .........

 ********************               FIRST ORDER CONDITIONAL ESTIMATION WITH INTERACTION              ********************
 ********************                          CORRELATION MATRIX OF ESTIMATE                        ********************

            TH 1      TH 2      OM11      SG11
 TH 1
+        4.55E-02
 TH 2
+        8.04E-01  4.83E-02
 OM11
+       -5.25E-01 -2.87E-01  5.00E-02
 SG11
+       ......... ......... ......... .........
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 Elapsed finaloutput time in seconds:     0.05
 #CPUT: Total CPU Time in Seconds,        7.750
