$PROBLEM EX4model2, FOCE, SDE processed using Christoffer Tornoe's splus script.

$INPUT ID ATIM DV MDV EVID AMT CMT AGE SEX BSA SDE TIME

$DATA sde_ex4.dat
      IGNORE @

$SUBROUTINE ADVAN6 TOL 6 DP

$MODEL
COMP=(CENTRAL)
COMP=(PERIPH)
COMP=(ISR)
COMP=(P1)
COMP=(P2)
COMP=(P3)
COMP=(P4)
COMP=(P5)
COMP=(P6)

$THETA (0 0.1) ; ISR0
$THETA (0 0.6) ; W
$THETA (0 0.1) ; SGW3

$OMEGA 0.5     ; ISR0

$SIGMA 1 FIX

$PK
T12A=4.52
ALPHA=LOG(2)/T12A
FRACA=0.78
FRACB=1-FRACA
T12B=0.14*AGE+29.2
BETA=LOG(2)/T12B
K21=(FRACA*BETA+FRACB*ALPHA)/(FRACA+FRACB)
K10=(ALPHA*BETA)/K21
K12=ALPHA+BETA-K21-K10
V1=1
IF (SEX.EQ.0) V1=1.92*BSA+0.64
IF (SEX.EQ.1) V1=1.11*BSA+2.04
TVISR0=THETA(1)
ISR0=TVISR0*EXP(ETA(1))
F1=ISR0/K10
F2=K12*F1/K21
F3=ISR0
SGW3=THETA(3)

IF(NEWIND.NE.2) THEN
  AHT1 = 0
  AHT2 = 0
  AHT3 = 0
  PHT1 = 0
  PHT2 = 0
  PHT3 = 0
  PHT4 = 0
  PHT5 = 0
  PHT6 = 0
ENDIF

IF(EVID.NE.3) THEN
  A1 = A(1)
  A2 = A(2)
  A3 = A(3)
  A4 = A(4)
  A5 = A(5)
  A6 = A(6)
  A7 = A(7)
  A8 = A(8)
  A9 = A(9)
ELSE
  A1 = A1
  A2 = A2
  A3 = A3
  A4 = A4
  A5 = A5
  A6 = A6
  A7 = A7
  A8 = A8
  A9 = A9
ENDIF

IF(EVID.EQ.0) OBS = DV

IF(EVID.GT.2.AND.SDE.EQ.2) THEN
  RVAR = A4*(1/V1)**2+THETA(2)**2
  K1   = A4*(1/V1)/RVAR
  K2   = A5*(1/V1)/RVAR
  K3   = A6*(1/V1)/RVAR
  AHT1 = A1 + K1*(OBS -(A1/V1))
  AHT2 = A2 + K2*(OBS -(A1/V1))
  AHT3 = A3 + K3*(OBS -(A1/V1))
  PHT1 = A4 - K1*RVAR*K1
  PHT2 = A5 - K1*RVAR*K2
  PHT3 = A6 - K1*RVAR*K3
  PHT4 = A7 - K2*RVAR*K2
  PHT5 = A8 - K2*RVAR*K3
  PHT6 = A9 - K3*RVAR*K3
ENDIF

IF(EVID.GT.2.AND.SDE.EQ.3) THEN
  AHT1 = A1
  AHT2 = A2
  AHT3 = A3
  PHT1 = 0
  PHT2 = 0
  PHT3 = 0
  PHT4 = 0
  PHT5 = 0
  PHT6 = 0
ENDIF

IF(EVID.GT.2.AND.SDE.EQ.4) THEN
  AHT1 = 0
  AHT2 = 0
  AHT3 = 0
  PHT1 = A4
  PHT2 = A5
  PHT3 = A6
  PHT4 = A7
  PHT5 = A8
  PHT6 = A9
ENDIF

IF(A_0FLG.EQ.1) THEN
  A_0(1) = AHT1
  A_0(2) = AHT2
  A_0(3) = AHT3
  A_0(4) = PHT1
  A_0(5) = PHT2
  A_0(6) = PHT3
  A_0(7) = PHT4
  A_0(8) = PHT5
  A_0(9) = PHT6
ENDIF

ISR=AHT3
ISRV=PHT6

$DES
DADT(1) = A(3)-K10*A(1)-K12*A(1)+K21*A(2)
DADT(2) = K12*A(1)-K21*A(2)
DADT(3) = 0
DADT(4) = (-(K10+K12))*(A(4))+(K21)*(A(5))+(1)*(A(6))+(-(K10+K12))*(A(4))+(K21)*(A(5))+(1)*(A(6))
DADT(5) = (-(K10+K12))*(A(5))+(K21)*(A(7))+(1)*(A(8))+(K12)*(A(4))+(-K21)*(A(5))
DADT(6) = (-(K10+K12))*(A(6))+(K21)*(A(8))+(1)*(A(9))
DADT(7) = (K12)*(A(5))+(-K21)*(A(7))+(K12)*(A(5))+(-K21)*(A(7))
DADT(8) = (K12)*(A(6))+(-K21)*(A(8))
DADT(9) = SGW3*SGW3

$ERROR
IPRED=A(1)/V1
IRES=DV-IPRED
W=SQRT(A(4)*(1/V1)**2+THETA(2)**2)
IWRES=IRES/W
Y=IPRED+W*EPS(1)

$ESTIMATION MAXEVALS=9999 METHOD=1 INTERACTION NOABORT SIGDIGITS=3 PRINT=5

$COVARIANCE MATRIX=R

$TABLE ID ATIM EVID SDE IPRED IRES IWRES
       TVISR0 W
       ISR ISRV
       AGE SEX BSA
       NOPRINT ONEHEADER FILE=sde_ex4_foce.tab
