$PROBLEM EX4model2, IMP, using OTHER routine sde.f90
$ABBR DECLARE SGW(3) ; need at least nde of these
$ABBR DES=FULL

$INPUT ID TIME DV MDV EVID AMT CMT AGE SEX BSA SDEX SDE

$DATA sde_ex4o.dat
      IGNORE @

$SUBROUTINE ADVAN13 TOL=6 ATOL=6 OTHER=SDE.F90

$MODEL
COMP=(CENTRAL)
COMP=(PERIPH)
COMP=(ISR)
COMP=(OBSQ)
COMP=(P1)
COMP=(P2)
COMP=(P3)
COMP=(P4)
COMP=(P5)
COMP=(P6)

$THETA (0 0.1) ; ISR0
$THETA (0 0.6) ; W
$THETA (0, 0.1) ; SGW3

$OMEGA 0.5     ; ISR0

$SIGMA 1 FIX
$SIGMA 1 FIX

$PK
T12A=4.52
ALPHA=LOG(2)/T12A
FRACA=0.78
FRACB=1-FRACA
T12B=0.14*AGE+29.2
BETA=LOG(2)/T12B
K21=(FRACA*BETA+FRACB*ALPHA)/(FRACA+FRACB)
K10=(ALPHA*BETA)/K21
K12=ALPHA+BETA-K21-K10
V1=1
IF (SEX.EQ.0) V1=1.92*BSA+0.64
IF (SEX.EQ.1) V1=1.11*BSA+2.04
TVISR0=THETA(1)
ISR0=TVISR0*EXP(ETA(1))
F1=ISR0/K10
F2=K12*F1/K21
F3=ISR0
SGW3=THETA(3)

ISR=A(3)
ISRV=0

NCMT=1
NDE=3

$DES
FIRSTEM=1
DADT(1) = A(3)-K10*A(1)-K12*A(1)+K21*A(2)
DADT(2) = K12*A(1)-K21*A(2)
DADT(3) = 0
DADT(4)=A(1)/V1
SGW(1)=0.0
SGW(2)=0.0
SGW(3)=SGW3
"LAST
"      CALL SDE_DER(DADT,A,DA,IR,SGW,NDE,NCMT)


$ERROR (OBS ONLY)
IPRED=A(1)/V1
IRES=DV-IPRED
W=THETA(2)
IWRES=IRES/W
WS=1000.0
Y=IPRED+W*EPS(1)+WS*EPS(2)
"LAST
"       CALL SDE_CADD(A,HH,TIME,DV,CMT,NDE,NCMT,SDE)

;$EST MAXEVAL=9999 METHOD=1 INTER NOABORT NSIG=2 PRINT=1 OPTMAP=1 ETADER=2 SIGL=6 MCETA=1 SLOW
$EST METHOD=IMP PRINT=1 CTYPE=3 OPTMAP=1 ETADER=2 SIGL=5 MCETA=1 SLOW NITER=200 IACCEPT=0.4

$COVARIANCE UNCONDITIONAL MATRIX=R

$TABLE ID TIME EVID SDE IPRED IRES IWRES
       TVISR0 W
       ISR ISRV
       AGE SEX BSA
       NOPRINT ONEHEADER FILE=sde_ex4_impo.tab
