Wed 08/31/2022
09:52 AM
$SIZES ISAMPLEMAX=1100
;Model Desc: Two compartment Model, Using ADVAN3, TRANS4
;Project Name: example1
;Project ID: gm00-001

$PROB RUN# shapiro_iwr2 (from samp5l)
$ABBR DECLARE INTEGER FIRST_WRITE
$INPUT C SET ID JID TIME  DV=CONC AMT=DOSE RATE EVID MDV CMT
       CLX V1X QX V2X SDIX SDSX
$DATA shapiro_iwr2.csv IGNORE=C

$SUBROUTINES ADVAN3 TRANS4

$PK
include \users\bauerr\pdxpop540\nonmem_reserved_general
SAEM_EXTRA_REQUEST=1
MU_1=THETA(1)
MU_2=THETA(2)
MU_3=THETA(3)
MU_4=THETA(4)
CL=DEXP(MU_1+ETA(1))
V1=DEXP(MU_2+ETA(2))
Q=DEXP(MU_3+ETA(3))
V2=DEXP(MU_4+ETA(4))
S1=V1

$ERROR
include \users\bauerr\pdxpop540\nonmem_reserved_general
SAEM_EXTRA_REQUEST=1
IPRE=F
IWRES=(DV-IPRE)/IPRE/SQRT(SIGMA(1,1))
Y = F + F*EPS(1)

; When SAEM_extra=1, then this particular set of individual
; parameters were "accepted" So you may record them if you wish

IF(SAEM_EXTRA==1 .AND. EVID==0 .AND. FIRST_WRITE==0) THEN
IF(PNM_RUN_MODE==PNM_SINGLE) THEN ; best if a pnm file with -awnf is used.
" OPEN(UNIT=52,FILE='shapiro_iwr2.iwr')
ELSE ;If parallel, need to have different file name for each node
" OPEN(UNIT=52,FILE='shapiro_iwr2_'//trim(tfi(pnm_node_number))//'.iwr')
ENDIF
IF(PNM_NODE_NUMBER==1) THEN ; Only one file should have header, for easy merging later
" WRITE(52,96) 'SAMPLE      ','ID          ','TIME        ','IWRES       '
" 96 FORMAT(A12,1X,A14,2(1X,A12))
ENDIF
FIRST_WRITE=1
ENDIF

IF(SAEM_EXTRA==1 .AND. EVID==0 ) THEN
" WRITE(52,97) SAEM_SAMPLE,ID,TIME,IWRES
" 97 FORMAT(I12,1X,F14.0,2(1X,1PG12.5))
ENDIF

; Initial values of THETA
$THETA
(2.0) ;[LN(CL)]
(2.0) ;[LN(V1)]
(2.0) ;[LN(Q)]
(2.0) ;[LN(V2)]
;INITIAL values of OMEGA
$OMEGA BLOCK(4)
0.15   ;[P]
0.01  ;[F]
0.15   ;[P]
0.01  ;[F]
0.01  ;[F]
0.15   ;[P]
0.01  ;[F]
0.01  ;[F]
0.01  ;[F]
0.15   ;[P]
;Initial value of SIGMA
$SIGMA
(0.6 )   ;[P]

$PRIOR NWPRI
; Prior information to the Thetas.
$THETAP (2.0 FIX)x4
$THETAPV BLOCK(4) FIX VALUES(10000.0,0.0)

; Prior information to the OMEGAS.
$OMEGAP BLOCK(4)
0.2 FIX
0.0  0.2
0.0  0.0 0.2
0.0  0.0 0.0 0.2
$OMEGAPD (4 FIX)

$EST METHOD=SAEM NBURN=500 NITER=300 MASSRESET=1 PRINT=20 NOPRIOR=1 RANMETHOD=P CTYPE=3
$EST METHOD=SAEM NBURN=0 NITER=0 MASSRESET=0 ETASAMPLES=1 ISAMPLE=1000 EONLY=1
$EST METHOD=IMP NITER=5 MASSRESET=1 ETASAMPLES=0 ISAMPLE=1000 EONLY=1 PRINT=1 MAPITER=0
$TABLE ID TIME CL V1 Q V2 ONEHEADER FIRSTONLY NOAPPEND NOPRINT FILE=shapiro_iwr2.tab ; need a .tab file produced, so PDx-pop R script loader works

NM-TRAN MESSAGES
 WARNINGS AND ERRORS (IF ANY) FOR PROBLEM    1
 (WARNING  2) NM-TRAN INFERS THAT THE DATA ARE POPULATION.
 (WARNING  121) INTERACTION IS IMPLIED WITH EM/BAYES ESTIMATION METHODS
 (WARNING  79) SIGMA IS USED ON THE RIGHT. WITH A SUBSEQUENT RUN, IF AN
 INITIAL ESTIMATE OF A DIAGONAL BLOCK OF SIGMA IS TO BE COMPUTED BY
 NONMEM, THAT BLOCK WILL BE SET TO AN IDENTITY MATRIX DURING THAT
 COMPUTATION. THIS COULD LEAD TO AN ARITHMETIC EXCEPTION.*
 (MU_WARNING 20) MU_001: MU_ VARIABLE SHOULD NOT BE DEFINED AFTER VERBATIM CODE.
 * THE MAXIMUM NUMBER OF WARNINGS OF ONE OR MORE TYPES WAS REACHED.
 IT IS POSSIBLE THAT SOME WARNING MESSAGES WERE SUPPRESSED.
Note: Analytical 2nd Derivatives are constructed in FSUBS but are never used.
      You may insert $ABBR DERIV2=NO after the first $PROB to save FSUBS construction and compilation time

1NONLINEAR MIXED EFFECTS MODEL PROGRAM (NONMEM) VERSION 7.5.2
 ORIGINALLY DEVELOPED BY STUART BEAL, LEWIS SHEINER, AND ALISON BOECKMANN
 CURRENT DEVELOPERS ARE ROBERT BAUER, ICON DEVELOPMENT SOLUTIONS,
 AND ALISON BOECKMANN. IMPLEMENTATION, EFFICIENCY, AND STANDARDIZATION
 PERFORMED BY NOUS INFOSYSTEMS.
 PROBLEM NO.:         1
 RUN# shapiro_iwr2 (from samp5l)
 TOT. NO. OF OBS RECS:      500
 TOT. NO. OF INDIVIDUALS:      100
 TWO COMPARTMENT MODEL (ADVAN3)
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 #TBLN:      1
 #METH: Stochastic Approximation Expectation-Maximization (No Prior)
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
 #TERM:
 STOCHASTIC PORTION WAS COMPLETED
 REDUCED STOCHASTIC PORTION WAS COMPLETED

 ETABAR IS THE ARITHMETIC MEAN OF THE ETA-ESTIMATES,
 AND THE P-VALUE IS GIVEN FOR THE NULL HYPOTHESIS THAT THE TRUE MEAN IS 0.

 ETABAR:        -5.2589E-06 -1.7833E-05 -5.1481E-05 -2.7556E-05
 SE:             3.7889E-02  3.0483E-02  2.6317E-02  3.2067E-02
 N:                     100         100         100         100

 P VAL.:         9.9989E-01  9.9953E-01  9.9844E-01  9.9931E-01

 ETASHRINKSD(%)  3.6890E+00  2.2274E+01  2.9533E+01  1.4939E+01
 ETASHRINKVR(%)  7.2418E+00  3.9587E+01  5.0344E+01  2.7647E+01
 EBVSHRINKSD(%)  3.6952E+00  2.2273E+01  2.9531E+01  1.4966E+01
 EBVSHRINKVR(%)  7.2538E+00  3.9585E+01  5.0341E+01  2.7692E+01
 RELATIVEINF(%)  8.4321E+01  5.9160E+01  4.1080E+01  5.7727E+01
 EPSSHRINKSD(%)  2.8639E+01
 EPSSHRINKVR(%)  4.9076E+01


 TOTAL DATA POINTS NORMALLY DISTRIBUTED (N):          500
 N*LOG(2PI) CONSTANT TO OBJECTIVE FUNCTION:    918.938533204673
 OBJECTIVE FUNCTION VALUE WITHOUT CONSTANT:   -2497.93015635093
 OBJECTIVE FUNCTION VALUE WITH CONSTANT:      -1578.99162314626
 REPORTED OBJECTIVE FUNCTION DOES NOT CONTAIN CONSTANT

 TOTAL EFFECTIVE ETAS (NIND*NETA):                           400
 NIND*NETA*LOG(2PI) CONSTANT TO OBJECTIVE FUNCTION:    735.150826563738
 OBJECTIVE FUNCTION VALUE WITHOUT CONSTANT:   -2497.93015635093
 OBJECTIVE FUNCTION VALUE WITH CONSTANT:      -1762.77932978719
 REPORTED OBJECTIVE FUNCTION DOES NOT CONTAIN CONSTANT


 #TERE:
 Elapsed estimation  time in seconds:    22.41

 ********************           STOCHASTIC APPROXIMATION EXPECTATION-MAXIMIZATION (NO PRIOR)         ********************
 #OBJT:**************                        FINAL VALUE OF LIKELIHOOD FUNCTION                      ********************
 #OBJV:********************************************    -2497.930       **************************************************

 ********************           STOCHASTIC APPROXIMATION EXPECTATION-MAXIMIZATION (NO PRIOR)         ********************
 ********************                             FINAL PARAMETER ESTIMATE                           ********************

 THETA - VECTOR OF FIXED EFFECTS PARAMETERS   *********
         TH 1      TH 2      TH 3      TH 4
         1.63E+00  1.55E+00  7.28E-01  2.33E+00

 OMEGA - COV MATRIX FOR RANDOM EFFECTS - ETAS  ********
         ETA1      ETA2      ETA3      ETA4
 ETA1
+        1.55E-01
 ETA2
+       -7.27E-03  1.54E-01
 ETA3
+       -6.75E-03 -1.13E-03  1.39E-01
 ETA4
+       -3.03E-02  1.79E-02  5.39E-03  1.42E-01

 SIGMA - COV MATRIX FOR RANDOM EFFECTS - EPSILONS  ****
         EPS1
 EPS1
+        5.91E-02

 OMEGA - CORR MATRIX FOR RANDOM EFFECTS - ETAS  *******
         ETA1      ETA2      ETA3      ETA4
 ETA1
+        3.93E-01
 ETA2
+       -4.72E-02  3.92E-01
 ETA3
+       -4.60E-02 -7.72E-03  3.73E-01
 ETA4
+       -2.04E-01  1.21E-01  3.83E-02  3.77E-01

 SIGMA - CORR MATRIX FOR RANDOM EFFECTS - EPSILONS  ***
         EPS1
 EPS1
+        2.43E-01
 #TBLN:      2
 #METH: Stochastic Approximation Expectation-Maximization (Expectation Only) (No Prior)
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
 #TERM:
 STOCHASTIC PORTION, EXPECTATION ONLY, WAS NOT TESTED FOR CONVERGENCE
 REDUCED STOCHASTIC PORTION WAS COMPLETED, EXPECTATION ONLY

 ETABAR IS THE ARITHMETIC MEAN OF THE ETA-ESTIMATES,
 AND THE P-VALUE IS GIVEN FOR THE NULL HYPOTHESIS THAT THE TRUE MEAN IS 0.

 ETABAR:         2.4732E-03  2.1523E-03  4.2013E-03  9.6889E-04
 SE:             3.8102E-02  2.9995E-02  2.6499E-02  3.1849E-02
 N:                     100         100         100         100

 P VAL.:         9.4825E-01  9.4280E-01  8.7403E-01  9.7573E-01

 ETASHRINKSD(%)  3.1465E+00  2.3517E+01  2.9046E+01  1.5516E+01
 ETASHRINKVR(%)  6.1940E+00  4.1503E+01  4.9655E+01  2.8624E+01
 EBVSHRINKSD(%)  2.6927E+00  1.4993E+01  2.2096E+01  1.1002E+01
 EBVSHRINKVR(%)  5.3129E+00  2.7737E+01  3.9310E+01  2.0794E+01
 RELATIVEINF(%)  9.0995E+01  7.1649E+01  5.6994E+01  7.2625E+01
 EPSSHRINKSD(%)  3.0202E+01
 EPSSHRINKVR(%)  5.1282E+01


 TOTAL DATA POINTS NORMALLY DISTRIBUTED (N):          500
 N*LOG(2PI) CONSTANT TO OBJECTIVE FUNCTION:    918.938533204673
 OBJECTIVE FUNCTION VALUE WITHOUT CONSTANT:   -2553.62817133149
 OBJECTIVE FUNCTION VALUE WITH CONSTANT:      -1634.68963812682
 REPORTED OBJECTIVE FUNCTION DOES NOT CONTAIN CONSTANT

 TOTAL EFFECTIVE ETAS (NIND*NETA):                           400
 NIND*NETA*LOG(2PI) CONSTANT TO OBJECTIVE FUNCTION:    735.150826563738
 OBJECTIVE FUNCTION VALUE WITHOUT CONSTANT:   -2553.62817133149
 OBJECTIVE FUNCTION VALUE WITH CONSTANT:      -1818.47734476775
 REPORTED OBJECTIVE FUNCTION DOES NOT CONTAIN CONSTANT


 #TERE:
 Elapsed estimation  time in seconds:    20.69

 #OBJT:**************                        FINAL VALUE OF LIKELIHOOD FUNCTION                      ********************
 #OBJV:********************************************    -2553.628       **************************************************

 ********************                             FINAL PARAMETER ESTIMATE                           ********************

 THETA - VECTOR OF FIXED EFFECTS PARAMETERS   *********
         TH 1      TH 2      TH 3      TH 4
         1.63E+00  1.55E+00  7.28E-01  2.33E+00

 OMEGA - COV MATRIX FOR RANDOM EFFECTS - ETAS  ********
         ETA1      ETA2      ETA3      ETA4
 ETA1
+        1.55E-01
 ETA2
+       -7.27E-03  1.54E-01
 ETA3
+       -6.75E-03 -1.13E-03  1.39E-01
 ETA4
+       -3.03E-02  1.79E-02  5.39E-03  1.42E-01

 SIGMA - COV MATRIX FOR RANDOM EFFECTS - EPSILONS  ****
         EPS1
 EPS1
+        5.91E-02

 OMEGA - CORR MATRIX FOR RANDOM EFFECTS - ETAS  *******
         ETA1      ETA2      ETA3      ETA4
 ETA1
+        3.93E-01
 ETA2
+       -4.72E-02  3.92E-01
 ETA3
+       -4.60E-02 -7.72E-03  3.73E-01
 ETA4
+       -2.04E-01  1.21E-01  3.83E-02  3.77E-01

 SIGMA - CORR MATRIX FOR RANDOM EFFECTS - EPSILONS  ***
         EPS1
 EPS1
+        2.43E-01
 #TBLN:      3
 #METH: Objective Function Evaluation by Importance Sampling (No Prior)
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
 #TERM:
 EXPECTATION ONLY PROCESS WAS NOT COMPLETED

 ETABAR IS THE ARITHMETIC MEAN OF THE ETA-ESTIMATES,
 AND THE P-VALUE IS GIVEN FOR THE NULL HYPOTHESIS THAT THE TRUE MEAN IS 0.

 ETABAR:         1.9463E-03  2.0924E-03  5.7363E-03  3.3594E-03
 SE:             3.8097E-02  2.9932E-02  2.6588E-02  3.1984E-02
 N:                     100         100         100         100

 P VAL.:         9.5926E-01  9.4427E-01  8.2918E-01  9.1635E-01

 ETASHRINKSD(%)  3.1591E+00  2.3678E+01  2.8808E+01  1.5160E+01
 ETASHRINKVR(%)  6.2184E+00  4.1750E+01  4.9318E+01  2.8021E+01
 EBVSHRINKSD(%)  3.6735E+00  2.1866E+01  3.0877E+01  1.5144E+01
 EBVSHRINKVR(%)  7.2121E+00  3.8951E+01  5.2220E+01  2.7995E+01
 RELATIVEINF(%)  8.4229E+01  5.9853E+01  3.8669E+01  5.6220E+01
 EPSSHRINKSD(%)  2.9156E+01
 EPSSHRINKVR(%)  4.9811E+01


 TOTAL DATA POINTS NORMALLY DISTRIBUTED (N):          500
 N*LOG(2PI) CONSTANT TO OBJECTIVE FUNCTION:    918.938533204673
 OBJECTIVE FUNCTION VALUE WITHOUT CONSTANT:   -1144.09907821050
 OBJECTIVE FUNCTION VALUE WITH CONSTANT:      -225.160545005829
 REPORTED OBJECTIVE FUNCTION DOES NOT CONTAIN CONSTANT

 TOTAL EFFECTIVE ETAS (NIND*NETA):                           400


 #TERE:
 Elapsed estimation  time in seconds:     5.81

 ********************         OBJECTIVE FUNCTION EVALUATION BY IMPORTANCE SAMPLING (NO PRIOR)        ********************
 #OBJT:**************                        FINAL VALUE OF OBJECTIVE FUNCTION                       ********************
 #OBJV:********************************************    -1144.099       **************************************************

 ********************         OBJECTIVE FUNCTION EVALUATION BY IMPORTANCE SAMPLING (NO PRIOR)        ********************
 ********************                             FINAL PARAMETER ESTIMATE                           ********************

 THETA - VECTOR OF FIXED EFFECTS PARAMETERS   *********
         TH 1      TH 2      TH 3      TH 4
         1.63E+00  1.55E+00  7.28E-01  2.33E+00

 OMEGA - COV MATRIX FOR RANDOM EFFECTS - ETAS  ********
         ETA1      ETA2      ETA3      ETA4
 ETA1
+        1.55E-01
 ETA2
+       -7.27E-03  1.54E-01
 ETA3
+       -6.75E-03 -1.13E-03  1.39E-01
 ETA4
+       -3.03E-02  1.79E-02  5.39E-03  1.42E-01

 SIGMA - COV MATRIX FOR RANDOM EFFECTS - EPSILONS  ****
         EPS1
 EPS1
+        5.91E-02

 OMEGA - CORR MATRIX FOR RANDOM EFFECTS - ETAS  *******
         ETA1      ETA2      ETA3      ETA4
 ETA1
+        3.93E-01
 ETA2
+       -4.72E-02  3.92E-01
 ETA3
+       -4.60E-02 -7.72E-03  3.73E-01
 ETA4
+       -2.04E-01  1.21E-01  3.83E-02  3.77E-01

 SIGMA - CORR MATRIX FOR RANDOM EFFECTS - EPSILONS  ***
         EPS1
 EPS1
+        2.43E-01
 Elapsed postprocess time in seconds:     0.06
 Elapsed finaloutput time in seconds:     0.00
 #CPUT: Total CPU Time in Seconds,       51.047
