Mon 02/01/2021
12:22 PM
$PROB RUN#
$INPUT C ID TIME DV AMT RATE EVID MDV CMT ROWNUM SID
$DATA superid3.csv IGNORE=C

$SUBROUTINES ADVAN2 TRANS2

$PK
MU_4=THETA(1)
MU_5=THETA(2)
MU_6=THETA(3)
KA=DEXP(MU_4+ETA(4)+ETA(1))
CL=DEXP(MU_5+ETA(5)+ETA(2))
V=DEXP(MU_6+ETA(6)+ETA(3))
S2=V

$ERROR
IPRE=F
Y = IPRE + IPRE*EPS(1)

; Initial values of THETA

; theta results from superid3_21c.ext
$THETA  1.80785E-01 -5.31285E+00 -3.08196E+00
;INITIAL values of OMEGA
$OMEGA BLOCK(3)

 9.86080E-03
 1.39934E-04  9.60331E-03
 5.06628E-04  6.34611E-04  9.52273E-03

$OMEGA BLOCK(3)
 3.24545E-02
 -4.32801E-03  2.52337E-02
  2.75669E-02 -5.11563E-03  4.99318E-02

;Initial value of SIGMA
$SIGMA
 2.99981E-03 FIXED    ;[P]

$EST METHOD=ITS PRINT=1 SIGL=8 FNLETA=0 NOPRIOR=1 NITER=0
$EST METHOD=1 PRINT=1 NSIG=3 SIGL=10 FNLETA=0 SLOW NONINFETA=1 NOPRIOR=1 MAXEVAL=0
$COV MATRIX=R PRINT=R UNCONDITIONAL

NM-TRAN MESSAGES
 WARNINGS AND ERRORS (IF ANY) FOR PROBLEM    1
 (WARNING  126) ONLY THE LAST FNLETA LISTED IN THE SERIES OF $EST RECORDS FOR
 THIS PROBLEM WILL BE USED
 (WARNING  2) NM-TRAN INFERS THAT THE DATA ARE POPULATION.
 (WARNING  121) INTERACTION IS IMPLIED WITH EM/BAYES ESTIMATION METHODS
 (MU_WARNING 12) MU_004: SHOULD NOT BE ASSOCIATED WITH ETA(001)
 (MU_WARNING 22) MU_004: HAS ALREADY BEEN MU_ ASSOCIATED, CANNOT BE USED AGAIN.
 (MU_WARNING 12) MU_005: SHOULD NOT BE ASSOCIATED WITH ETA(002)
 (MU_WARNING 22) MU_005: HAS ALREADY BEEN MU_ ASSOCIATED, CANNOT BE USED AGAIN.
 (MU_WARNING 12) MU_006: SHOULD NOT BE ASSOCIATED WITH ETA(003)
 (MU_WARNING 22) MU_006: HAS ALREADY BEEN MU_ ASSOCIATED, CANNOT BE USED AGAIN.
Note: Analytical 2nd Derivatives are constructed in FSUBS but are never used.
      You may insert $ABBR DERIV2=NO after the first $PROB to save FSUBS construction and compilation time

1NONLINEAR MIXED EFFECTS MODEL PROGRAM (NONMEM) VERSION 7.5.1
 ORIGINALLY DEVELOPED BY STUART BEAL, LEWIS SHEINER, AND ALISON BOECKMANN
 CURRENT DEVELOPERS ARE ROBERT BAUER, ICON DEVELOPMENT SOLUTIONS,
 AND ALISON BOECKMANN. IMPLEMENTATION, EFFICIENCY, AND STANDARDIZATION
 PERFORMED BY NOUS INFOSYSTEMS.
 PROBLEM NO.:         1
 RUN#
 TOT. NO. OF OBS RECS:     8000
 TOT. NO. OF INDIVIDUALS:      800
 ONE COMPARTMENT MODEL WITH FIRST-ORDER ABSORPTION (ADVAN2)
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 #TBLN:      1
 #METH: Iterative Two Stage (No Prior)
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
 #TERM:
 OPTIMIZATION WAS NOT TESTED FOR CONVERGENCE

 ETABAR IS THE ARITHMETIC MEAN OF THE ETA-ESTIMATES,
 AND THE P-VALUE IS GIVEN FOR THE NULL HYPOTHESIS THAT THE TRUE MEAN IS 0.

 ETABAR:        -7.0928E-05 -4.4218E-05 -9.0351E-06 -2.1901E-04 -8.0933E-05 -1.8677E-04
 SE:             1.3770E-03  1.8235E-03  1.5080E-03  4.8373E-03  4.7599E-03  7.2218E-03
 N:                     800         800         800         800         800         800

 P VAL.:         9.5892E-01  9.8065E-01  9.9522E-01  9.6389E-01  9.8643E-01  9.7937E-01

 ETASHRINKSD(%)  6.0754E+01  4.7336E+01  5.6264E+01  2.4006E+01  1.5194E+01  8.5311E+00
 ETASHRINKVR(%)  8.4597E+01  7.2265E+01  8.0872E+01  4.2249E+01  2.8079E+01  1.6334E+01
 EBVSHRINKSD(%)  6.0751E+01  4.7336E+01  5.6277E+01  2.3951E+01  1.5220E+01  8.5037E+00
 EBVSHRINKVR(%)  8.4596E+01  7.2265E+01  8.0883E+01  4.2165E+01  2.8124E+01  1.6284E+01
 RELATIVEINF(%)  1.0000E-10  1.0000E-10  0.0000E+00  1.0000E-10  1.0000E-10  0.0000E+00
 EPSSHRINKSD(%)  1.2991E+01
 EPSSHRINKVR(%)  2.4294E+01


 TOTAL DATA POINTS NORMALLY DISTRIBUTED (N):         8000
 N*LOG(2PI) CONSTANT TO OBJECTIVE FUNCTION:    14703.0165312748
 OBJECTIVE FUNCTION VALUE WITHOUT CONSTANT:   -15727.3111414415
 OBJECTIVE FUNCTION VALUE WITH CONSTANT:      -1024.29461016677
 REPORTED OBJECTIVE FUNCTION DOES NOT CONTAIN CONSTANT

 TOTAL EFFECTIVE ETAS (NIND*NETA):                          4800


 #TERE:
 Elapsed estimation  time in seconds:     0.62

 Number of Negative Eigenvalues in Matrix=           4
 Most negative value=  -1639589083.86486
 Most positive value=   1371274.13052806
 Forcing positive definiteness
 Root mean square deviation of matrix from original=   7.890621044962660E-016

 Elapsed covariance  time in seconds:     0.16

 ********************                          ITERATIVE TWO STAGE (NO PRIOR)                        ********************
 #OBJT:**************                        FINAL VALUE OF OBJECTIVE FUNCTION                       ********************
 #OBJV:********************************************   -15727.311       **************************************************

 ********************                          ITERATIVE TWO STAGE (NO PRIOR)                        ********************
 ********************                             FINAL PARAMETER ESTIMATE                           ********************

 THETA - VECTOR OF FIXED EFFECTS PARAMETERS   *********
         TH 1      TH 2      TH 3
         1.81E-01 -5.31E+00 -3.08E+00

 OMEGA - COV MATRIX FOR RANDOM EFFECTS - ETAS  ********
         ETA1      ETA2      ETA3      ETA4      ETA5      ETA6
 ETA1
+        9.86E-03
 ETA2
+        1.40E-04  9.60E-03
 ETA3
+        5.07E-04  6.35E-04  9.52E-03
 ETA4
+        0.00E+00  0.00E+00  0.00E+00  3.25E-02
 ETA5
+        0.00E+00  0.00E+00  0.00E+00 -4.33E-03  2.52E-02
 ETA6
+        0.00E+00  0.00E+00  0.00E+00  2.76E-02 -5.12E-03  4.99E-02

 SIGMA - COV MATRIX FOR RANDOM EFFECTS - EPSILONS  ****
         EPS1
 EPS1
+        3.00E-03

 OMEGA - CORR MATRIX FOR RANDOM EFFECTS - ETAS  *******
         ETA1      ETA2      ETA3      ETA4      ETA5      ETA6
 ETA1
+        9.93E-02
 ETA2
+        1.44E-02  9.80E-02
 ETA3
+        5.23E-02  6.64E-02  9.76E-02
 ETA4
+        0.00E+00  0.00E+00  0.00E+00  1.80E-01
 ETA5
+        0.00E+00  0.00E+00  0.00E+00 -1.51E-01  1.59E-01
 ETA6
+        0.00E+00  0.00E+00  0.00E+00  6.85E-01 -1.44E-01  2.23E-01

 SIGMA - CORR MATRIX FOR RANDOM EFFECTS - EPSILONS  ***
         EPS1
 EPS1
+        5.48E-02

 ********************                          ITERATIVE TWO STAGE (NO PRIOR)                        ********************
 ********************                          STANDARD ERROR OF ESTIMATE (S)                        ********************

 THETA - VECTOR OF FIXED EFFECTS PARAMETERS   *********
         TH 1      TH 2      TH 3
         1.03E-02  6.99E-03  9.03E-03

 OMEGA - COV MATRIX FOR RANDOM EFFECTS - ETAS  ********
         ETA1      ETA2      ETA3      ETA4      ETA5      ETA6
 ETA1
+        6.55E+04
 ETA2
+        9.22E+04  5.48E+04
 ETA3
+        1.10E+05  5.11E+04  6.23E+04
 ETA4
+        0.00E+00  0.00E+00  0.00E+00  6.55E+04
 ETA5
+        0.00E+00  0.00E+00  0.00E+00  9.22E+04  5.48E+04
 ETA6
+        0.00E+00  0.00E+00  0.00E+00  1.10E+05  5.11E+04  6.23E+04

 SIGMA - COV MATRIX FOR RANDOM EFFECTS - EPSILONS  ****
         EPS1
 EPS1
+        0.00E+00

 OMEGA - CORR MATRIX FOR RANDOM EFFECTS - ETAS  *******
         ETA1      ETA2      ETA3      ETA4      ETA5      ETA6
 ETA1
+        3.30E+05
 ETA2
+        9.47E+06  2.79E+05
 ETA3
+        1.20E+10  5.27E+06  3.19E+05
 ETA4
+       ......... ......... .........  1.82E+05
 ETA5
+       ......... ......... .........  3.25E+06  1.72E+05
 ETA6
+       ......... ......... .........  1.20E+10  1.45E+06  1.39E+05

 SIGMA - CORR MATRIX FOR RANDOM EFFECTS - EPSILONS  ***
         EPS1
 EPS1
+       .........
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 #TBLN:      2
 #METH: First Order Conditional Estimation with Interaction (No Prior) (Evaluation)
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 Elapsed evaluation time in seconds:     0.77

0R MATRIX ALGORITHMICALLY SINGULAR
 AND ALGORITHMICALLY NON-POSITIVE-SEMIDEFINITE
0COVARIANCE STEP ABORTED
 Elapsed covariance  time in seconds:    48.80
 Elapsed postprocess time in seconds:     0.00

 ********************   FIRST ORDER CONDITIONAL ESTIMATION WITH INTERACTION (NO PRIOR) (EVALUATION)  ********************
 #OBJT:**************                       MINIMUM VALUE OF OBJECTIVE FUNCTION                      ********************
 #OBJV:********************************************   -15727.311       **************************************************

 ********************   FIRST ORDER CONDITIONAL ESTIMATION WITH INTERACTION (NO PRIOR) (EVALUATION)  ********************
 ********************                             FINAL PARAMETER ESTIMATE                           ********************

 THETA - VECTOR OF FIXED EFFECTS PARAMETERS   *********
         TH 1      TH 2      TH 3
         1.81E-01 -5.31E+00 -3.08E+00

 OMEGA - COV MATRIX FOR RANDOM EFFECTS - ETAS  ********
         ETA1      ETA2      ETA3      ETA4      ETA5      ETA6
 ETA1
+        9.86E-03
 ETA2
+        1.40E-04  9.60E-03
 ETA3
+        5.07E-04  6.35E-04  9.52E-03
 ETA4
+        0.00E+00  0.00E+00  0.00E+00  3.25E-02
 ETA5
+        0.00E+00  0.00E+00  0.00E+00 -4.33E-03  2.52E-02
 ETA6
+        0.00E+00  0.00E+00  0.00E+00  2.76E-02 -5.12E-03  4.99E-02

 SIGMA - COV MATRIX FOR RANDOM EFFECTS - EPSILONS  ****
         EPS1
 EPS1
+        3.00E-03

 OMEGA - CORR MATRIX FOR RANDOM EFFECTS - ETAS  *******
         ETA1      ETA2      ETA3      ETA4      ETA5      ETA6
 ETA1
+        9.93E-02
 ETA2
+        1.44E-02  9.80E-02
 ETA3
+        5.23E-02  6.64E-02  9.76E-02
 ETA4
+        0.00E+00  0.00E+00  0.00E+00  1.80E-01
 ETA5
+        0.00E+00  0.00E+00  0.00E+00 -1.51E-01  1.59E-01
 ETA6
+        0.00E+00  0.00E+00  0.00E+00  6.85E-01 -1.44E-01  2.23E-01

 SIGMA - CORR MATRIX FOR RANDOM EFFECTS - EPSILONS  ***
         EPS1
 EPS1
+        5.48E-02
 Elapsed finaloutput time in seconds:     0.01
 #CPUT: Total CPU Time in Seconds,       57.641
