$PROB RUN#
$INPUT C ID TIME DV AMT RATE EVID MDV CMT ROWNUM SID
$DATA superid3.csv IGNORE=C

$SUBROUTINES ADVAN2 TRANS2

$PK
MU_1=THETA(1)
MU_2=THETA(2)
MU_3=THETA(3)
KA=DEXP(MU_1+ETA(1))
CL=DEXP(MU_2+ETA(2))
V=DEXP(MU_3+ETA(3))
S2=V

$ERROR
IPRE=F
Y = IPRE + IPRE*EPS(1)

; Initial values of THETA


$THETA  1.80785E-01 -5.31285E+00 -3.08196E+00
;INITIAL values of OMEGA
$OMEGA BLOCK(3)

 9.86080E-03
 1.39934E-04  9.60331E-03
 5.06628E-04  6.34611E-04  9.52273E-03

;Initial value of SIGMA
$SIGMA
 2.99981E-03    ;[P]

;$CHAIN FILE=superid3_21_old.ext TBLN=4 ISAMPLE=-1000000000 nsample=0

$EST METHOD=ITS INTERACTION PRINT=1 SIGL=8 FNLETA=0 NOPRIOR=1 NITER=15
$EST METHOD=1 INTERACTION PRINT=1 NSIG=3 SIGL=10 FNLETA=0 SLOW NONINFETA=1 NOPRIOR=1 MAXEVAL=9999
$COV MATRIX=R PRINT=R UNCONDITIONAL
