$PROB  THEOPHYLLINE   POPULATION DATA
$INPUT      ID DOSE=AMT TIME CP=DV WT
$DATA       THEOPP

$SUBROUTINES  ADVAN2

$PK
;THETA(1)=MEAN ABSORPTION RATE CONSTANT (1/HR)
;THETA(2)=MEAN ELIMINATION RATE CONSTANT (1/HR)
;THETA(3)=SLOPE OF CLEARANCE VS WEIGHT RELATIONSHIP (LITERS/HR/KG)
;SCALING PARAMETER=VOLUME/WT SINCE DOSE IS WEIGHT-ADJUSTED
   CALLFL=1
   KA=THETA(1)+ETA(1)
   K=THETA(2)+ETA(2)
   CL=THETA(3)+ETA(3)
   SC=CL/K

$THETA (0.0 FIXED)X4
$OMEGA (1.0E+06 FIXED)X4
$ETAS  3 .08 .04 0.2

$ERROR
   W1=SQRT(ABS(THETA(4)+ETA(4)))
   IPRED=F
   Y=F+W1*EPS(1)

$SIGMA  (1.0 FIXED)

$EST  METHOD=1 INTERACTION LAPLACE MAXEVAL=0 PRINT=5 NOHABORT FNLETA=0 MCETA=1 NONINFETA=1
$TABLE          ID DOSE TIME DV IPRED W1 NOAPPEND NOPRINT FILE=INDESTM.TAB
$TABLE          ID KA K CL NOAPPEND FIRSTONLY NOPRINT FILE=INDESTM.PAR
