Wed 12/08/2021
01:00 PM
;DDE
$PROBLEM LOGISTIC
$ABBR DERIV2=NO DERIV2=NOCOMMON ; DERIV1=NO
$INPUT ID AMT TIME PRDV DV EVID MDV
$DATA logistic6.csv IGNORE=C
$SUBROUTINES ADVAN16 TOL=6 ATOL=6
$MODEL NCOMPARTMENTS=1

$PK
MXSTEP=2000000000
MU_1=THETA(1)
MU_2=THETA(2)
MU_3=THETA(3)
MU_4=THETA(4)
MU_5=THETA(5)
KG=EXP(MU_1+ETA(1))
Y0=EXP(MU_2+ETA(2))
YSS=EXP(MU_3+ETA(3))
KK=EXP(MU_4+ETA(4))
NU1=EXP(MU_5+ETA(5))
DEN=KK/EXP(GAMLN(NU1))
A_0(1)=Y0

$DES

ADC=0.0
;DOC1 10 TS CS GQ(GAM,NU1,KK)
TAU1=TS
AP_1_1=Y0
ADC=ADC+CS*AD_1_1
;ENDDOC1

 DADT(1)=KG*(1.0-ADC/YSS)*A(1)

$ERROR
A1=A(1)
Y1=1.0
IPRED=A(1)
Y=IPRED*(1.0+EPS(1))

$THETA
-1.61764E+00
-2.40835E-02
 2.29145E+00
 -0.5
 1.098612289

$OMEGA BLOCK(3)
 8.45335E-03
 6.59591E-04  7.39132E-03
 1.01727E-03 -1.73680E-03  6.86871E-03

$OMEGA 0.01 0.01

$SIGMA
 3.23154E-03

;$SIML (122345) SUBP=1

;$EST METHOD=IMP AUTO=1 NOABORT PRINT=1
$EST METHOD=CHAIN FILE=temp14.ext ISAMPLE=-1000000000 TBLN=1 NSAMPLE=0
$EST METHOD=ITS INTERACTION NOHABORT SIGL=5 MCETA=10 NSIG=2 PRINT=1 NITER=0 CTYPE=3 OPTMAP=0 ETADER=0 FNLETA=0
$EST METHOD=ITS INTERACTION NOHABORT SIGL=5 MCETA=10 NSIG=2 PRINT=1 NITER=0 CTYPE=3 OPTMAP=1 ETADER=2 FNLETA=0
;$EST METHOD=ITS INTERACTION NOABORT SIGL=3 SIGLO=8 MCETA=10 NSIG=1 PRINT=1 NITER=100 CTYPE=3 FAST OPTMAP=0 ETADER=0
;$EST METHOD=IMP INTERACTION MAXEVAL=9999 NOHABORT SIGL=4 NSIG=1 PRINT=1 NITER=5 CTYPE=3 MAPITER=0 ISAMPLE=100
;     RANMETHOD=S2
;$COV MATRIX=R UNCONDITIONAL

NM-TRAN MESSAGES
 WARNINGS AND ERRORS (IF ANY) FOR PROBLEM    1
 (WARNING  126) ONLY THE LAST FNLETA LISTED IN THE SERIES OF $EST RECORDS FOR
 THIS PROBLEM WILL BE USED
 (WARNING  2) NM-TRAN INFERS THAT THE DATA ARE POPULATION.
 (WARNING  118) THE DERIVATIVE OF THE LOG GAMMA OF A RANDOM VARIABLE IS
 BEING COMPUTED. IF THE FUNCTION VALUE AFFECTS THE VALUE OF THE OBJECTIVE
 FUNCTION, THE USER SHOULD ENSURE THAT THE RANDOM VARIABLE IS ALWAYS
 POSITIVE
 (WARNING  83) FUNCTIONS ARE USED IN ABBREVIATED CODE, BUT THE $SUBROUTINES
 RECORD DOES NOT INCLUDE THE "OTHER" OPTION.

1NONLINEAR MIXED EFFECTS MODEL PROGRAM (NONMEM) VERSION 7.5.1
 ORIGINALLY DEVELOPED BY STUART BEAL, LEWIS SHEINER, AND ALISON BOECKMANN
 CURRENT DEVELOPERS ARE ROBERT BAUER, ICON DEVELOPMENT SOLUTIONS,
 AND ALISON BOECKMANN. IMPLEMENTATION, EFFICIENCY, AND STANDARDIZATION
 PERFORMED BY NOUS INFOSYSTEMS.
 PROBLEM NO.:         1
 LOGISTIC
 TOT. NO. OF OBS RECS:     2340
 TOT. NO. OF INDIVIDUALS:       30
 GENERAL NONLINEAR KINETICS MODEL WITH STIFF/NONSTIFF AND DELAY EQUATIONS (RADAR5, ADVAN16)
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 #TBLN:      1
 #METH: Chain Method Processing
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 #TBLN:      1
 #METH: Iterative Two Stage
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
 #TERM:
 OPTIMIZATION WAS NOT TESTED FOR CONVERGENCE

 ETABAR IS THE ARITHMETIC MEAN OF THE ETA-ESTIMATES,
 AND THE P-VALUE IS GIVEN FOR THE NULL HYPOTHESIS THAT THE TRUE MEAN IS 0.

 ETABAR:         7.6934E-03 -4.6377E-03 -7.1716E-04  1.2733E-01  1.5880E-01
 SE:             1.7332E-02  1.4881E-02  1.4986E-02  2.2446E-02  3.2607E-02
 N:                      30          30          30          30          30

 P VAL.:         6.5712E-01  7.5531E-01  9.6183E-01  1.4094E-08  1.1176E-06

 ETASHRINKSD(%)  1.0000E-10  4.1165E+00  6.5618E-01  5.8983E+01  5.0366E+01
 ETASHRINKVR(%)  1.0000E-10  8.0636E+00  1.3081E+00  8.3176E+01  7.5365E+01
 EBVSHRINKSD(%)  1.8288E+00  4.8590E+00  4.2607E-01  3.1241E+01  2.0672E+01
 EBVSHRINKVR(%)  3.6242E+00  9.4818E+00  8.5032E-01  5.2722E+01  3.7071E+01
 RELATIVEINF(%)  9.2732E+01  8.9874E+01  9.9687E+01  1.0000E-10  2.4536E+01
 EPSSHRINKSD(%)  1.3760E+00
 EPSSHRINKVR(%)  2.7331E+00


 TOTAL DATA POINTS NORMALLY DISTRIBUTED (N):         2340
 N*LOG(2PI) CONSTANT TO OBJECTIVE FUNCTION:    4300.63233539787
 OBJECTIVE FUNCTION VALUE WITHOUT CONSTANT:   -881.533702232796
 OBJECTIVE FUNCTION VALUE WITH CONSTANT:       3419.09863316507
 REPORTED OBJECTIVE FUNCTION DOES NOT CONTAIN CONSTANT

 TOTAL EFFECTIVE ETAS (NIND*NETA):                           150


 #TERE:
 Elapsed estimation  time in seconds:    12.98

 ********************                               ITERATIVE TWO STAGE                              ********************
 #OBJT:**************                        FINAL VALUE OF OBJECTIVE FUNCTION                       ********************
 #OBJV:********************************************     -881.534       **************************************************

 ********************                               ITERATIVE TWO STAGE                              ********************
 ********************                             FINAL PARAMETER ESTIMATE                           ********************

 THETA - VECTOR OF FIXED EFFECTS PARAMETERS   *********
         TH 1      TH 2      TH 3      TH 4      TH 5
        -1.59E+00 -4.16E-02  2.29E+00 -1.62E-02  1.51E+00

 OMEGA - COV MATRIX FOR RANDOM EFFECTS - ETAS  ********
         ETA1      ETA2      ETA3      ETA4      ETA5
 ETA1
+        8.74E-03
 ETA2
+        4.74E-04  7.23E-03
 ETA3
+        9.12E-04 -1.86E-03  6.83E-03
 ETA4
+        2.06E-02 -2.42E-04  7.77E-04  8.98E-02
 ETA5
+        2.20E-02  2.08E-04  2.44E-03  1.06E-01  1.29E-01

 SIGMA - COV MATRIX FOR RANDOM EFFECTS - EPSILONS  ****
         EPS1
 EPS1
+        3.29E-03

 OMEGA - CORR MATRIX FOR RANDOM EFFECTS - ETAS  *******
         ETA1      ETA2      ETA3      ETA4      ETA5
 ETA1
+        9.35E-02
 ETA2
+        5.96E-02  8.50E-02
 ETA3
+        1.18E-01 -2.64E-01  8.26E-02
 ETA4
+        7.37E-01 -9.48E-03  3.14E-02  3.00E-01
 ETA5
+        6.54E-01  6.79E-03  8.21E-02  9.87E-01  3.60E-01

 SIGMA - CORR MATRIX FOR RANDOM EFFECTS - EPSILONS  ***
         EPS1
 EPS1
+        5.73E-02
 #TBLN:      2
 #METH: Iterative Two Stage
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
 #TERM:
 OPTIMIZATION WAS NOT TESTED FOR CONVERGENCE

 ETABAR IS THE ARITHMETIC MEAN OF THE ETA-ESTIMATES,
 AND THE P-VALUE IS GIVEN FOR THE NULL HYPOTHESIS THAT THE TRUE MEAN IS 0.

 ETABAR:         7.6934E-03 -4.6377E-03 -7.1716E-04  1.2733E-01  1.5880E-01
 SE:             1.7332E-02  1.4881E-02  1.4986E-02  2.2446E-02  3.2607E-02
 N:                      30          30          30          30          30

 P VAL.:         6.5712E-01  7.5531E-01  9.6183E-01  1.4094E-08  1.1176E-06

 ETASHRINKSD(%)  1.0000E-10  4.1165E+00  6.5618E-01  5.8983E+01  5.0366E+01
 ETASHRINKVR(%)  1.0000E-10  8.0636E+00  1.3081E+00  8.3176E+01  7.5365E+01
 EBVSHRINKSD(%)  1.8284E+00  4.8588E+00  4.2608E-01  3.1251E+01  2.0677E+01
 EBVSHRINKVR(%)  3.6233E+00  9.4814E+00  8.5034E-01  5.2736E+01  3.7078E+01
 RELATIVEINF(%)  9.2728E+01  8.9874E+01  9.9687E+01  1.0000E-10  2.4537E+01
 EPSSHRINKSD(%)  1.3761E+00
 EPSSHRINKVR(%)  2.7332E+00


 TOTAL DATA POINTS NORMALLY DISTRIBUTED (N):         4680
 N*LOG(2PI) CONSTANT TO OBJECTIVE FUNCTION:    8601.26467079574
 OBJECTIVE FUNCTION VALUE WITHOUT CONSTANT:   -881.547559563544
 OBJECTIVE FUNCTION VALUE WITH CONSTANT:       7719.71711123219
 REPORTED OBJECTIVE FUNCTION DOES NOT CONTAIN CONSTANT

 TOTAL EFFECTIVE ETAS (NIND*NETA):                           150


 #TERE:
 Elapsed estimation  time in seconds:    22.05

 ********************                               ITERATIVE TWO STAGE                              ********************
 #OBJT:**************                        FINAL VALUE OF OBJECTIVE FUNCTION                       ********************
 #OBJV:********************************************     -881.548       **************************************************

 ********************                               ITERATIVE TWO STAGE                              ********************
 ********************                             FINAL PARAMETER ESTIMATE                           ********************

 THETA - VECTOR OF FIXED EFFECTS PARAMETERS   *********
         TH 1      TH 2      TH 3      TH 4      TH 5
        -1.59E+00 -4.16E-02  2.29E+00 -1.62E-02  1.51E+00

 OMEGA - COV MATRIX FOR RANDOM EFFECTS - ETAS  ********
         ETA1      ETA2      ETA3      ETA4      ETA5
 ETA1
+        8.74E-03
 ETA2
+        4.74E-04  7.23E-03
 ETA3
+        9.12E-04 -1.86E-03  6.83E-03
 ETA4
+        2.06E-02 -2.42E-04  7.77E-04  8.98E-02
 ETA5
+        2.20E-02  2.08E-04  2.44E-03  1.06E-01  1.29E-01

 SIGMA - COV MATRIX FOR RANDOM EFFECTS - EPSILONS  ****
         EPS1
 EPS1
+        3.29E-03

 OMEGA - CORR MATRIX FOR RANDOM EFFECTS - ETAS  *******
         ETA1      ETA2      ETA3      ETA4      ETA5
 ETA1
+        9.35E-02
 ETA2
+        5.96E-02  8.50E-02
 ETA3
+        1.18E-01 -2.64E-01  8.26E-02
 ETA4
+        7.37E-01 -9.48E-03  3.14E-02  3.00E-01
 ETA5
+        6.54E-01  6.79E-03  8.21E-02  9.87E-01  3.60E-01

 SIGMA - CORR MATRIX FOR RANDOM EFFECTS - EPSILONS  ***
         EPS1
 EPS1
+        5.73E-02
 Elapsed postprocess time in seconds:     0.00
 Elapsed finaloutput time in seconds:     0.00
 #CPUT: Total CPU Time in Seconds,       35.797
