Tue 09/24/2024
04:20 PM
;DDE
;NN1=100
;PRC=0.01
;DISTRIB=WEIBULLCDF(VG)
$SIZES PC=110
$PROBLEM LOGISTIC Distributed transit compartments on Smax Drug Responsive Input function
; turn off second derivative assessments, sometimes even 1st derivatives if only simulating
$ABBR DERIV2=NO DERIV2=NOCOMMON DERIV1=NO
$INPUT ID AMT TIME DV EVID MDV
$DATA smax_weibull.dat IGNORE=C
$SUBROUTINES ADVAN13 TOL=10 ATOL=10
$MODEL NCOMPARTMENTS=2

$PK
CALLFL=-2
MXSTEP=2000000000
SMAX=THETA(1)
SC50=THETA(2)
KIN0=THETA(3)
AA=THETA(4)
BB=THETA(5)
Vmax = 2
V50 = 3
V = 1

VG(2)=AA
VG(3)=BB

; Initial conditions
A_0(1)=0.0
A_0(2)=5.0

$DES
VG(2)=AA
VG(3)=BB

  ; AD_1_1 is the State value of A(1) delayed for time TAU1.
  ; AP_1_1 is the State value of A(1) in the past, for time delay TAU1.

; DELAY SETUP FOR EQUATION SET 1
 c = A(1)/V
 kin = kin0*(1.0+(Smax*c)/(SC50+c))
 APG_KIN_1=KIN0

 DADT(1) = -(Vmax*A(1))/(V50+A(1))
 DADT(2) = kin - ADG_KIN_1

$ERROR
A1=A(2)

Y1=1.0
IPRED=A(2)
Y=IPRED*(1.0+EPS(1))

$THETA
0.5
10.0
0.8
7.0
6.5

$OMEGA (0.0 fixed)x4

$SIGMA (0.0 fixed)

$SIML (122345) ONLYSIM SUBP=1

$TABLE TIME KIN IPRED NOPRINT NOAPPEND FILE=smax_weibulldt.tab ONEHEADER FORMAT=S1PE20.13

NM-TRAN MESSAGES
 WARNING: -prdefault OPTION IS OVER-RIDING USER SPECIFIED PC VALUE OF 110 WITH 30
THEREFORE OVER-RIDING -prdefault
 WARNINGS AND ERRORS (IF ANY) FOR PROBLEM    1
 (WARNING  2) NM-TRAN INFERS THAT THE DATA ARE POPULATION.
 (WARNING  84) VALUES HAVE NOT BEEN ASSIGNED TO THE FOLLOWING ELEMENTS IN
 ABBREVIATED CODE:
   VG(4) VG(5) VG(6) VG(7) VG(8) VG(9) VG(10) VG(11)
 (WARNING  46) ETA VARIABLES ARE NOT USED, BUT DATA ARE POPULATION TYPE.
 (WARNING  48) DES-DEFINED ITEMS ARE COMPUTED ONLY WHEN EVENT TIME
 INCREASES. E.G., DISPLAYED VALUES ASSOCIATED WITH THE FIRST EVENT RECORD
 OF AN INDIVIDUAL RECORD ARE COMPUTED WITH (THE LAST ADVANCE TO) AN EVENT
 TIME OF THE PRIOR INDIVIDUAL RECORD.
 (WARNING  83) FUNCTIONS ARE USED IN ABBREVIATED CODE, BUT THE $SUBROUTINES
 RECORD DOES NOT INCLUDE THE "OTHER" OPTION.

1NONLINEAR MIXED EFFECTS MODEL PROGRAM (NONMEM) VERSION 7.5.2
 ORIGINALLY DEVELOPED BY STUART BEAL, LEWIS SHEINER, AND ALISON BOECKMANN
 CURRENT DEVELOPERS ARE ROBERT BAUER, ICON DEVELOPMENT SOLUTIONS,
 AND ALISON BOECKMANN. IMPLEMENTATION, EFFICIENCY, AND STANDARDIZATION
 PERFORMED BY NOUS INFOSYSTEMS.
 PROBLEM NO.:         1
 LOGISTIC Distributed transit compartments on Smax Drug Responsive Input
 TOT. NO. OF OBS RECS:       32
 TOT. NO. OF INDIVIDUALS:        1
 GENERAL NONLINEAR KINETICS MODEL WITH STIFF/NONSTIFF EQUATIONS (LSODA, ADVAN13)
 PROBLEM NO.:           1      SUBPROBLEM NO.:           1
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 SIMULATION STEP PERFORMED
 Elapsed simulation  time in seconds:     0.38
 Elapsed finaloutput time in seconds:     0.01
 #CPUT: Total CPU Time in Seconds,        0.500
