Fri 08/26/2022
03:50 PM
;Model Desc: Two compartment Model, Using ADVAN3, TRANS4
;Project Name: nm7examples
;Project ID: NO PROJECT DESCRIPTION

$PROB RUN# Example 8 (from samp5l)
$abbr DECLARE INTEGER FIRST_WRITE
$abbr DECLARE INTEGER FIRST_WRITE2

$INPUT C SET ID JID TIME  DV=CONC AMT=DOSE RATE EVID MDV CMT CLX V1X QX V2X SDIX SDSX
$DATA example8.csv IGNORE=C

$SUBROUTINES ADVAN3 TRANS4

$PK
include nonmem_reserved_general
; Request extra information for Bayesian analysis.
; An extra call will then be made
; for accepted samples
BAYES_EXTRA_REQUEST=1
MU_1=THETA(1)
MU_2=THETA(2)
MU_3=THETA(3)
MU_4=THETA(4)
CL=DEXP(MU_1+ETA(1))
V1=DEXP(MU_2+ETA(2))
Q=DEXP(MU_3+ETA(3))
V2=DEXP(MU_4+ETA(4))
S1=V1
; When Bayes_extra=1, then this particular set of individual
; parameters were "accepted"
; So you may record them if you wish

IF(BAYES_EXTRA==1 .AND. ITER_REPORT>=0 .AND.  FIRST_WRITE==0  .AND. NEWIND/=2) THEN
IF(PNM_RUN_MODE==PNM_SINGLE) THEN

" OPEN(UNIT=53,FILE='example8.prr')
; If parallel, need to have different file name for each node
; best if a pnm file with -awnf is used, such as mpiwini8_awnf.pnm,
; and command line option -maxlim=3.  This allows all files to be
; written to primary run directory, and not into worker folders.
ELSE

" OPEN(UNIT=53,FILE='example8_'//trim(tfi(pnm_node_number))//'.prr')
ENDIF
IF(PNM_NODE_NUMBER==1) THEN ; Only first file should have header,
; for easy merging later
; When a parallel run is completed you can merge the files with
; (Windows):
; copy example8_*.prr example.prr
; (Linux):
; cat example8_*.prr > example.prr

" WRITE(53,94) 'ITER_REPORT  ',' ID          ',' CL            ',' V1            ',' Q            ',' V2            ',' OBJI '

" 94 FORMAT(A12,1X,A14,5(1X,A12))
ENDIF
FIRST_WRITE=1
ENDIF

IF(BAYES_EXTRA==1 .AND. ITER_REPORT>=0 .AND. NEWIND/=2 ) THEN
" WRITE(53,95) ITER_REPORT,ID,CL,V1,Q,V2,OBJI(NIREC,1)
" 95 FORMAT(I12,1X,F14.0,5(1X,1PG12.5))
ENDIF

$ERROR
include nonmem_reserved_general
BAYES_EXTRA_REQUEST=1
Y = F + F*EPS(1)

IF(BAYES_EXTRA==1 .AND. ITER_REPORT>=0 .AND. FIRST_WRITE2==0 ) THEN
IF(PNM_RUN_MODE==PNM_SINGLE) THEN
" OPEN(UNIT=54,FILE='example8.iwr')
ELSE
" OPEN(UNIT=54,FILE='example8_'//trim(tfi(pnm_node_number))//'.iwr')
ENDIF
IF(PNM_NODE_NUMBER==1) THEN ; Only one file should have header,
; for easy merging later
; When a parallel run is completed you can merge the files with
; (Windows):
; copy example8_*.iwr example.iwr
; (Linux):
; cat example8_*.iwr > example.iwr

" WRITE(54,96) 'ITER_REPORT      ','ID          ','TIME        ','F       '

" 96 FORMAT(A12,1X,A14,2(1X,A12))
ENDIF
FIRST_WRITE2=1
ENDIF

IF(BAYES_EXTRA==1 .AND. ITER_REPORT>=0 ) THEN

" WRITE(54,97) ITER_REPORT,ID,TIME,F

" 97 FORMAT(I12,1X,F14.0,2(1X,1PG12.5))
ENDIF

; Initial values of THETA

$THETA
(2.0) ;[LN(CL)]
(2.0) ;[LN(V1)]
(2.0) ;[LN(Q)]
(2.0) ;[LN(V2)]
;INITIAL values of OMEGA

$OMEGA BLOCK(4)
0.15   ;[P]
0.01  ;[F]
0.15   ;[P]
0.01  ;[F]
0.01  ;[F]
0.15   ;[P]
0.01  ;[F]
0.01  ;[F]
0.01  ;[F]
0.15   ;[P]
;Initial value of SIGMA

$SIGMA
(0.6 )   ;[P]

$PRIOR NWPRI
; Prior information to the THETAS.

$THETAP (2.0 FIX) (2.0 FIX) (2.0 FIX) (2.0 FIX)

$THETAPV BLOCK(4)
10000 FIX
0.00 10000
0.00  0.00 10000
0.00  0.00 0.0 10000

; Prior information to the OMEGAS.

$OMEGAP BLOCK(4)
0.2 FIX
0.0  0.2
0.0  0.0 0.2
0.0  0.0 0.0 0.2

$OMEGAPD (4 FIX)

$EST METHOD=BAYES INTERACTION FILE=example8.ext NBURN=10000 NITER=1000 PRINT=100 NOPRIOR=0 RANMETHOD=P
     CTYPE=3 CINTERVAL=100

NM-TRAN MESSAGES
 WARNINGS AND ERRORS (IF ANY) FOR PROBLEM    1
 (WARNING  2) NM-TRAN INFERS THAT THE DATA ARE POPULATION.
 (MU_WARNING 20) MU_001: MU_ VARIABLE SHOULD NOT BE DEFINED AFTER VERBATIM CODE.
 LIM VALUES MAXLIM ASSESSED BY NMTRAN: 1,2,3,4,5,6,7,8,10,11,13,15,16,17
Note: Analytical 2nd Derivatives are constructed in FSUBS but are never used.
      You may insert $ABBR DERIV2=NO after the first $PROB to save FSUBS construction and compilation time

1NONLINEAR MIXED EFFECTS MODEL PROGRAM (NONMEM) VERSION 7.5.2
 ORIGINALLY DEVELOPED BY STUART BEAL, LEWIS SHEINER, AND ALISON BOECKMANN
 CURRENT DEVELOPERS ARE ROBERT BAUER, ICON DEVELOPMENT SOLUTIONS,
 AND ALISON BOECKMANN. IMPLEMENTATION, EFFICIENCY, AND STANDARDIZATION
 PERFORMED BY NOUS INFOSYSTEMS.
 PROBLEM NO.:         1
 RUN# Example 8 (from samp5l)
 TOT. NO. OF OBS RECS:      500
 TOT. NO. OF INDIVIDUALS:      100
 TWO COMPARTMENT MODEL (ADVAN3)
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 #TBLN:      1
 #METH: MCMC Bayesian Analysis
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
 #TERM:
 BURN-IN WAS COMPLETED
 STATISTICAL PORTION WAS COMPLETED

 ETABAR IS THE ARITHMETIC MEAN OF THE ETA-ESTIMATES,
 AND THE P-VALUE IS GIVEN FOR THE NULL HYPOTHESIS THAT THE TRUE MEAN IS 0.

 ETABAR:        -1.9004E-04 -1.9299E-04  1.7416E-03 -3.1269E-05
 SE:             3.9049E-02  2.8574E-02  3.0711E-02  3.2288E-02
 N:                     100         100         100         100

 P VAL.:         9.9612E-01  9.9461E-01  9.5478E-01  9.9923E-01

 ETASHRINKSD(%)  6.5384E+00  2.6651E+01  3.1635E+01  1.9983E+01
 ETASHRINKVR(%)  1.2649E+01  4.6200E+01  5.3262E+01  3.5973E+01
 EBVSHRINKSD(%)  3.6237E+00  2.3367E+01  2.8976E+01  1.7161E+01
 EBVSHRINKVR(%)  7.1160E+00  4.1274E+01  4.9556E+01  3.1377E+01
 RELATIVEINF(%)  8.8982E+01  5.8059E+01  4.7276E+01  6.2014E+01
 EPSSHRINKSD(%)  3.0048E+01
 EPSSHRINKVR(%)  5.1067E+01


 TOTAL DATA POINTS NORMALLY DISTRIBUTED (N):          500
 N*LOG(2PI) CONSTANT TO OBJECTIVE FUNCTION:    918.938533204673
 OBJECTIVE FUNCTION VALUE WITHOUT CONSTANT:   -2304.77525938414
 OBJECTIVE FUNCTION VALUE WITH CONSTANT:      -1385.83672617947
 REPORTED OBJECTIVE FUNCTION DOES NOT CONTAIN CONSTANT

 TOTAL EFFECTIVE ETAS (NIND*NETA):                           400
 NIND*NETA*LOG(2PI) CONSTANT TO OBJECTIVE FUNCTION:    735.150826563738
 OBJECTIVE FUNCTION VALUE WITHOUT CONSTANT:   -2304.77525938414
 OBJECTIVE FUNCTION VALUE WITH CONSTANT:      -1569.62443282040
 REPORTED OBJECTIVE FUNCTION DOES NOT CONTAIN CONSTANT

 PRIOR CONSTANT TO OBJECTIVE FUNCTION:    66.6250661892040
 OBJECTIVE FUNCTION VALUE WITHOUT CONSTANT:   -2304.77525938414
 OBJECTIVE FUNCTION VALUE WITH CONSTANT:      -2238.15019319493
 REPORTED OBJECTIVE FUNCTION DOES NOT CONTAIN CONSTANT


 #TERE:
 Elapsed estimation  time in seconds:    28.66
 Elapsed covariance  time in seconds:     0.00

 ********************                              MCMC BAYESIAN ANALYSIS                            ********************
 #OBJT:**************                       AVERAGE VALUE OF LIKELIHOOD FUNCTION                     ********************
 #OBJV:********************************************    -2304.775       **************************************************
 #OBJS:********************************************       42.193 (STD) **************************************************

 ********************                              MCMC BAYESIAN ANALYSIS                            ********************
 ********************                             FINAL PARAMETER ESTIMATE                           ********************

 THETA - VECTOR OF FIXED EFFECTS PARAMETERS   *********
         TH 1      TH 2      TH 3      TH 4
         1.63E+00  1.56E+00  7.46E-01  2.35E+00

 OMEGA - COV MATRIX FOR RANDOM EFFECTS - ETAS  ********
         ETA1      ETA2      ETA3      ETA4
 ETA1
+        1.75E-01
 ETA2
+       -1.22E-03  1.52E-01
 ETA3
+        1.17E-02 -2.48E-03  2.02E-01
 ETA4
+       -1.71E-02  1.57E-02  2.77E-02  1.63E-01

 SIGMA - COV MATRIX FOR RANDOM EFFECTS - EPSILONS  ****
         EPS1
 EPS1
+        5.86E-02

 OMEGA - CORR MATRIX FOR RANDOM EFFECTS - ETAS  *******
         ETA1      ETA2      ETA3      ETA4
 ETA1
+        4.16E-01
 ETA2
+       -9.95E-03  3.87E-01
 ETA3
+        5.56E-02 -1.46E-02  4.45E-01
 ETA4
+       -1.08E-01  9.74E-02  1.30E-01  4.01E-01

 SIGMA - CORR MATRIX FOR RANDOM EFFECTS - EPSILONS  ***
         EPS1
 EPS1
+        2.42E-01

 ********************                              MCMC BAYESIAN ANALYSIS                            ********************
 ********************                STANDARD ERROR OF ESTIMATE (From Sample Variance)               ********************

 THETA - VECTOR OF FIXED EFFECTS PARAMETERS   *********
         TH 1      TH 2      TH 3      TH 4
         4.54E-02  5.59E-02  6.89E-02  5.32E-02

 OMEGA - COV MATRIX FOR RANDOM EFFECTS - ETAS  ********
         ETA1      ETA2      ETA3      ETA4
 ETA1
+        2.92E-02
 ETA2
+        2.41E-02  3.40E-02
 ETA3
+        2.89E-02  3.43E-02  5.72E-02
 ETA4
+        2.23E-02  2.47E-02  3.56E-02  3.68E-02

 SIGMA - COV MATRIX FOR RANDOM EFFECTS - EPSILONS  ****
         EPS1
 EPS1
+        6.71E-03

 OMEGA - CORR MATRIX FOR RANDOM EFFECTS - ETAS  *******
         ETA1      ETA2      ETA3      ETA4
 ETA1
+        3.45E-02
 ETA2
+        1.47E-01  4.33E-02
 ETA3
+        1.47E-01  1.98E-01  6.38E-02
 ETA4
+        1.34E-01  1.50E-01  1.77E-01  4.52E-02

 SIGMA - CORR MATRIX FOR RANDOM EFFECTS - EPSILONS  ***
         EPS1
 EPS1
+        1.38E-02

 ********************                              MCMC BAYESIAN ANALYSIS                            ********************
 ********************               COVARIANCE MATRIX OF ESTIMATE (From Sample Variance)             ********************

            TH 1      TH 2      TH 3      TH 4      OM11      OM12      OM13      OM14      OM22      OM23      OM24      OM33
             OM34      OM44      SG11
 TH 1
+        2.06E-03
 TH 2
+        3.34E-04  3.12E-03
 TH 3
+        4.84E-04  3.76E-04  4.74E-03
 TH 4
+        1.45E-04  4.81E-04  1.60E-03  2.83E-03
 OM11
+        9.36E-05  1.85E-04  1.53E-04  4.79E-05  8.53E-04
 OM12
+        9.25E-05  1.91E-04  1.98E-04  7.46E-05  1.70E-04  5.83E-04
 OM13
+        7.35E-05  1.25E-04 -5.57E-05  1.39E-04  2.31E-04  7.78E-05  8.34E-04
 OM14
+        4.72E-05  6.84E-05  1.38E-04  8.29E-05  1.12E-04  1.14E-04  2.85E-04  4.99E-04
 OM22
+       -8.50E-05 -2.95E-04 -2.94E-04 -1.16E-04  1.08E-06 -2.66E-05 -2.80E-05  5.60E-06  1.16E-03
 OM23
+        9.23E-05  2.42E-04  5.49E-04  7.94E-05  7.94E-05  2.19E-04  5.73E-05  5.86E-05 -1.47E-04  1.18E-03
 OM24
+        4.60E-05  3.70E-05  2.40E-04  1.54E-04  3.05E-05  2.12E-05  1.78E-05  4.17E-05  9.19E-05  2.40E-04  6.09E-04
 OM33
+        3.32E-05 -2.62E-04  5.07E-04  1.84E-04  2.45E-04  1.28E-04  4.44E-04  2.26E-04  8.50E-05  1.22E-04  6.66E-05  3.27E-03
 OM34
+        8.32E-05 -1.33E-04  1.88E-04  1.18E-05  1.32E-04  1.11E-04  2.22E-04  2.19E-04  7.04E-05  2.11E-04  1.13E-04  1.30E-03
          1.27E-03
 OM44
+       -1.56E-05  3.50E-05  3.84E-05  1.88E-04  6.22E-05  1.97E-05  1.26E-04  5.92E-05  1.84E-05  1.27E-04  2.29E-04  4.37E-04
          7.14E-04  1.36E-03
 SG11
+       -1.76E-05  2.48E-05  3.30E-05  1.06E-05 -1.74E-05 -1.89E-05 -2.74E-05 -2.28E-05 -3.38E-05  6.19E-07 -3.96E-06 -1.20E-04
         -8.50E-05 -6.55E-05  4.50E-05

 ********************                              MCMC BAYESIAN ANALYSIS                            ********************
 ********************              CORRELATION MATRIX OF ESTIMATE (From Sample Variance)             ********************

            TH 1      TH 2      TH 3      TH 4      OM11      OM12      OM13      OM14      OM22      OM23      OM24      OM33
             OM34      OM44      SG11
 TH 1
+        4.54E-02
 TH 2
+        1.32E-01  5.59E-02
 TH 3
+        1.55E-01  9.77E-02  6.89E-02
 TH 4
+        5.99E-02  1.62E-01  4.36E-01  5.32E-02
 OM11
+        7.07E-02  1.13E-01  7.63E-02  3.09E-02  2.92E-02
 OM12
+        8.45E-02  1.42E-01  1.19E-01  5.81E-02  2.41E-01  2.41E-02
 OM13
+        5.62E-02  7.72E-02 -2.80E-02  9.04E-02  2.74E-01  1.12E-01  2.89E-02
 OM14
+        4.65E-02  5.48E-02  8.97E-02  6.97E-02  1.71E-01  2.10E-01  4.43E-01  2.23E-02
 OM22
+       -5.51E-02 -1.55E-01 -1.25E-01 -6.39E-02  1.09E-03 -3.23E-02 -2.85E-02  7.37E-03  3.40E-02
 OM23
+        5.93E-02  1.26E-01  2.32E-01  4.35E-02  7.93E-02  2.64E-01  5.79E-02  7.65E-02 -1.26E-01  3.43E-02
 OM24
+        4.11E-02  2.68E-02  1.41E-01  1.17E-01  4.24E-02  3.56E-02  2.50E-02  7.57E-02  1.09E-01  2.84E-01  2.47E-02
 OM33
+        1.28E-02 -8.19E-02  1.29E-01  6.05E-02  1.46E-01  9.26E-02  2.69E-01  1.77E-01  4.37E-02  6.22E-02  4.72E-02  5.72E-02
 OM34
+        5.16E-02 -6.71E-02  7.66E-02  6.24E-03  1.27E-01  1.30E-01  2.16E-01  2.75E-01  5.82E-02  1.73E-01  1.29E-01  6.41E-01
          3.56E-02
 OM44
+       -9.32E-03  1.70E-02  1.52E-02  9.57E-02  5.78E-02  2.21E-02  1.19E-01  7.19E-02  1.47E-02  1.00E-01  2.52E-01  2.07E-01
          5.45E-01  3.68E-02
 SG11
+       -5.79E-02  6.61E-02  7.15E-02  2.97E-02 -8.86E-02 -1.16E-01 -1.42E-01 -1.52E-01 -1.48E-01  2.69E-03 -2.39E-02 -3.13E-01
         -3.56E-01 -2.65E-01  6.71E-03
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 Elapsed postprocess time in seconds:     0.00
 Elapsed finaloutput time in seconds:     0.00
 #CPUT: Total CPU Time in Seconds,       82.078
