Wed 10/04/2023
02:20 PM
;$SIZES ISAMPLEMAX=30
;Model Desc: Receptor Mediated Clearance model with Dynamic Change
;            in Receptors
;Project Name: nm7examples
;Project ID: NO PROJECT DESCRIPTION

$PROB RUN# example6 (from r2compl)
$ABBR DERIV2=NO
$INPUT C SET ID JID TIME DV=CONC DOSE=AMT RATE EVID MDV CMT
$DATA example6.csv IGNORE=C

; The new numerical integration solver is used, although ADVAN=9
; is also efficient for this problem.

$SUBROUTINES ADVAN13 TRANS1 TOL=4
$MODEL NCOMPARTMENTS=3

$PK
include c:\nm75g64\util\nonmem_reserved_general
; MUFIRSTREC=1 calls MU reference evaluation only once per individual, saving time
MUFIRSTREC=1
; OBJQUICK=2 uses faster evaluation of model, can be used for simple models.
OBJQUICK=2
MU_1=THETA(1)
MU_2=THETA(2)
MU_3=THETA(3)
MU_4=THETA(4)
MU_5=THETA(5)
MU_6=THETA(6)
MU_7=THETA(7)
MU_8=THETA(8)
VC=EXP(MU_1+ETA(1))
K10=EXP(MU_2+ETA(2))
K12=EXP(MU_3+ETA(3))
K21=EXP(MU_4+ETA(4))
VM=EXP(MU_5+ETA(5))
KMC=EXP(MU_6+ETA(6))
K03=EXP(MU_7+ETA(7))
K30=EXP(MU_8+ETA(8))
S3=VC
S1=VC
KM=KMC*S1
F3=K03/K30

$DES
DADT(1) = -(K10+K12)*A(1) + K21*A(2) - VM*A(1)*A(3)/(A(1)+KM)
DADT(2) = K12*A(1) - K21*A(2)
DADT(3) =  -(VM-K30)*A(1)*A(3)/(A(1)+KM) - K30*A(3) + K03

$ERROR
CALLFL=0
ETYPE=1
IF(CMT.NE.1) ETYPE=0
IPRED=F
Y = F + F*ETYPE*EPS(1) + F*(1.0-ETYPE)*EPS(2)

$THETA
;Initial Thetas
( 4.0 )  ;[MU_1]
( -2.1 ) ;[MU_2]
( 0.7 )  ;[MU_3]
( -0.17 );[MU_4]
( 2.2 ) ;[MU_5]
( 0.14 )  ;[MU_6]
( 3.7 )  ;[MU_7]
( -0.7) ;[MU_8]

;Initial Omegas
$OMEGA BLOCK(8) VALUES(0.1,0.01)

$SIGMA
0.02 ;[p]
0.02;[p]

$PRIOR NWPRI
; Omega prior
$OMEGAP BLOCK(8)
0.2 FIX
0.0 0.2
0.0 0.0 0.2
0.0 0.0 0.0 0.2
0.0 0.0 0.0 0.0 0.2
0.0 0.0 0.0 0.0 0.0 0.2
0.0 0.0 0.0 0.0 0.0 0.0 0.2
0.0 0.0 0.0 0.0 0.0 0.0 0.0 0.2
; degrees of freedom for OMEGA prior
$OMEGAPD
(8 FIXED)           ;[dfo]

; Starting with a short iterative two stage analysis brings the
; results closer so less time needs to be spent during the
; burn-in of the BAYES analysis

$EST METHOD=ITS INTERACTION SIGL=4 NITER=15 PRINT=1 NOABORT NOPRIOR=1 file=nuts_example6_itsh.ext
$EST METHOD=bayes INTERACTION NBURN=200 NITER=0 PRINT=10 MASSRESET=1 NOPRIOR=0 file=nuts_example6_bayesh.ext
$EST METHOD=NUTS INTERACTION  NBURN=100 NUTS_BASE=20 NITER=200 PRINT=1 MASSRESET=0 PMADAPT=100  file=nuts_example6h.ext

;$EST METHOD=ITS INTERACTION NITER=25 NOABORT NOPRIOR=1 PRINT=1 SIGL=4 file=nuts_example6_its.ext
;$EST METHOD=NUTS AUTO=1 PRINT=1 NITER=1000 NOPRIOR=0 NUTS_INIT=5 file=nuts_example6.ext ; OLKJDF=5.0  SLKJDF=2.0

$COV MATRIX=R UNCONDITIONAL

NM-TRAN MESSAGES
 WARNINGS AND ERRORS (IF ANY) FOR PROBLEM    1
 (WARNING  2) NM-TRAN INFERS THAT THE DATA ARE POPULATION.
 (MU_WARNING 20) MU_001: MU_ VARIABLE SHOULD NOT BE DEFINED AFTER VERBATIM CODE.

1NONLINEAR MIXED EFFECTS MODEL PROGRAM (NONMEM) VERSION 7.5.1
 ORIGINALLY DEVELOPED BY STUART BEAL, LEWIS SHEINER, AND ALISON BOECKMANN
 CURRENT DEVELOPERS ARE ROBERT BAUER, ICON DEVELOPMENT SOLUTIONS,
 AND ALISON BOECKMANN. IMPLEMENTATION, EFFICIENCY, AND STANDARDIZATION
 PERFORMED BY NOUS INFOSYSTEMS.
 PROBLEM NO.:         1
 RUN# example6 (from r2compl)
 TOT. NO. OF OBS RECS:     1568
 TOT. NO. OF INDIVIDUALS:       50
 GENERAL NONLINEAR KINETICS MODEL WITH STIFF/NONSTIFF EQUATIONS (LSODA, ADVAN13)
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 #TBLN:      1
 #METH: Iterative Two Stage (No Prior)
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
 #TERM:
 OPTIMIZATION WAS NOT TESTED FOR CONVERGENCE

 ETABAR IS THE ARITHMETIC MEAN OF THE ETA-ESTIMATES,
 AND THE P-VALUE IS GIVEN FOR THE NULL HYPOTHESIS THAT THE TRUE MEAN IS 0.

 ETABAR:         9.2524E-05 -1.2895E-03 -1.1590E-04  1.6553E-05  1.6669E-04  3.9397E-04  2.3376E-04  2.2385E-04
 SE:             6.9230E-02  5.5070E-02  3.7225E-02  6.6817E-02  5.4993E-02  5.7660E-02  6.4235E-02  5.8872E-02
 N:                      50          50          50          50          50          50          50          50

 P VAL.:         9.9893E-01  9.8132E-01  9.9752E-01  9.9980E-01  9.9758E-01  9.9455E-01  9.9710E-01  9.9697E-01

 ETASHRINKSD(%)  6.5907E-01  4.7536E+00  1.0405E+01  2.0737E+00  1.6018E+00  6.1047E+00  3.5433E-01  1.8560E+00
 ETASHRINKVR(%)  1.3138E+00  9.2813E+00  1.9728E+01  4.1043E+00  3.1780E+00  1.1837E+01  7.0741E-01  3.6775E+00
 EBVSHRINKSD(%)  6.6867E-01  4.9564E+00  1.0368E+01  2.0725E+00  1.5795E+00  6.0827E+00  3.8653E-01  1.8458E+00
 EBVSHRINKVR(%)  1.3329E+00  9.6671E+00  1.9661E+01  4.1021E+00  3.1341E+00  1.1795E+01  7.7157E-01  3.6574E+00
 RELATIVEINF(%)  1.0000E+02  3.5869E+01  6.3261E+01  9.2919E+01  7.0983E+01  4.7122E+01  1.0000E+02  6.5881E+01
 EPSSHRINKSD(%)  1.5444E+01  6.8830E+00
 EPSSHRINKVR(%)  2.8503E+01  1.3292E+01


 TOTAL DATA POINTS NORMALLY DISTRIBUTED (N):         1568
 N*LOG(2PI) CONSTANT TO OBJECTIVE FUNCTION:    2881.7912401298536
 OBJECTIVE FUNCTION VALUE WITHOUT CONSTANT:   -4701.6887932586660
 OBJECTIVE FUNCTION VALUE WITH CONSTANT:      -1819.8975531288124
 REPORTED OBJECTIVE FUNCTION DOES NOT CONTAIN CONSTANT

 TOTAL EFFECTIVE ETAS (NIND*NETA):                           400


 #TERE:
 Elapsed estimation  time in seconds:    81.50
 Elapsed covariance  time in seconds:     0.09

 ********************                          ITERATIVE TWO STAGE (NO PRIOR)                        ********************
 #OBJT:**************                        FINAL VALUE OF OBJECTIVE FUNCTION                       ********************
 #OBJV:********************************************    -4701.689       **************************************************

 ********************                          ITERATIVE TWO STAGE (NO PRIOR)                        ********************
 ********************                             FINAL PARAMETER ESTIMATE                           ********************

 THETA - VECTOR OF FIXED EFFECTS PARAMETERS   *********
         TH 1      TH 2      TH 3      TH 4      TH 5      TH 6      TH 7      TH 8
         3.89E+00 -2.20E+00  5.96E-01 -1.69E-01  2.31E+00  2.52E-01  3.66E+00 -7.27E-01

 OMEGA - COV MATRIX FOR RANDOM EFFECTS - ETAS  ********
         ETA1      ETA2      ETA3      ETA4      ETA5      ETA6      ETA7      ETA8
 ETA1
+        2.43E-01
 ETA2
+       -3.86E-02  1.67E-01
 ETA3
+        4.62E-02 -1.59E-02  8.63E-02
 ETA4
+        2.75E-02  5.68E-02 -3.71E-03  2.33E-01
 ETA5
+        3.16E-02  2.81E-02 -4.19E-03 -3.09E-02  1.56E-01
 ETA6
+       -2.37E-02  1.05E-02  2.44E-02  1.69E-02 -8.05E-02  1.89E-01
 ETA7
+        2.71E-02 -4.62E-02  2.49E-02 -7.70E-02  3.13E-02  5.84E-03  2.08E-01
 ETA8
+        9.18E-02  7.87E-02  3.94E-02  4.42E-02  1.12E-02 -4.61E-02  4.41E-02  1.80E-01

 SIGMA - COV MATRIX FOR RANDOM EFFECTS - EPSILONS  ****
         EPS1      EPS2
 EPS1
+        9.31E-03
 EPS2
+        0.00E+00  2.25E-02

 OMEGA - CORR MATRIX FOR RANDOM EFFECTS - ETAS  *******
         ETA1      ETA2      ETA3      ETA4      ETA5      ETA6      ETA7      ETA8
 ETA1
+        4.93E-01
 ETA2
+       -1.92E-01  4.09E-01
 ETA3
+        3.19E-01 -1.33E-01  2.94E-01
 ETA4
+        1.16E-01  2.88E-01 -2.62E-02  4.82E-01
 ETA5
+        1.62E-01  1.74E-01 -3.60E-02 -1.62E-01  3.95E-01
 ETA6
+       -1.11E-01  5.91E-02  1.91E-01  8.09E-02 -4.69E-01  4.34E-01
 ETA7
+        1.21E-01 -2.48E-01  1.86E-01 -3.50E-01  1.74E-01  2.95E-02  4.56E-01
 ETA8
+        4.39E-01  4.54E-01  3.16E-01  2.16E-01  6.68E-02 -2.50E-01  2.28E-01  4.24E-01

 SIGMA - CORR MATRIX FOR RANDOM EFFECTS - EPSILONS  ***
         EPS1      EPS2
 EPS1
+        9.65E-02
 EPS2
+        0.00E+00  1.50E-01

 ********************                          ITERATIVE TWO STAGE (NO PRIOR)                        ********************
 ********************                          STANDARD ERROR OF ESTIMATE (S)                        ********************

 THETA - VECTOR OF FIXED EFFECTS PARAMETERS   *********
         TH 1      TH 2      TH 3      TH 4      TH 5      TH 6      TH 7      TH 8
         3.20E-01  2.25E-01  2.41E-01  2.42E-01  1.64E-01  2.90E-01  1.56E-01  3.04E-01

 OMEGA - COV MATRIX FOR RANDOM EFFECTS - ETAS  ********
         ETA1      ETA2      ETA3      ETA4      ETA5      ETA6      ETA7      ETA8
 ETA1
+        1.54E-01
 ETA2
+        2.63E-01  4.05E-01
 ETA3
+        1.20E-01  1.56E-01  2.08E-01
 ETA4
+        9.04E-02  1.76E-01  1.19E-01  1.79E-01
 ETA5
+        1.44E-01  1.02E-01  9.78E-02  1.62E-01  2.83E-01
 ETA6
+        1.12E-01  1.75E-01  1.37E-01  1.74E-01  7.18E-02  1.59E-01
 ETA7
+        1.64E-01  1.18E-01  1.39E-01  1.01E-01  1.12E-01  9.81E-02  1.39E-01
 ETA8
+        2.05E-01  1.54E-01  7.42E-02  1.03E-01  1.26E-01  1.85E-01  1.13E-01  2.50E-01

 SIGMA - COV MATRIX FOR RANDOM EFFECTS - EPSILONS  ****
         EPS1      EPS2
 EPS1
+        2.66E-03
 EPS2
+        0.00E+00  4.20E-03

 OMEGA - CORR MATRIX FOR RANDOM EFFECTS - ETAS  *******
         ETA1      ETA2      ETA3      ETA4      ETA5      ETA6      ETA7      ETA8
 ETA1
+        1.56E-01
 ETA2
+        1.13E+00  4.96E-01
 ETA3
+        7.42E-01  1.14E+00  3.54E-01
 ETA4
+        3.77E-01  7.43E-01  8.57E-01  1.85E-01
 ETA5
+        7.30E-01  7.15E-01  8.40E-01  9.22E-01  3.58E-01
 ETA6
+        5.31E-01  9.62E-01  1.07E+00  8.20E-01  6.92E-01  1.83E-01
 ETA7
+        7.18E-01  4.92E-01  1.14E+00  4.36E-01  6.98E-01  4.99E-01  1.53E-01
 ETA8
+        6.41E-01  9.68E-01  3.75E-01  3.96E-01  7.95E-01  8.79E-01  5.28E-01  2.95E-01

 SIGMA - CORR MATRIX FOR RANDOM EFFECTS - EPSILONS  ***
         EPS1      EPS2
 EPS1
+        1.38E-02
 EPS2
+       .........  1.40E-02
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 #TBLN:      2
 #METH: MCMC Bayesian Analysis
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
 #TERM:
 BURN-IN WAS NOT TESTED FOR CONVERGENCE
 STATISTICAL PORTION WAS NOT PERFORMED

 ETABAR IS THE ARITHMETIC MEAN OF THE ETA-ESTIMATES,
 AND THE P-VALUE IS GIVEN FOR THE NULL HYPOTHESIS THAT THE TRUE MEAN IS 0.

 ETABAR:         1.6810E-02  9.2679E-03 -5.3423E-03  1.7155E-02  1.6454E-02 -5.8283E-02 -8.1883E-02  3.9032E-02
 SE:             7.0167E-02  5.7384E-02  3.9397E-02  6.5741E-02  5.7511E-02  5.7025E-02  6.4560E-02  6.1283E-02
 N:                      50          50          50          50          50          50          50          50

 P VAL.:         8.1066E-01  8.7169E-01  8.9214E-01  7.9413E-01  7.7480E-01  3.0675E-01  2.0469E-01  5.2419E-01

 ETASHRINKSD(%)  1.0672E+01  1.3079E+01  2.0746E+01  2.0131E+01  1.4081E+01  1.0530E+01  3.6825E+01  1.5248E+01
 ETASHRINKVR(%)  2.0205E+01  2.4448E+01  3.7188E+01  3.6209E+01  2.6179E+01  1.9951E+01  6.0089E+01  2.8171E+01
 EBVSHRINKSD(%)         NaN         NaN         NaN         NaN         NaN         NaN         NaN         NaN
 EBVSHRINKVR(%)         NaN         NaN         NaN         NaN         NaN         NaN         NaN         NaN
 RELATIVEINF(%)  0.0000E+00  0.0000E+00  0.0000E+00  0.0000E+00  0.0000E+00  0.0000E+00  0.0000E+00  0.0000E+00
 EPSSHRINKSD(%)  1.9513E+00  1.0000E-10
 EPSSHRINKVR(%)  3.8645E+00  1.0000E-10


 TOTAL DATA POINTS NORMALLY DISTRIBUTED (N):         1568
 N*LOG(2PI) CONSTANT TO OBJECTIVE FUNCTION:    2881.7912401298536
 OBJECTIVE FUNCTION VALUE WITHOUT CONSTANT:   -6558.0531258444526
 OBJECTIVE FUNCTION VALUE WITH CONSTANT:      -3676.2618857145990
 REPORTED OBJECTIVE FUNCTION DOES NOT CONTAIN CONSTANT

 TOTAL EFFECTIVE ETAS (NIND*NETA):                           400
 NIND*NETA*LOG(2PI) CONSTANT TO OBJECTIVE FUNCTION:    735.15082656373818
 OBJECTIVE FUNCTION VALUE WITHOUT CONSTANT:   -6558.0531258444526
 OBJECTIVE FUNCTION VALUE WITH CONSTANT:      -5822.9022992807140
 REPORTED OBJECTIVE FUNCTION DOES NOT CONTAIN CONSTANT

 PRIOR CONSTANT TO OBJECTIVE FUNCTION:    55.177915743687578
 OBJECTIVE FUNCTION VALUE WITHOUT CONSTANT:   -6558.0531258444526
 OBJECTIVE FUNCTION VALUE WITH CONSTANT:      -6502.8752101007649
 REPORTED OBJECTIVE FUNCTION DOES NOT CONTAIN CONSTANT


 #TERE:
 Elapsed estimation  time in seconds:    85.42

 ********************                              MCMC BAYESIAN ANALYSIS                            ********************
 #OBJT:**************                       AVERAGE VALUE OF LIKELIHOOD FUNCTION                     ********************
 #OBJV:********************************************    -6558.053       **************************************************
 #OBJS:********************************************        0.000 (STD) **************************************************

 ********************                              MCMC BAYESIAN ANALYSIS                            ********************
 ********************                             FINAL PARAMETER ESTIMATE                           ********************

 THETA - VECTOR OF FIXED EFFECTS PARAMETERS   *********
         TH 1      TH 2      TH 3      TH 4      TH 5      TH 6      TH 7      TH 8
         3.87E+00 -2.22E+00  6.01E-01 -1.87E-01  2.27E+00  2.69E-01  3.75E+00 -7.55E-01

 OMEGA - COV MATRIX FOR RANDOM EFFECTS - ETAS  ********
         ETA1      ETA2      ETA3      ETA4      ETA5      ETA6      ETA7      ETA8
 ETA1
+        3.09E-01
 ETA2
+       -8.70E-02  2.18E-01
 ETA3
+        6.42E-02 -3.81E-02  1.24E-01
 ETA4
+       -7.58E-02  7.97E-02 -1.01E-01  3.39E-01
 ETA5
+        1.03E-01  3.39E-02  3.86E-02 -8.93E-02  2.24E-01
 ETA6
+       -1.10E-01  9.47E-03  4.13E-04  2.91E-02 -9.78E-02  2.03E-01
 ETA7
+        1.07E-01 -9.50E-02  6.16E-02 -1.92E-01  8.20E-02  3.88E-03  5.22E-01
 ETA8
+        7.79E-02  8.12E-02  2.61E-02 -4.72E-02  5.76E-02 -2.27E-02  1.40E-01  2.61E-01

 SIGMA - COV MATRIX FOR RANDOM EFFECTS - EPSILONS  ****
         EPS1      EPS2
 EPS1
+        9.80E-03
 EPS2
+        0.00E+00  2.11E-02

 OMEGA - CORR MATRIX FOR RANDOM EFFECTS - ETAS  *******
         ETA1      ETA2      ETA3      ETA4      ETA5      ETA6      ETA7      ETA8
 ETA1
+        5.55E-01
 ETA2
+       -3.35E-01  4.67E-01
 ETA3
+        3.29E-01 -2.32E-01  3.51E-01
 ETA4
+       -2.34E-01  2.93E-01 -4.95E-01  5.82E-01
 ETA5
+        3.91E-01  1.54E-01  2.32E-01 -3.24E-01  4.73E-01
 ETA6
+       -4.39E-01  4.50E-02  2.60E-03  1.11E-01 -4.59E-01  4.51E-01
 ETA7
+        2.67E-01 -2.82E-01  2.42E-01 -4.57E-01  2.40E-01  1.19E-02  7.23E-01
 ETA8
+        2.74E-01  3.40E-01  1.45E-01 -1.59E-01  2.38E-01 -9.87E-02  3.78E-01  5.11E-01

 SIGMA - CORR MATRIX FOR RANDOM EFFECTS - EPSILONS  ***
         EPS1      EPS2
 EPS1
+        9.90E-02
 EPS2
+        0.00E+00  1.45E-01
 #TBLN:      3
 #METH: NUTS Bayesian Analysis
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
 #TERM:
 BURN-IN WAS NOT TESTED FOR CONVERGENCE
 STATISTICAL PORTION WAS COMPLETED

 ETABAR IS THE ARITHMETIC MEAN OF THE ETA-ESTIMATES,
 AND THE P-VALUE IS GIVEN FOR THE NULL HYPOTHESIS THAT THE TRUE MEAN IS 0.

 ETABAR:         9.0231E-03  4.5783E-03 -4.9293E-03  2.6726E-03  7.1382E-03  1.2317E-03  1.1003E-03  4.8048E-04
 SE:             6.9319E-02  5.4105E-02  4.0150E-02  6.6966E-02  5.5231E-02  5.8557E-02  6.4203E-02  5.9216E-02
 N:                      50          50          50          50          50          50          50          50

 P VAL.:         8.9643E-01  9.3256E-01  9.0229E-01  9.6817E-01  8.9716E-01  9.8322E-01  9.8633E-01  9.9353E-01

 ETASHRINKSD(%)  8.6567E+00  2.0638E+01  2.5019E+01  9.2978E+00  1.1707E+01  1.5877E+01  9.3344E+00  1.0948E+01
 ETASHRINKVR(%)  1.6564E+01  3.7016E+01  4.3779E+01  1.7731E+01  2.2044E+01  2.9233E+01  1.7797E+01  2.0697E+01
 EBVSHRINKSD(%)  7.0327E-01  9.3925E+00  9.0017E+00  2.2495E+00  1.9021E+00  7.4163E+00  6.1106E-01  1.9156E+00
 EBVSHRINKVR(%)  1.4016E+00  1.7903E+01  1.7193E+01  4.4484E+00  3.7679E+00  1.4283E+01  1.2184E+00  3.7944E+00
 RELATIVEINF(%)  9.7668E+01  6.9028E+01  7.8295E+01  9.3511E+01  9.0276E+01  7.6331E+01  1.0000E+02  9.0773E+01
 EPSSHRINKSD(%)  1.6764E+01  8.0601E+00
 EPSSHRINKVR(%)  3.0718E+01  1.5471E+01


 TOTAL DATA POINTS NORMALLY DISTRIBUTED (N):         1568
 N*LOG(2PI) CONSTANT TO OBJECTIVE FUNCTION:    2881.7912401298536
 OBJECTIVE FUNCTION VALUE WITHOUT CONSTANT:   -6622.6883136969445
 OBJECTIVE FUNCTION VALUE WITH CONSTANT:      -3740.8970735670910
 REPORTED OBJECTIVE FUNCTION DOES NOT CONTAIN CONSTANT

 TOTAL EFFECTIVE ETAS (NIND*NETA):                           400
 NIND*NETA*LOG(2PI) CONSTANT TO OBJECTIVE FUNCTION:    735.15082656373818
 OBJECTIVE FUNCTION VALUE WITHOUT CONSTANT:   -6622.6883136969445
 OBJECTIVE FUNCTION VALUE WITH CONSTANT:      -5887.5374871332060
 REPORTED OBJECTIVE FUNCTION DOES NOT CONTAIN CONSTANT

 PRIOR CONSTANT TO OBJECTIVE FUNCTION:    55.177915743687578
 OBJECTIVE FUNCTION VALUE WITHOUT CONSTANT:   -6622.6883136969445
 OBJECTIVE FUNCTION VALUE WITH CONSTANT:      -6567.5103979532569
 REPORTED OBJECTIVE FUNCTION DOES NOT CONTAIN CONSTANT


 #TERE:
 Elapsed estimation  time in seconds:  1204.94
 Elapsed covariance  time in seconds:     0.00

 ********************                              NUTS BAYESIAN ANALYSIS                            ********************
 #OBJT:**************                       AVERAGE VALUE OF LIKELIHOOD FUNCTION                     ********************
 #OBJV:********************************************    -6622.688       **************************************************
 #OBJS:********************************************       36.522 (STD) **************************************************

 ********************                              NUTS BAYESIAN ANALYSIS                            ********************
 ********************                             FINAL PARAMETER ESTIMATE                           ********************

 THETA - VECTOR OF FIXED EFFECTS PARAMETERS   *********
         TH 1      TH 2      TH 3      TH 4      TH 5      TH 6      TH 7      TH 8
         3.88E+00 -2.22E+00  5.93E-01 -1.70E-01  2.31E+00  2.75E-01  3.66E+00 -7.27E-01

 OMEGA - COV MATRIX FOR RANDOM EFFECTS - ETAS  ********
         ETA1      ETA2      ETA3      ETA4      ETA5      ETA6      ETA7      ETA8
 ETA1
+        2.88E-01
 ETA2
+       -3.84E-02  2.32E-01
 ETA3
+        4.61E-02 -1.01E-02  1.43E-01
 ETA4
+        2.78E-02  6.17E-02  5.30E-04  2.73E-01
 ETA5
+        3.44E-02  1.84E-02 -5.93E-03 -3.00E-02  1.96E-01
 ETA6
+       -2.62E-02  4.89E-03  1.54E-02  9.42E-03 -7.45E-02  2.42E-01
 ETA7
+        3.19E-02 -6.08E-02  2.64E-02 -8.30E-02  2.96E-02  6.82E-03  2.51E-01
 ETA8
+        9.33E-02  7.05E-02  4.35E-02  4.65E-02  1.32E-02 -4.67E-02  4.74E-02  2.21E-01

 SIGMA - COV MATRIX FOR RANDOM EFFECTS - EPSILONS  ****
         EPS1      EPS2
 EPS1
+        9.46E-03
 EPS2
+        0.00E+00  2.25E-02

 OMEGA - CORR MATRIX FOR RANDOM EFFECTS - ETAS  *******
         ETA1      ETA2      ETA3      ETA4      ETA5      ETA6      ETA7      ETA8
 ETA1
+        5.33E-01
 ETA2
+       -1.41E-01  4.78E-01
 ETA3
+        2.24E-01 -5.29E-02  3.75E-01
 ETA4
+        9.68E-02  2.44E-01 -3.82E-04  5.19E-01
 ETA5
+        1.48E-01  8.87E-02 -3.37E-02 -1.29E-01  4.40E-01
 ETA6
+       -1.02E-01  1.92E-02  8.41E-02  3.94E-02 -3.45E-01  4.89E-01
 ETA7
+        1.14E-01 -2.44E-01  1.36E-01 -3.15E-01  1.33E-01  2.32E-02  4.98E-01
 ETA8
+        3.63E-01  3.12E-01  2.39E-01  1.84E-01  6.67E-02 -2.06E-01  1.98E-01  4.67E-01

 SIGMA - CORR MATRIX FOR RANDOM EFFECTS - EPSILONS  ***
         EPS1      EPS2
 EPS1
+        9.72E-02
 EPS2
+        0.00E+00  1.50E-01

 ********************                              NUTS BAYESIAN ANALYSIS                            ********************
 ********************                STANDARD ERROR OF ESTIMATE (From Sample Variance)               ********************

 THETA - VECTOR OF FIXED EFFECTS PARAMETERS   *********
         TH 1      TH 2      TH 3      TH 4      TH 5      TH 6      TH 7      TH 8
         7.27E-02  7.64E-02  5.22E-02  6.94E-02  6.79E-02  7.46E-02  7.15E-02  7.06E-02

 OMEGA - COV MATRIX FOR RANDOM EFFECTS - ETAS  ********
         ETA1      ETA2      ETA3      ETA4      ETA5      ETA6      ETA7      ETA8
 ETA1
+        7.06E-02
 ETA2
+        4.56E-02  6.28E-02
 ETA3
+        3.30E-02  3.25E-02  3.88E-02
 ETA4
+        4.38E-02  3.70E-02  3.54E-02  6.47E-02
 ETA5
+        3.68E-02  3.39E-02  2.53E-02  3.55E-02  3.89E-02
 ETA6
+        4.27E-02  4.00E-02  3.14E-02  3.86E-02  3.03E-02  5.56E-02
 ETA7
+        4.11E-02  4.48E-02  2.80E-02  4.05E-02  3.13E-02  3.64E-02  5.17E-02
 ETA8
+        4.30E-02  3.81E-02  2.89E-02  4.18E-02  2.91E-02  3.24E-02  3.48E-02  5.01E-02

 SIGMA - COV MATRIX FOR RANDOM EFFECTS - EPSILONS  ****
         EPS1      EPS2
 EPS1
+        7.08E-04
 EPS2
+        0.00E+00  1.09E-03

 OMEGA - CORR MATRIX FOR RANDOM EFFECTS - ETAS  *******
         ETA1      ETA2      ETA3      ETA4      ETA5      ETA6      ETA7      ETA8
 ETA1
+        6.24E-02
 ETA2
+        1.52E-01  6.37E-02
 ETA3
+        1.43E-01  1.73E-01  4.98E-02
 ETA4
+        1.50E-01  1.29E-01  1.67E-01  6.05E-02
 ETA5
+        1.48E-01  1.55E-01  1.46E-01  1.43E-01  4.31E-02
 ETA6
+        1.55E-01  1.62E-01  1.67E-01  1.45E-01  1.25E-01  5.48E-02
 ETA7
+        1.42E-01  1.59E-01  1.36E-01  1.31E-01  1.37E-01  1.41E-01  5.03E-02
 ETA8
+        1.20E-01  1.38E-01  1.43E-01  1.42E-01  1.36E-01  1.30E-01  1.31E-01  5.16E-02

 SIGMA - CORR MATRIX FOR RANDOM EFFECTS - EPSILONS  ***
         EPS1      EPS2
 EPS1
+        3.63E-03
 EPS2
+        0.00E+00  3.61E-03
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 Elapsed postprocess time in seconds:     0.00
 Elapsed finaloutput time in seconds:     0.00
 #CPUT: Total CPU Time in Seconds,     1368.797
