$PROBLEM WARFARIN
$INPUT  ID TIME AMT EVID MDV DV IPREDZ
; data file based on 15 time points, from warfarin_fob4
$DATA warfarin_fobc5.tab ignore=@ REPL=100

$SUBROUTINES ADVAN2 TRANS2

$PK
MU_1=LOG(THETA(1))
MU_2=LOG(THETA(2))
MU_3=LOG(THETA(3))
CL=THETA(1)*EXP(ETA(1))
V=THETA(2)*EXP(ETA(2))
KA=THETA(3)*EXP(ETA(3))
S2=V
F1=1.0

$ERROR
IPRED=A(2)/V
Y=IPRED*(1.0+EPS(1)) + EPS(2)

$THETA
0.15 ;[CL]
8.0  ;[V]
1.0  ;[KA]

$OMEGA (0.07 ) (0.02 ) (0.6 )
$SIGMA (0.01 ) (0.001 FIX )

$SIML (3344567) SUBP=1

$EST METHOD=1 INTERACTION MAXEVAL=0 nohabort PRINT=1
$COV MATRIX=R UNCONDITIONAL
