Sun 03/21/2021
07:12 PM
$PROBLEM WARFARIN
$INPUT  ID TIME AMT EVID MDV DV IPREDZ
; data file based on 15 time points, from warfarin_fob4
$DATA warfarin_fobc5.tab ignore=@ REPL=100

$SUBROUTINES ADVAN2 TRANS2

$PK
MU_1=LOG(THETA(1))
MU_2=LOG(THETA(2))
MU_3=LOG(THETA(3))
CL=THETA(1)*EXP(ETA(1))
V=THETA(2)*EXP(ETA(2))
KA=THETA(3)*EXP(ETA(3))
S2=V
F1=1.0

$ERROR
IPRED=A(2)/V
Y=IPRED*(1.0+EPS(1)) + EPS(2)

$THETA
0.15 ;[CL]
8.0  ;[V]
1.0  ;[KA]

$OMEGA (0.07 ) (0.02 ) (0.6 )
$SIGMA (0.01 ) (0.001 FIX )

$SIML (3344567) SUBP=1

$EST METHOD=1 INTERACTION MAXEVAL=0 nohabort PRINT=1
$COV MATRIX=R UNCONDITIONAL

NM-TRAN MESSAGES
 WARNINGS AND ERRORS (IF ANY) FOR PROBLEM    1
 (WARNING  2) NM-TRAN INFERS THAT THE DATA ARE POPULATION.
Note: Analytical 2nd Derivatives are constructed in FSUBS but are never used.
      You may insert $ABBR DERIV2=NO after the first $PROB to save FSUBS construction and compilation time

1NONLINEAR MIXED EFFECTS MODEL PROGRAM (NONMEM) VERSION 7.5.1
 ORIGINALLY DEVELOPED BY STUART BEAL, LEWIS SHEINER, AND ALISON BOECKMANN
 CURRENT DEVELOPERS ARE ROBERT BAUER, ICON DEVELOPMENT SOLUTIONS,
 AND ALISON BOECKMANN. IMPLEMENTATION, EFFICIENCY, AND STANDARDIZATION
 PERFORMED BY NOUS INFOSYSTEMS.
 PROBLEM NO.:         1
 WARFARIN
 TOT. NO. OF DATA RECS:       900
 TOT. NO. OF OBS RECS:      800
 TOT. NO. OF INDIVIDUALS:      100
 ONE COMPARTMENT MODEL WITH FIRST-ORDER ABSORPTION (ADVAN2)
 PROBLEM NO.:           1      SUBPROBLEM NO.:           1
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 SIMULATION STEP PERFORMED
 Elapsed simulation  time in seconds:     0.01
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 Elapsed evaluation time in seconds:     0.09
 Elapsed covariance  time in seconds:     3.09
 Elapsed postprocess time in seconds:     0.01

 ********************         FIRST ORDER CONDITIONAL ESTIMATION WITH INTERACTION (EVALUATION)       ********************
 #OBJT:**************                       MINIMUM VALUE OF OBJECTIVE FUNCTION                      ********************
 #OBJV:********************************************       54.930       **************************************************

 ********************         FIRST ORDER CONDITIONAL ESTIMATION WITH INTERACTION (EVALUATION)       ********************
 ********************                             FINAL PARAMETER ESTIMATE                           ********************

 THETA - VECTOR OF FIXED EFFECTS PARAMETERS   *********
         TH 1      TH 2      TH 3
         1.50E-01  8.00E+00  1.00E+00

 OMEGA - COV MATRIX FOR RANDOM EFFECTS - ETAS  ********
         ETA1      ETA2      ETA3
 ETA1
+        7.00E-02
 ETA2
+        0.00E+00  2.00E-02
 ETA3
+        0.00E+00  0.00E+00  6.00E-01

 SIGMA - COV MATRIX FOR RANDOM EFFECTS - EPSILONS  ****
         EPS1      EPS2
 EPS1
+        1.00E-02
 EPS2
+        0.00E+00  1.00E-03

 OMEGA - CORR MATRIX FOR RANDOM EFFECTS - ETAS  *******
         ETA1      ETA2      ETA3
 ETA1
+        2.65E-01
 ETA2
+        0.00E+00  1.41E-01
 ETA3
+        0.00E+00  0.00E+00  7.75E-01

 SIGMA - CORR MATRIX FOR RANDOM EFFECTS - EPSILONS  ***
         EPS1      EPS2
 EPS1
+        1.00E-01
 EPS2
+        0.00E+00  3.16E-02

 ********************         FIRST ORDER CONDITIONAL ESTIMATION WITH INTERACTION (EVALUATION)       ********************
 ********************                            STANDARD ERROR OF ESTIMATE                          ********************

 THETA - VECTOR OF FIXED EFFECTS PARAMETERS   *********
         TH 1      TH 2      TH 3
         4.34E-03  1.24E-01  7.60E-02

 OMEGA - COV MATRIX FOR RANDOM EFFECTS - ETAS  ********
         ETA1      ETA2      ETA3
 ETA1
+        1.10E-02
 ETA2
+       .........  3.17E-03
 ETA3
+       ......... .........  1.03E-01

 SIGMA - COV MATRIX FOR RANDOM EFFECTS - EPSILONS  ****
         EPS1      EPS2
 EPS1
+        6.94E-04
 EPS2
+       ......... .........

 OMEGA - CORR MATRIX FOR RANDOM EFFECTS - ETAS  *******
         ETA1      ETA2      ETA3
 ETA1
+        2.08E-02
 ETA2
+       .........  1.12E-02
 ETA3
+       ......... .........  6.65E-02

 SIGMA - CORR MATRIX FOR RANDOM EFFECTS - EPSILONS  ***
         EPS1      EPS2
 EPS1
+        3.47E-03
 EPS2
+       ......... .........

 ********************         FIRST ORDER CONDITIONAL ESTIMATION WITH INTERACTION (EVALUATION)       ********************
 ********************                          COVARIANCE MATRIX OF ESTIMATE                         ********************

            TH 1      TH 2      TH 3      OM11      OM12      OM13      OM22      OM23      OM33      SG11      SG12      SG22
 TH 1
+        1.88E-05
 TH 2
+        2.24E-05  1.54E-02
 TH 3
+        3.20E-06  3.72E-04  5.78E-03
 OM11
+        1.41E-05  1.69E-05  2.60E-06  1.21E-04
 OM12
+       ......... ......... ......... ......... .........
 OM13
+       ......... ......... ......... ......... ......... .........
 OM22
+       -8.24E-08 -6.22E-05 -5.97E-08  1.37E-07 ......... .........  1.01E-05
 OM23
+       ......... ......... ......... ......... ......... ......... ......... .........
 OM33
+        8.92E-07  7.25E-05 -1.97E-03  3.23E-06 ......... .........  5.45E-06 .........  1.06E-02
 SG11
+        6.90E-08  4.08E-06 -1.17E-07 -1.29E-07 ......... ......... -2.28E-07 ......... -1.80E-06  4.82E-07
 SG12
+       ......... ......... ......... ......... ......... ......... ......... ......... ......... ......... .........
 SG22
+       ......... ......... ......... ......... ......... ......... ......... ......... ......... ......... ......... .........

 ********************         FIRST ORDER CONDITIONAL ESTIMATION WITH INTERACTION (EVALUATION)       ********************
 ********************                          CORRELATION MATRIX OF ESTIMATE                        ********************

            TH 1      TH 2      TH 3      OM11      OM12      OM13      OM22      OM23      OM33      SG11      SG12      SG22
 TH 1
+        4.34E-03
 TH 2
+        4.17E-02  1.24E-01
 TH 3
+        9.71E-03  3.95E-02  7.60E-02
 OM11
+        2.95E-01  1.23E-02  3.10E-03  1.10E-02
 OM12
+       ......... ......... ......... ......... .........
 OM13
+       ......... ......... ......... ......... ......... .........
 OM22
+       -5.99E-03 -1.58E-01 -2.48E-04  3.91E-03 ......... .........  3.17E-03
 OM23
+       ......... ......... ......... ......... ......... ......... ......... .........
 OM33
+        2.00E-03  5.67E-03 -2.51E-01  2.84E-03 ......... .........  1.67E-02 .........  1.03E-01
 SG11
+        2.29E-02  4.73E-02 -2.22E-03 -1.69E-02 ......... ......... -1.04E-01 ......... -2.52E-02  6.94E-04
 SG12
+       ......... ......... ......... ......... ......... ......... ......... ......... ......... ......... .........
 SG22
+       ......... ......... ......... ......... ......... ......... ......... ......... ......... ......... ......... .........
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 Elapsed finaloutput time in seconds:     0.02
 #CPUT: Total CPU Time in Seconds,        4.000
