Mon 03/20/2023
06:59 PM
$PROBLEM EDS50 Model Visual Acuity
$INPUT C ID TIME DOSEQ MDV DV
$DATA ed50s_fit.dat ignore=@

$PRED
MU_1=LOG(THETA(1))
MU_2=LOG(THETA(2))
MU_3=LOG(THETA(3))
MU_4=LOG(THETA(4))
MU_5=LOG(THETA(5))
MU_6=LOG(THETA(6))

IF(MDV==1) THEN
DOSE=DOSEQ
ELSE
DOSE=DOSE
ENDIF

VA0=EXP(MU_1+ETA(1))
KK=EXP(MU_2+ETA(2))
BETA=EXP(MU_3+ETA(3))

EMAXS=EXP(MU_4+ETA(4))
ED50S=EXP(MU_5+ETA(5))
GAMM=EXP(MU_6+ETA(6))

DG=DOSE**GAMM
EE=EMAXS*DG/((ED50S**GAMM)+DG)

IPRED=VA0+(1.0-EXP(-KK*TIME))*(EE-BETA*VA0)
Y=IPRED + EPS(1)

$THETA
55.0     ;[VA0]
0.005    ;[KK]
0.2      ; [BETA]
30.0     ;[EMAXS]
150.0    ;[ED50S]
(2.0 FIXED) ;[GAMM]

$OMEGA 0.07 0.5 1.0 0.17 0.49 (0.0 FIXED)
$SIGMA 28.0

$EST METHOD=1 INTERACTION MAXEVAL=999 PRINT=1 NOHABORT
$COV MATRIX=R PRINT=E UNCONDITIONAL

NM-TRAN MESSAGES
 WARNINGS AND ERRORS (IF ANY) FOR PROBLEM    1
 (WARNING  2) NM-TRAN INFERS THAT THE DATA ARE POPULATION.
 (WARNING  97) A RANDOM QUANTITY IS RAISED TO A POWER. IF THE RESULT AFFECTS
 THE VALUE OF THE OBJECTIVE FUNCTION, THE USER SHOULD ENSURE THAT THE
 RANDOM QUANTITY IS NEVER 0 WHEN THE POWER IS < 1.
 (WARNING  99) A RANDOM QUANTITY IS USED AS A POWER. IF THE RESULT AFFECTS
 THE VALUE OF THE OBJECTIVE FUNCTION, THE USER SHOULD ENSURE THAT THE
 QUANTITY RAISED TO THE POWER IS NOT 0.
 (MU_WARNING 24) ABBREVIATED CODE IS TOO COMPLEX. UNABLE TO CHECK USE OF MU_ VARIABLES.
Note: Analytical 2nd Derivatives are constructed in FSUBS but are never used.
      You may insert $ABBR DERIV2=NO after the first $PROB to save FSUBS construction and compilation time

1NONLINEAR MIXED EFFECTS MODEL PROGRAM (NONMEM) VERSION 7.5.2
 ORIGINALLY DEVELOPED BY STUART BEAL, LEWIS SHEINER, AND ALISON BOECKMANN
 CURRENT DEVELOPERS ARE ROBERT BAUER, ICON DEVELOPMENT SOLUTIONS,
 AND ALISON BOECKMANN. IMPLEMENTATION, EFFICIENCY, AND STANDARDIZATION
 PERFORMED BY NOUS INFOSYSTEMS.
 PROBLEM NO.:         1
 EDS50 Model Visual Acuity
 TOT. NO. OF OBS RECS:      900
 TOT. NO. OF INDIVIDUALS:      300
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 #TBLN:      1
 #METH: First Order Conditional Estimation with Interaction
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
 #TERM:
0MINIMIZATION SUCCESSFUL
 NO. OF FUNCTION EVALUATIONS USED:      269
 NO. OF SIG. DIGITS IN FINAL EST.:  3.8

 ETABAR IS THE ARITHMETIC MEAN OF THE ETA-ESTIMATES,
 AND THE P-VALUE IS GIVEN FOR THE NULL HYPOTHESIS THAT THE TRUE MEAN IS 0.

 ETABAR:         1.8990E-02  8.4217E-03  1.5810E-01  6.0206E-02 -2.3117E-02  0.0000E+00
 SE:             1.5086E-02  7.1443E-03  3.3476E-02  1.4075E-02  6.9494E-03  0.0000E+00
 N:                     300         300         300         300         300         300

 P VAL.:         2.0812E-01  2.3848E-01  2.3301E-06  1.8904E-05  8.7982E-04  1.0000E+00

 ETASHRINKSD(%)  7.7563E+00  7.0168E+01  2.7185E+01  5.5099E+01  7.9673E+01  0.0000E+00
 ETASHRINKVR(%)  1.4911E+01  9.1100E+01  4.6980E+01  7.9839E+01  9.5868E+01  0.0000E+00
 EBVSHRINKSD(%)  6.2971E+00  7.0383E+01  2.6396E+01  5.5477E+01  7.7841E+01  0.0000E+00
 EBVSHRINKVR(%)  1.2198E+01  9.1229E+01  4.5824E+01  8.0177E+01  9.5090E+01  0.0000E+00
 RELATIVEINF(%)  8.6760E+01  8.5636E+00  3.6590E+01  9.4871E+00  2.3760E+00  0.0000E+00
 EPSSHRINKSD(%)  3.5999E+01
 EPSSHRINKVR(%)  5.9038E+01


 TOTAL DATA POINTS NORMALLY DISTRIBUTED (N):          900
 N*LOG(2PI) CONSTANT TO OBJECTIVE FUNCTION:    1654.08935976841
 OBJECTIVE FUNCTION VALUE WITHOUT CONSTANT:    5552.05173315019
 OBJECTIVE FUNCTION VALUE WITH CONSTANT:       7206.14109291860
 REPORTED OBJECTIVE FUNCTION DOES NOT CONTAIN CONSTANT

 TOTAL EFFECTIVE ETAS (NIND*NETA):                          1500


 #TERE:
 Elapsed estimation  time in seconds:     6.75
 Elapsed covariance  time in seconds:     5.49
 Elapsed postprocess time in seconds:     0.00

 ********************               FIRST ORDER CONDITIONAL ESTIMATION WITH INTERACTION              ********************
 #OBJT:**************                       MINIMUM VALUE OF OBJECTIVE FUNCTION                      ********************
 #OBJV:********************************************     5552.052       **************************************************

 ********************               FIRST ORDER CONDITIONAL ESTIMATION WITH INTERACTION              ********************
 ********************                             FINAL PARAMETER ESTIMATE                           ********************

 THETA - VECTOR OF FIXED EFFECTS PARAMETERS   *********
         TH 1      TH 2      TH 3      TH 4      TH 5      TH 6
         5.45E+01  5.64E-03  2.37E-01  2.39E+01  1.66E+02  2.00E+00

 OMEGA - COV MATRIX FOR RANDOM EFFECTS - ETAS  ********
         ETA1      ETA2      ETA3      ETA4      ETA5      ETA6
 ETA1
+        8.02E-02
 ETA2
+        0.00E+00  1.72E-01
 ETA3
+        0.00E+00  0.00E+00  6.34E-01
 ETA4
+        0.00E+00  0.00E+00  0.00E+00  2.95E-01
 ETA5
+        0.00E+00  0.00E+00  0.00E+00  0.00E+00  3.51E-01
 ETA6
+        0.00E+00  0.00E+00  0.00E+00  0.00E+00  0.00E+00  0.00E+00

 SIGMA - COV MATRIX FOR RANDOM EFFECTS - EPSILONS  ****
         EPS1
 EPS1
+        3.44E+01

 OMEGA - CORR MATRIX FOR RANDOM EFFECTS - ETAS  *******
         ETA1      ETA2      ETA3      ETA4      ETA5      ETA6
 ETA1
+        2.83E-01
 ETA2
+        0.00E+00  4.15E-01
 ETA3
+        0.00E+00  0.00E+00  7.96E-01
 ETA4
+        0.00E+00  0.00E+00  0.00E+00  5.43E-01
 ETA5
+        0.00E+00  0.00E+00  0.00E+00  0.00E+00  5.92E-01
 ETA6
+        0.00E+00  0.00E+00  0.00E+00  0.00E+00  0.00E+00  0.00E+00

 SIGMA - CORR MATRIX FOR RANDOM EFFECTS - EPSILONS  ***
         EPS1
 EPS1
+        5.86E+00

 ********************               FIRST ORDER CONDITIONAL ESTIMATION WITH INTERACTION              ********************
 ********************                            STANDARD ERROR OF ESTIMATE                          ********************

 THETA - VECTOR OF FIXED EFFECTS PARAMETERS   *********
         TH 1      TH 2      TH 3      TH 4      TH 5      TH 6
         9.63E-01  5.15E-04  2.21E-02  2.83E+00  4.21E+01 .........

 OMEGA - COV MATRIX FOR RANDOM EFFECTS - ETAS  ********
         ETA1      ETA2      ETA3      ETA4      ETA5      ETA6
 ETA1
+        7.63E-03
 ETA2
+       .........  8.99E-02
 ETA3
+       ......... .........  9.57E-02
 ETA4
+       ......... ......... .........  8.62E-02
 ETA5
+       ......... ......... ......... .........  3.14E-01
 ETA6
+       ......... ......... ......... ......... ......... .........

 SIGMA - COV MATRIX FOR RANDOM EFFECTS - EPSILONS  ****
         EPS1
 EPS1
+        3.07E+00

 OMEGA - CORR MATRIX FOR RANDOM EFFECTS - ETAS  *******
         ETA1      ETA2      ETA3      ETA4      ETA5      ETA6
 ETA1
+        1.35E-02
 ETA2
+       .........  1.08E-01
 ETA3
+       ......... .........  6.01E-02
 ETA4
+       ......... ......... .........  7.94E-02
 ETA5
+       ......... ......... ......... .........  2.65E-01
 ETA6
+       ......... ......... ......... ......... ......... .........

 SIGMA - CORR MATRIX FOR RANDOM EFFECTS - EPSILONS  ***
         EPS1
 EPS1
+        2.62E-01
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
 ********************               FIRST ORDER CONDITIONAL ESTIMATION WITH INTERACTION              ********************
 ********************                      EIGENVALUES OF COR MATRIX OF ESTIMATE                     ********************

             1         2         3         4         5         6         7         8         9        10        11
         1.48E-01  3.24E-01  5.96E-01  6.23E-01  7.00E-01  8.52E-01  9.68E-01  1.07E+00  1.50E+00  1.98E+00  2.25E+00
 Elapsed finaloutput time in seconds:     0.05
 #CPUT: Total CPU Time in Seconds,       12.172
