Mon 03/20/2023
06:53 PM
$PROBLEM EDS50 Model Visual Acuity
$INPUT C ID TIME DOSEQ MDV DV  REPL_
$DATA robust5_sim.dat ignore=@

$PRED
MU_1=LOG(THETA(1))
MU_2=LOG(THETA(2))
MU_3=LOG(THETA(3))
MU_4=LOG(THETA(4))
MU_5=LOG(THETA(5))
MU_6=LOG(THETA(6))

IF(MDV==1) THEN
DOSE=DOSEQ
ELSE
DOSE=DOSE
ENDIF

VA0=EXP(MU_1+ETA(1))
KK=EXP(MU_2+ETA(2))
BETA=EXP(MU_3+ETA(3))

EMAXS=EXP(MU_4+ETA(4))
ED50S=EXP(MU_5+ETA(5))
GAMM=EXP(MU_6+ETA(6))

DG=DOSE**GAMM
EE=EMAXS*DG/((ED50S**GAMM)+DG)

IPRED=VA0+(1.0-EXP(-KK*TIME))*(EE-BETA*VA0)
Y=IPRED + EPS(1)

$THETA
55.0     ;[VA0]
0.005    ;[KK]
0.2      ; [BETA]
30.0     ;[EMAXS]
150.0    ;[ED50S]
(2.0 FIXED) ;[GAMM]

$OMEGA 0.07 0.5 1.0 0.17 0.49 (0.0 FIXED)
$SIGMA 28.0

$SIML (122345) SUBP=1 ONLYSIM

$TABLE C ID TIME DOSE MDV DV NOAPPEND NOPRINT ONEHEADER FILE=ed50s_fit.dat

NM-TRAN MESSAGES
 WARNINGS AND ERRORS (IF ANY) FOR PROBLEM    1
 (WARNING  2) NM-TRAN INFERS THAT THE DATA ARE POPULATION.
 (WARNING  98) A RANDOM QUANTITY IS RAISED TO A POWER. IF THE RESULT AFFECTS
 THE VALUE OF THE OBJECTIVE FUNCTION AND THE "ONLYSIM" OPTION IS NOT USED,
 THE USER SHOULD ENSURE THAT THE RANDOM QUANTITY IS NEVER 0 WHEN THE POWER
 IS < 1.
 (WARNING  100) A RANDOM QUANTITY IS USED AS A POWER. IF THE RESULT AFFECTS
 THE VALUE OF THE OBJECTIVE FUNCTION AND THE "ONLYSIM" OPTION IS NOT USED,
 THE USER SHOULD ENSURE THAT THE QUANTITY RAISED TO THE POWER IS NOT 0.
 (MU_WARNING 24) ABBREVIATED CODE IS TOO COMPLEX. UNABLE TO CHECK USE OF MU_ VARIABLES.
Note: Analytical 2nd Derivatives are constructed in FSUBS but are never used.
      You may insert $ABBR DERIV2=NO after the first $PROB to save FSUBS construction and compilation time

1NONLINEAR MIXED EFFECTS MODEL PROGRAM (NONMEM) VERSION 7.5.2
 ORIGINALLY DEVELOPED BY STUART BEAL, LEWIS SHEINER, AND ALISON BOECKMANN
 CURRENT DEVELOPERS ARE ROBERT BAUER, ICON DEVELOPMENT SOLUTIONS,
 AND ALISON BOECKMANN. IMPLEMENTATION, EFFICIENCY, AND STANDARDIZATION
 PERFORMED BY NOUS INFOSYSTEMS.
 PROBLEM NO.:         1
 EDS50 Model Visual Acuity
 TOT. NO. OF DATA RECS:      1200
 TOT. NO. OF OBS RECS:      900
 TOT. NO. OF INDIVIDUALS:      300
 PROBLEM NO.:           1      SUBPROBLEM NO.:           1
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 SIMULATION STEP PERFORMED
 Elapsed simulation  time in seconds:     0.01
 Elapsed finaloutput time in seconds:     0.02
 #CPUT: Total CPU Time in Seconds,        0.094
