Sat 08/07/2021
02:18 AM
$PROBLEM WARFARIN
$INPUT ID TIME AMT RATE EVID MDV DV TSTRAT TMIN TMAX
$DATA priortrue.csv ignore=@

$SUBROUTINES ADVAN2 TRANS2

$PK
MU_1=THETA(1)
MU_2=THETA(2)
MU_3=THETA(3)
CL=EXP(MU_1+ETA(1))
V=EXP(MU_2+ETA(2))
KA=EXP(MU_3+ETA(3))
S2=V
F1=1.0
LTVCL=THETA(1) ; log of typical value Clearance
LTVV=THETA(2) ; log of typical value Volume
LTVKA=THETA(3) ; log of typical value KA

$ERROR
IPRED=A(2)/V
Y=IPRED*(1.0+EPS(1)) + EPS(2)

$THETA
-1.897 ;[lnCL]
2.079  ;[lnV]
0.0001  ;[lnKA]

$OMEGA (0.07 ) (0.02 ) (0.6 )
$SIGMA (0.01 ) (0.001 FIXED )

; NWPRI=Normal Wishart Prior.  That is, theta priors are assumed normally distributed,
; and Omegas and Sigmas are assumed Wishart distributed.
; PLEV=probability level over which random samples generated
; from the respective samplers are to be accepted.
; PLEV=0.99 allows acceptance of 99% of the samples generated,
; while avoiding extreme values that are outside of the 99%
; confidence bound of the distribution. When using the $PRIOR record to
; define the random sampler (Normal sampler for thetas, Wishart sampler for
; Omegas/Sigmas, PLEV must be specified.

$PRIOR NWPRI PLEV=0.99
; Thetas are in log units, to ensure 30% variation does not produce negative parameters
$THETAP (-1.897 FIXED) (2.079 FIXED) (0.001 FIXED)
$THETAPV BLOCK(3) ; make variance same as that of $OMEGA
0.07 FIX
0.0   0.02
0.0   0.0  0.6

$SIM (4442223) SUBPROB=1000 TRUE=PRIOR
$DESIGN NELDER FIMDIAG=1 GROUPSIZE=32 OFVTYPE=0 DESEL=TIME DESELSTRAT=TSTRAT DESELMIN=TMIN DESELMAX=TMAX
        MAXEVAL=4000 SIGL=10 nohabort PRINT=100 NOPRIOR=1
$TABLE ID LTVCL LTVV LTVKA TIME EVID MDV DV IPRED NOPRINT NOAPPEND FILE=priortrue2.tab

NM-TRAN MESSAGES
 WARNINGS AND ERRORS (IF ANY) FOR PROBLEM    1
 (WARNING  2) NM-TRAN INFERS THAT THE DATA ARE POPULATION.
 (MU_WARNING 17) MU_001: THETA(001) SHOULD NOT BE USED IN THE MODEL AFTER MU ASSOCIATION.
 (MU_WARNING 17) MU_002: THETA(002) SHOULD NOT BE USED IN THE MODEL AFTER MU ASSOCIATION.
 (MU_WARNING 17) MU_003: THETA(003) SHOULD NOT BE USED IN THE MODEL AFTER MU ASSOCIATION.

1NONLINEAR MIXED EFFECTS MODEL PROGRAM (NONMEM) VERSION 7.5.0
 ORIGINALLY DEVELOPED BY STUART BEAL, LEWIS SHEINER, AND ALISON BOECKMANN
 CURRENT DEVELOPERS ARE ROBERT BAUER, ICON DEVELOPMENT SOLUTIONS,
 AND ALISON BOECKMANN. IMPLEMENTATION, EFFICIENCY, AND STANDARDIZATION
 PERFORMED BY NOUS INFOSYSTEMS.
 PROBLEM NO.:         1
 WARFARIN
 TOT. NO. OF OBS RECS:        5
 TOT. NO. OF INDIVIDUALS:        1
 ONE COMPARTMENT MODEL WITH FIRST-ORDER ABSORPTION (ADVAN2)
 PROBLEM NO.:           1      SUBPROBLEM NO.:           1
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 SIMULATION STEP PERFORMED
 Elapsed simulation  time in seconds:     0.00
 #TBLN:      1
 #METH: First Order (No Prior): D-OPTIMALITY
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
 #TERM:
 NO. OF FUNCTION EVALUATIONS USED:       73
0MINIMIZATION SUCCESSFUL

 ETABAR IS THE ARITHMETIC MEAN OF THE ETA-ESTIMATES,
 AND THE P-VALUE IS GIVEN FOR THE NULL HYPOTHESIS THAT THE TRUE MEAN IS 0.

 ETABAR:         0.0000E+00  0.0000E+00  0.0000E+00
 SE:             0.0000E+00  0.0000E+00  0.0000E+00
 N:                       1           1           1

 P VAL.:         1.0000E+00  1.0000E+00  1.0000E+00

 ETASHRINKSD(%)  1.0000E+02  1.0000E+02  1.0000E+02
 ETASHRINKVR(%)  1.0000E+02  1.0000E+02  1.0000E+02
 EBVSHRINKSD(%)  1.9468E+00  7.3506E+00  1.2588E+00
 EBVSHRINKVR(%)  3.8556E+00  1.4161E+01  2.5017E+00
 RELATIVEINF(%)  9.5896E+01  8.5551E+01  9.7406E+01
 EPSSHRINKSD(%)  3.6754E+01  3.6754E+01
 EPSSHRINKVR(%)  6.0000E+01  6.0000E+01


 #TERE:
 Elapsed opt. design time in seconds:     0.03
 Elapsed postprocess time in seconds:     0.00

 ********************                       FIRST ORDER (NO PRIOR): D-OPTIMALITY                     ********************
 #OBJT:**************                MINIMUM VALUE OF OBJECTIVE FUNCTION: D-OPTIMALITY               ********************
 #OBJV:********************************************      -51.971       **************************************************

 ********************                       FIRST ORDER (NO PRIOR): D-OPTIMALITY                     ********************
 ********************                             FINAL PARAMETER ESTIMATE                           ********************

 THETA - VECTOR OF FIXED EFFECTS PARAMETERS   *********
         TH 1      TH 2      TH 3
        -1.72E+00  2.12E+00  9.79E-01

 OMEGA - COV MATRIX FOR RANDOM EFFECTS - ETAS  ********
         ETA1      ETA2      ETA3
 ETA1
+        7.00E-02
 ETA2
+        0.00E+00  2.00E-02
 ETA3
+        0.00E+00  0.00E+00  6.00E-01

 SIGMA - COV MATRIX FOR RANDOM EFFECTS - EPSILONS  ****
         EPS1      EPS2
 EPS1
+        1.00E-02
 EPS2
+        0.00E+00  1.00E-03

 OMEGA - CORR MATRIX FOR RANDOM EFFECTS - ETAS  *******
         ETA1      ETA2      ETA3
 ETA1
+        2.65E-01
 ETA2
+        0.00E+00  1.41E-01
 ETA3
+        0.00E+00  0.00E+00  7.75E-01

 SIGMA - CORR MATRIX FOR RANDOM EFFECTS - EPSILONS  ***
         EPS1      EPS2
 EPS1
+        1.00E-01
 EPS2
+        0.00E+00  3.16E-02

 ********************                       FIRST ORDER (NO PRIOR): D-OPTIMALITY                     ********************
 ********************                            STANDARD ERROR OF ESTIMATE                          ********************

 THETA - VECTOR OF FIXED EFFECTS PARAMETERS   *********
         TH 1      TH 2      TH 3
         4.78E-02  2.71E-02  1.39E-01

 OMEGA - COV MATRIX FOR RANDOM EFFECTS - ETAS  ********
         ETA1      ETA2      ETA3
 ETA1
+        1.82E-02
 ETA2
+       .........  5.87E-03
 ETA3
+       ......... .........  1.54E-01

 SIGMA - COV MATRIX FOR RANDOM EFFECTS - EPSILONS  ****
         EPS1      EPS2
 EPS1
+        1.77E-03
 EPS2
+       ......... .........

 OMEGA - CORR MATRIX FOR RANDOM EFFECTS - ETAS  *******
         ETA1      ETA2      ETA3
 ETA1
+        3.44E-02
 ETA2
+       .........  2.08E-02
 ETA3
+       ......... .........  9.94E-02

 SIGMA - CORR MATRIX FOR RANDOM EFFECTS - EPSILONS  ***
         EPS1      EPS2
 EPS1
+        8.84E-03
 EPS2
+       ......... .........

 ********************                       FIRST ORDER (NO PRIOR): D-OPTIMALITY                     ********************
 ********************                          COVARIANCE MATRIX OF ESTIMATE                         ********************

     TH 1 | TH 1      TH 2 | TH 1      TH 2 | TH 2      TH 3 | TH 1      TH 3 | TH 2      TH 3 | TH 3    OM11 | TH 1
     2.28E-03         6.60E-05         7.33E-04         6.82E-05         1.13E-04         1.93E-02         0.00E+00
   OM11 | TH 2      OM11 | TH 3      OM11 | OM11      OM22 | TH 1      OM22 | TH 2      OM22 | TH 3      OM22 | OM11
     0.00E+00         0.00E+00         3.32E-04         0.00E+00         0.00E+00         0.00E+00        -5.00E-08
   OM22 | OM22      OM33 | TH 1      OM33 | TH 2      OM33 | TH 3      OM33 | OM11      OM33 | OM22      OM33 | OM33
     3.45E-05         0.00E+00         0.00E+00         0.00E+00         7.54E-07         6.53E-07         2.37E-02
   SG11 | TH 1      SG11 | TH 2      SG11 | TH 3      SG11 | OM11      SG11 | OM22      SG11 | OM33      SG11 | SG11
     0.00E+00         0.00E+00         0.00E+00        -6.83E-07        -1.02E-06        -4.40E-06         3.12E-06

 ********************                       FIRST ORDER (NO PRIOR): D-OPTIMALITY                     ********************
 ********************                          CORRELATION MATRIX OF ESTIMATE                        ********************

     TH 1 | TH 1      TH 2 | TH 1      TH 2 | TH 2      TH 3 | TH 1      TH 3 | TH 2      TH 3 | TH 3    OM11 | TH 1
     4.78E-02         5.10E-02         2.71E-02         1.03E-02         3.01E-02         1.39E-01         0.00E+00
   OM11 | TH 2      OM11 | TH 3      OM11 | OM11      OM22 | TH 1      OM22 | TH 2      OM22 | TH 3      OM22 | OM11
     0.00E+00         0.00E+00         1.82E-02         0.00E+00         0.00E+00         0.00E+00        -4.68E-04
   OM22 | OM22      OM33 | TH 1      OM33 | TH 2      OM33 | TH 3      OM33 | OM11      OM33 | OM22      OM33 | OM33
     5.87E-03         0.00E+00         0.00E+00         0.00E+00         2.69E-04         7.23E-04         1.54E-01
   SG11 | TH 1      SG11 | TH 2      SG11 | TH 3      SG11 | OM11      SG11 | OM22      SG11 | OM33      SG11 | SG11
     0.00E+00         0.00E+00         0.00E+00        -2.12E-02        -9.86E-02        -1.62E-02         1.77E-03
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 Elapsed finaloutput time in seconds:     0.02
 PROBLEM NO.:           1      SUBPROBLEM NO.:           2
 SIMULATION STEP PERFORMED
 Elapsed simulation  time in seconds:     0.00
 #TBLN:      2
 #METH: First Order (No Prior): D-OPTIMALITY
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
 #TERM:
 NO. OF FUNCTION EVALUATIONS USED:       67
0MINIMIZATION SUCCESSFUL

 ETABAR IS THE ARITHMETIC MEAN OF THE ETA-ESTIMATES,
 AND THE P-VALUE IS GIVEN FOR THE NULL HYPOTHESIS THAT THE TRUE MEAN IS 0.

 ETABAR:         0.0000E+00  0.0000E+00  0.0000E+00
 SE:             0.0000E+00  0.0000E+00  0.0000E+00
 N:                       1           1           1

 P VAL.:         1.0000E+00  1.0000E+00  1.0000E+00

 ETASHRINKSD(%)  1.0000E+02  1.0000E+02  1.0000E+02
 ETASHRINKVR(%)  1.0000E+02  1.0000E+02  1.0000E+02
 EBVSHRINKSD(%)  1.8448E+00  7.7938E+00  1.2396E+00
 EBVSHRINKVR(%)  3.6555E+00  1.4980E+01  2.4638E+00
 RELATIVEINF(%)  9.6096E+01  8.4732E+01  9.7443E+01
 EPSSHRINKSD(%)  3.6754E+01  3.6754E+01
 EPSSHRINKVR(%)  6.0000E+01  6.0000E+01


 #TERE:
 Elapsed opt. design time in seconds:     0.02
 Elapsed postprocess time in seconds:     0.00

 ********************                       FIRST ORDER (NO PRIOR): D-OPTIMALITY                     ********************
 #OBJT:**************                MINIMUM VALUE OF OBJECTIVE FUNCTION: D-OPTIMALITY               ********************
 #OBJV:********************************************      -51.949       **************************************************

 ********************                       FIRST ORDER (NO PRIOR): D-OPTIMALITY                     ********************
 ********************                             FINAL PARAMETER ESTIMATE                           ********************

 THETA - VECTOR OF FIXED EFFECTS PARAMETERS   *********
         TH 1      TH 2      TH 3
        -1.70E+00  2.06E+00 -3.89E-01

 OMEGA - COV MATRIX FOR RANDOM EFFECTS - ETAS  ********
         ETA1      ETA2      ETA3
 ETA1
+        7.00E-02
 ETA2
+        0.00E+00  2.00E-02
 ETA3
+        0.00E+00  0.00E+00  6.00E-01

 SIGMA - COV MATRIX FOR RANDOM EFFECTS - EPSILONS  ****
         EPS1      EPS2
 EPS1
+        1.00E-02
 EPS2
+        0.00E+00  1.00E-03

 OMEGA - CORR MATRIX FOR RANDOM EFFECTS - ETAS  *******
         ETA1      ETA2      ETA3
 ETA1
+        2.65E-01
 ETA2
+        0.00E+00  1.41E-01
 ETA3
+        0.00E+00  0.00E+00  7.75E-01

 SIGMA - CORR MATRIX FOR RANDOM EFFECTS - EPSILONS  ***
         EPS1      EPS2
 EPS1
+        1.00E-01
 EPS2
+        0.00E+00  3.16E-02

 ********************                       FIRST ORDER (NO PRIOR): D-OPTIMALITY                     ********************
 ********************                            STANDARD ERROR OF ESTIMATE                          ********************

 THETA - VECTOR OF FIXED EFFECTS PARAMETERS   *********
         TH 1      TH 2      TH 3
         4.77E-02  2.72E-02  1.39E-01

 OMEGA - COV MATRIX FOR RANDOM EFFECTS - ETAS  ********
         ETA1      ETA2      ETA3
 ETA1
+        1.82E-02
 ETA2
+       .........  5.93E-03
 ETA3
+       ......... .........  1.54E-01

 SIGMA - COV MATRIX FOR RANDOM EFFECTS - EPSILONS  ****
         EPS1      EPS2
 EPS1
+        1.77E-03
 EPS2
+       ......... .........

 OMEGA - CORR MATRIX FOR RANDOM EFFECTS - ETAS  *******
         ETA1      ETA2      ETA3
 ETA1
+        3.44E-02
 ETA2
+       .........  2.10E-02
 ETA3
+       ......... .........  9.93E-02

 SIGMA - CORR MATRIX FOR RANDOM EFFECTS - EPSILONS  ***
         EPS1      EPS2
 EPS1
+        8.84E-03
 EPS2
+       ......... .........

 ********************                       FIRST ORDER (NO PRIOR): D-OPTIMALITY                     ********************
 ********************                          COVARIANCE MATRIX OF ESTIMATE                         ********************

     TH 1 | TH 1      TH 2 | TH 1      TH 2 | TH 2      TH 3 | TH 1      TH 3 | TH 2      TH 3 | TH 3    OM0101 | TH 1
     2.28E-03         6.64E-05         7.40E-04         6.14E-05         1.15E-04         1.93E-02         0.00E+00
   OM0101 | TH 2    OM0101 | TH 3    OM0101 | OM0101  OM0202 | TH 1    OM0202 | TH 2    OM0202 | TH 3    OM0202 | OM0101
     0.00E+00         0.00E+00         3.30E-04         0.00E+00         0.00E+00         0.00E+00        -6.13E-08
   OM0202 | OM0202  OM0303 | TH 1    OM0303 | TH 2    OM0303 | TH 3    OM0303 | OM0101  OM0303 | OM0202  OM0303 | OM0303
     3.52E-05         0.00E+00         0.00E+00         0.00E+00         7.04E-07         6.91E-07         2.37E-02
   SG0101 | TH 1    SG0101 | TH 2    SG0101 | TH 3    SG0101 | OM0101  SG0101 | OM0202  SG0101 | OM0303  SG0101 | SG0101
     0.00E+00         0.00E+00         0.00E+00        -6.22E-07        -1.09E-06        -4.34E-06         3.12E-06

 ********************                       FIRST ORDER (NO PRIOR): D-OPTIMALITY                     ********************
 ********************                          CORRELATION MATRIX OF ESTIMATE                        ********************

     TH 1 | TH 1      TH 2 | TH 1      TH 2 | TH 2      TH 3 | TH 1      TH 3 | TH 2      TH 3 | TH 3    OM0101 | TH 1
     4.77E-02         5.11E-02         2.72E-02         9.27E-03         3.04E-02         1.39E-01         0.00E+00
   OM0101 | TH 2    OM0101 | TH 3    OM0101 | OM0101  OM0202 | TH 1    OM0202 | TH 2    OM0202 | TH 3    OM0202 | OM0101
     0.00E+00         0.00E+00         1.82E-02         0.00E+00         0.00E+00         0.00E+00        -5.69E-04
   OM0202 | OM0202  OM0303 | TH 1    OM0303 | TH 2    OM0303 | TH 3    OM0303 | OM0101  OM0303 | OM0202  OM0303 | OM0303
     5.93E-03         0.00E+00         0.00E+00         0.00E+00         2.52E-04         7.58E-04         1.54E-01
   SG0101 | TH 1    SG0101 | TH 2    SG0101 | TH 3    SG0101 | OM0101  SG0101 | OM0202  SG0101 | OM0303  SG0101 | SG0101
     0.00E+00         0.00E+00         0.00E+00        -1.94E-02        -1.04E-01        -1.60E-02         1.77E-03
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 Elapsed finaloutput time in seconds:     0.01
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 #CPUT: Total CPU Time in Seconds,       72.500
