Mon 01/04/2021
08:30 PM
$PROBLEM WARFARIN PK, not using design priors in data file
$INPUT ID TIME AMT RATE EVID MDV DV TSTRAT TMIN TMAX
$DATA warfarin_desprior5.csv ignore=C

$SUBROUTINES ADVAN2 TRANS1

$PK
MU_1=LOG(THETA(1))
MU_2=LOG(THETA(2))
MU_3=LOG(THETA(3))
KA=EXP(MU_1+ETA(1))
K=EXP(MU_2+ETA(2))
V=EXP(MU_3+ETA(3))
S2=V
F1=1.0

$ERROR
IPRED=A(2)/V
Y=IPRED + IPRED*EPS(1)+EPS(2)

$THETA
2.0 ;[KA]
0.25  ;[K]
15.0  ;[V]

$OMEGA 1.0 0.25 0.1
$SIGMA 0.0225 0.25

$RCOVI FILE=warfarin_desprior_opt4.coi

$DESIGN GROUPSIZE=50 FIMTYPE=1 VARCROSS=1 APPROX=FO
        SIGL=12 MAXEVAL=9999 PRINT=100
        DESEL=TIME DESELSTRAT=TSTRAT DESELMIN=TMIN DESELMAX=TMAX

$TABLE ID TIME TSTRAT TMIN TMAX EVID MDV IPRED NOAPPEND NOPRINT FILE=warfarin_desprior_opt5.tab

NM-TRAN MESSAGES
 WARNINGS AND ERRORS (IF ANY) FOR PROBLEM    1
 (WARNING  2) NM-TRAN INFERS THAT THE DATA ARE POPULATION.
Note: Analytical 2nd Derivatives are constructed in FSUBS but are never used.
      You may insert $ABBR DERIV2=NO after the first $PROB to save FSUBS construction and compilation time

1NONLINEAR MIXED EFFECTS MODEL PROGRAM (NONMEM) VERSION 7.5.1
 ORIGINALLY DEVELOPED BY STUART BEAL, LEWIS SHEINER, AND ALISON BOECKMANN
 CURRENT DEVELOPERS ARE ROBERT BAUER, ICON DEVELOPMENT SOLUTIONS,
 AND ALISON BOECKMANN. IMPLEMENTATION, EFFICIENCY, AND STANDARDIZATION
 PERFORMED BY NOUS INFOSYSTEMS.
 PROBLEM NO.:         1
 WARFARIN PK, not using design priors in data file
 TOT. NO. OF OBS RECS:        3
 TOT. NO. OF INDIVIDUALS:        1
 ONE COMPARTMENT MODEL WITH FIRST-ORDER ABSORPTION (ADVAN2)
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 #TBLN:      1
 #METH: First Order: D-OPTIMALITY
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
 #TERM:
 NO. OF FUNCTION EVALUATIONS USED:       53
0MINIMIZATION SUCCESSFUL

 ETABAR IS THE ARITHMETIC MEAN OF THE ETA-ESTIMATES,
 AND THE P-VALUE IS GIVEN FOR THE NULL HYPOTHESIS THAT THE TRUE MEAN IS 0.

 ETABAR:         0.0000E+00  0.0000E+00  0.0000E+00
 SE:             0.0000E+00  0.0000E+00  0.0000E+00
 N:                       1           1           1

 P VAL.:         1.0000E+00  1.0000E+00  1.0000E+00

 ETASHRINKSD(%)  1.0000E+02  1.0000E+02  1.0000E+02
 ETASHRINKVR(%)  1.0000E+02  1.0000E+02  1.0000E+02
 EBVSHRINKSD(%)  1.1957E+01  2.0697E+01  2.5813E+01
 EBVSHRINKVR(%)  2.2485E+01  3.7110E+01  4.4963E+01
 RELATIVEINF(%)  6.7141E+01  5.0417E+01  4.1715E+01
 EPSSHRINKSD(%)  1.0000E+02  1.0000E+02
 EPSSHRINKVR(%)  1.0000E+02  1.0000E+02


 #TERE:
 Elapsed opt. design time in seconds:     0.04
 Elapsed postprocess time in seconds:     0.00

 ********************                            FIRST ORDER: D-OPTIMALITY                           ********************
 #OBJT:**************                MINIMUM VALUE OF OBJECTIVE FUNCTION: D-OPTIMALITY               ********************
 #OBJV:********************************************      -41.480       **************************************************

 ********************                            FIRST ORDER: D-OPTIMALITY                           ********************
 ********************                             FINAL PARAMETER ESTIMATE                           ********************

 THETA - VECTOR OF FIXED EFFECTS PARAMETERS   *********
         TH 1      TH 2      TH 3
         2.00E+00  2.50E-01  1.50E+01

 OMEGA - COV MATRIX FOR RANDOM EFFECTS - ETAS  ********
         ETA1      ETA2      ETA3
 ETA1
+        1.00E+00
 ETA2
+        0.00E+00  2.50E-01
 ETA3
+        0.00E+00  0.00E+00  1.00E-01

 SIGMA - COV MATRIX FOR RANDOM EFFECTS - EPSILONS  ****
         EPS1      EPS2
 EPS1
+        2.25E-02
 EPS2
+        0.00E+00  2.50E-01

 OMEGA - CORR MATRIX FOR RANDOM EFFECTS - ETAS  *******
         ETA1      ETA2      ETA3
 ETA1
+        1.00E+00
 ETA2
+        0.00E+00  5.00E-01
 ETA3
+        0.00E+00  0.00E+00  3.16E-01

 SIGMA - CORR MATRIX FOR RANDOM EFFECTS - EPSILONS  ***
         EPS1      EPS2
 EPS1
+        1.50E-01
 EPS2
+        0.00E+00  5.00E-01

 ********************                            FIRST ORDER: D-OPTIMALITY                           ********************
 ********************                            STANDARD ERROR OF ESTIMATE                          ********************

 THETA - VECTOR OF FIXED EFFECTS PARAMETERS   *********
         TH 1      TH 2      TH 3
         2.65E-01  1.89E-02  7.86E-01

 OMEGA - COV MATRIX FOR RANDOM EFFECTS - ETAS  ********
         ETA1      ETA2      ETA3
 ETA1
+        2.00E-01
 ETA2
+       .........  6.50E-02
 ETA3
+       ......... .........  3.05E-02

 SIGMA - COV MATRIX FOR RANDOM EFFECTS - EPSILONS  ****
         EPS1      EPS2
 EPS1
+        1.36E-02
 EPS2
+       .........  1.09E-01

 OMEGA - CORR MATRIX FOR RANDOM EFFECTS - ETAS  *******
         ETA1      ETA2      ETA3
 ETA1
+        1.00E-01
 ETA2
+       .........  6.50E-02
 ETA3
+       ......... .........  4.83E-02

 SIGMA - CORR MATRIX FOR RANDOM EFFECTS - EPSILONS  ***
         EPS1      EPS2
 EPS1
+        4.53E-02
 EPS2
+       .........  1.09E-01

 ********************                            FIRST ORDER: D-OPTIMALITY                           ********************
 ********************                          COVARIANCE MATRIX OF ESTIMATE                         ********************

     TH 1 | TH 1      TH 2 | TH 1      TH 2 | TH 2      TH 3 | TH 1      TH 3 | TH 2      TH 3 | TH 3    OM11 | TH 1
     7.04E-02        -1.49E-03         3.56E-04         8.51E-02        -6.86E-03         6.17E-01         0.00E+00
   OM11 | TH 2      OM11 | TH 3      OM11 | OM11      OM22 | TH 1      OM22 | TH 2      OM22 | TH 3      OM22 | OM11
     0.00E+00         0.00E+00         4.02E-02         0.00E+00         0.00E+00         0.00E+00         3.51E-04
   OM22 | OM22      OM33 | TH 1      OM33 | TH 2      OM33 | TH 3      OM33 | OM11      OM33 | OM22      OM33 | OM33
     4.23E-03         0.00E+00         0.00E+00         0.00E+00        -6.93E-05        -2.86E-04         9.33E-04
   SG11 | TH 1      SG11 | TH 2      SG11 | TH 3      SG11 | OM11      SG11 | OM22      SG11 | OM33      SG11 | SG11
     0.00E+00         0.00E+00         0.00E+00        -3.18E-04         1.74E-04        -1.73E-04         1.85E-04
   SG22 | TH 1      SG22 | TH 2      SG22 | TH 3      SG22 | OM11      SG22 | OM22      SG22 | OM33      SG22 | SG11
     0.00E+00         0.00E+00         0.00E+00        -3.72E-04        -2.64E-03         6.64E-04        -1.10E-03
   SG22 | SG22
     1.18E-02

 ********************                            FIRST ORDER: D-OPTIMALITY                           ********************
 ********************                          CORRELATION MATRIX OF ESTIMATE                        ********************

     TH 1 | TH 1      TH 2 | TH 1      TH 2 | TH 2      TH 3 | TH 1      TH 3 | TH 2      TH 3 | TH 3    OM11 | TH 1
     2.65E-01        -2.98E-01         1.89E-02         4.08E-01        -4.63E-01         7.86E-01         0.00E+00
   OM11 | TH 2      OM11 | TH 3      OM11 | OM11      OM22 | TH 1      OM22 | TH 2      OM22 | TH 3      OM22 | OM11
     0.00E+00         0.00E+00         2.00E-01         0.00E+00         0.00E+00         0.00E+00         2.69E-02
   OM22 | OM22      OM33 | TH 1      OM33 | TH 2      OM33 | TH 3      OM33 | OM11      OM33 | OM22      OM33 | OM33
     6.50E-02         0.00E+00         0.00E+00         0.00E+00        -1.13E-02        -1.44E-01         3.05E-02
   SG11 | TH 1      SG11 | TH 2      SG11 | TH 3      SG11 | OM11      SG11 | OM22      SG11 | OM33      SG11 | SG11
     0.00E+00         0.00E+00         0.00E+00        -1.17E-01         1.97E-01        -4.17E-01         1.36E-02
   SG22 | TH 1      SG22 | TH 2      SG22 | TH 3      SG22 | OM11      SG22 | OM22      SG22 | OM33      SG22 | SG11
     0.00E+00         0.00E+00         0.00E+00        -1.71E-02        -3.73E-01         2.00E-01        -7.44E-01
   SG22 | SG22
     1.09E-01
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 Elapsed finaloutput time in seconds:     0.02
 #CPUT: Total CPU Time in Seconds,        0.125
