$PROBLEM WARFARIN
$INPUT ID TIME AMT RATE EVID MDV DV TSTRAT   TMIN   TMAX   REPZ
$DATA warfarinz.csv ignore=@

$SUBROUTINES ADVAN2 TRANS2

$ABBR DECLARE T(NO), INTEGER I, DOWHILE J

$PK
MU_1=LOG(THETA(1))
MU_2=LOG(THETA(2))
MU_3=LOG(THETA(3))
CL=THETA(1)*EXP(ETA(1))
V=THETA(2)*EXP(ETA(2))
KA=THETA(3)*EXP(ETA(3))
S2=V
F1=1.0

$ERROR
 IF(NEWIND.NE.2) I=0
 IF (NEWL2 ==1 .AND. MDV==0) THEN
    I=I+1
    T(I)=TIME
    J=1
    DO WHILE (J<=I)
    CORRL2(J,1)=EXP(-THETA(4)*(TIME-T(J)))
    J=J+1
    ENDDO
 ENDIF
IPRED=A(2)/V
Y=IPRED*(1.0+EPS(1)) + EPS(2)

$THETA
0.15 ;[CL]
8.0  ;[V]
1.0  ;[KA]
(0.1) ; [COR]

$OMEGA (0.07 ) (0.02 ) (0.6 )
$SIGMA (0.01 ) (0.001 FIX )

$DESIGN GROUPSIZE=100 FIMDIAG=1 APPROX=FO
         MAXEVAL=9999 SIGL=12 DESEL=TIME DESELSTRAT=TSTRAT DESELMIN=TMIN DESELMAX=TMAX
$EST GRD=TS(4)
$TABLE ID TIME AMT EVID MDV DV IPRED NOPRINT NOAPPEND FILE=warfarin_fobc.tab
