Thu 03/18/2021
02:23 PM
$PROBLEM WARFARIN
$INPUT ID TIME AMT RATE EVID MDV DV TSTRAT   TMIN   TMAX   REPZ
$DATA warfarinz.csv ignore=@

$SUBROUTINES ADVAN2 TRANS2

$ABBR DECLARE T(NO), INTEGER I, DOWHILE J

$PK
MU_1=LOG(THETA(1))
MU_2=LOG(THETA(2))
MU_3=LOG(THETA(3))
CL=THETA(1)*EXP(ETA(1))
V=THETA(2)*EXP(ETA(2))
KA=THETA(3)*EXP(ETA(3))
S2=V
F1=1.0

$ERROR
 IF(NEWIND.NE.2) I=0
 IF (NEWL2 ==1 .AND. MDV==0) THEN
    I=I+1
    T(I)=TIME
    J=1
    DO WHILE (J<=I)
    CORRL2(J,1)=EXP(-THETA(4)*(TIME-T(J)))
    J=J+1
    ENDDO
 ENDIF
IPRED=A(2)/V
Y=IPRED*(1.0+EPS(1)) + EPS(2)

$THETA
0.15 ;[CL]
8.0  ;[V]
1.0  ;[KA]
(0.1) ; [COR]

$OMEGA (0.07 ) (0.02 ) (0.6 )
$SIGMA (0.01 ) (0.001 FIX )

$DESIGN GROUPSIZE=100 FIMDIAG=1 APPROX=FO
         MAXEVAL=9999 SIGL=12 DESEL=TIME DESELSTRAT=TSTRAT DESELMIN=TMIN DESELMAX=TMAX
$EST GRD=TS(4)
$TABLE ID TIME AMT EVID MDV DV IPRED NOPRINT NOAPPEND FILE=warfarin_fobc.tab

NM-TRAN MESSAGES
 WARNINGS AND ERRORS (IF ANY) FOR PROBLEM    1
 (WARNING  2) NM-TRAN INFERS THAT THE DATA ARE POPULATION.
Note: Analytical 2nd Derivatives are constructed in FSUBS but are never used.
      You may insert $ABBR DERIV2=NO after the first $PROB to save FSUBS construction and compilation time

1NONLINEAR MIXED EFFECTS MODEL PROGRAM (NONMEM) VERSION 7.5.1
 ORIGINALLY DEVELOPED BY STUART BEAL, LEWIS SHEINER, AND ALISON BOECKMANN
 CURRENT DEVELOPERS ARE ROBERT BAUER, ICON DEVELOPMENT SOLUTIONS,
 AND ALISON BOECKMANN. IMPLEMENTATION, EFFICIENCY, AND STANDARDIZATION
 PERFORMED BY NOUS INFOSYSTEMS.
 PROBLEM NO.:         1
 WARFARIN
 TOT. NO. OF OBS RECS:        8
 TOT. NO. OF INDIVIDUALS:        1
 ONE COMPARTMENT MODEL WITH FIRST-ORDER ABSORPTION (ADVAN2)
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 #TBLN:      1
 #METH: First Order: D-OPTIMALITY
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
 #TERM:
 NO. OF FUNCTION EVALUATIONS USED:      924
0MINIMIZATION SUCCESSFUL

 ETABAR IS THE ARITHMETIC MEAN OF THE ETA-ESTIMATES,
 AND THE P-VALUE IS GIVEN FOR THE NULL HYPOTHESIS THAT THE TRUE MEAN IS 0.

 ETABAR:         0.0000E+00  0.0000E+00  0.0000E+00
 SE:             0.0000E+00  0.0000E+00  0.0000E+00
 N:                       1           1           1

 P VAL.:         1.0000E+00  1.0000E+00  1.0000E+00

 ETASHRINKSD(%)  1.0000E+02  1.0000E+02  1.0000E+02
 ETASHRINKVR(%)  1.0000E+02  1.0000E+02  1.0000E+02
 EBVSHRINKSD(%)  1.6179E+00  1.1324E+01  6.2961E-01
 EBVSHRINKVR(%)  3.2096E+00  2.1365E+01  1.2553E+00
 RELATIVEINF(%)  9.6385E+01  7.8286E+01  9.8717E+01
 EPSSHRINKSD(%)  1.0000E+02  1.0000E+02
 EPSSHRINKVR(%)  1.0000E+02  1.0000E+02


 #TERE:
 Elapsed opt. design time in seconds:     0.93
 Elapsed postprocess time in seconds:     0.00

 ********************                            FIRST ORDER: D-OPTIMALITY                           ********************
 #OBJT:**************                MINIMUM VALUE OF OBJECTIVE FUNCTION: D-OPTIMALITY               ********************
 #OBJV:********************************************      -68.643       **************************************************

 ********************                            FIRST ORDER: D-OPTIMALITY                           ********************
 ********************                             FINAL PARAMETER ESTIMATE                           ********************

 THETA - VECTOR OF FIXED EFFECTS PARAMETERS   *********
         TH 1      TH 2      TH 3      TH 4
         1.50E-01  8.00E+00  1.00E+00  1.00E-01

 OMEGA - COV MATRIX FOR RANDOM EFFECTS - ETAS  ********
         ETA1      ETA2      ETA3
 ETA1
+        7.00E-02
 ETA2
+        0.00E+00  2.00E-02
 ETA3
+        0.00E+00  0.00E+00  6.00E-01

 SIGMA - COV MATRIX FOR RANDOM EFFECTS - EPSILONS  ****
         EPS1      EPS2
 EPS1
+        1.00E-02
 EPS2
+        0.00E+00  1.00E-03

 OMEGA - CORR MATRIX FOR RANDOM EFFECTS - ETAS  *******
         ETA1      ETA2      ETA3
 ETA1
+        2.65E-01
 ETA2
+        0.00E+00  1.41E-01
 ETA3
+        0.00E+00  0.00E+00  7.75E-01

 SIGMA - CORR MATRIX FOR RANDOM EFFECTS - EPSILONS  ***
         EPS1      EPS2
 EPS1
+        1.00E-01
 EPS2
+        0.00E+00  3.16E-02

 ********************                            FIRST ORDER: D-OPTIMALITY                           ********************
 ********************                            STANDARD ERROR OF ESTIMATE                          ********************

 THETA - VECTOR OF FIXED EFFECTS PARAMETERS   *********
         TH 1      TH 2      TH 3      TH 4
         4.05E-03  1.29E-01  7.80E-02  1.48E-02

 OMEGA - COV MATRIX FOR RANDOM EFFECTS - ETAS  ********
         ETA1      ETA2      ETA3
 ETA1
+        1.02E-02
 ETA2
+       .........  3.71E-03
 ETA3
+       ......... .........  8.59E-02

 SIGMA - COV MATRIX FOR RANDOM EFFECTS - EPSILONS  ****
         EPS1      EPS2
 EPS1
+        1.09E-03
 EPS2
+       ......... .........

 OMEGA - CORR MATRIX FOR RANDOM EFFECTS - ETAS  *******
         ETA1      ETA2      ETA3
 ETA1
+        1.94E-02
 ETA2
+       .........  1.31E-02
 ETA3
+       ......... .........  5.55E-02

 SIGMA - CORR MATRIX FOR RANDOM EFFECTS - EPSILONS  ***
         EPS1      EPS2
 EPS1
+        5.47E-03
 EPS2
+       ......... .........

 ********************                            FIRST ORDER: D-OPTIMALITY                           ********************
 ********************                          COVARIANCE MATRIX OF ESTIMATE                         ********************

     TH 1 | TH 1      TH 2 | TH 1      TH 2 | TH 2      TH 3 | TH 1      TH 3 | TH 2      TH 3 | TH 3      TH 4 | TH 1
     1.64E-05         3.53E-05         1.65E-02         1.41E-06         1.68E-04         6.08E-03         0.00E+00
     TH 4 | TH 2      TH 4 | TH 3      TH 4 | TH 4    OM11 | TH 1      OM11 | TH 2      OM11 | TH 3      OM11 | TH 4
     0.00E+00         0.00E+00         2.20E-04         0.00E+00         0.00E+00         0.00E+00         3.29E-06
   OM11 | OM11      OM22 | TH 1      OM22 | TH 2      OM22 | TH 3      OM22 | TH 4      OM22 | OM11      OM22 | OM22
     1.05E-04         0.00E+00         0.00E+00         0.00E+00         9.74E-06         1.69E-08         1.38E-05
   OM33 | TH 1      OM33 | TH 2      OM33 | TH 3      OM33 | TH 4      OM33 | OM11      OM33 | OM22      OM33 | OM33
     0.00E+00         0.00E+00         0.00E+00        -2.39E-06         1.13E-08        -3.20E-08         7.39E-03
   SG11 | TH 1      SG11 | TH 2      SG11 | TH 3      SG11 | TH 4      SG11 | OM11      SG11 | OM22      SG11 | OM33
     0.00E+00         0.00E+00         0.00E+00        -1.31E-05        -2.75E-07        -8.05E-07        -1.52E-07
   SG11 | SG11
     1.20E-06

 ********************                            FIRST ORDER: D-OPTIMALITY                           ********************
 ********************                          CORRELATION MATRIX OF ESTIMATE                        ********************

     TH 1 | TH 1      TH 2 | TH 1      TH 2 | TH 2      TH 3 | TH 1      TH 3 | TH 2      TH 3 | TH 3      TH 4 | TH 1
     4.05E-03         6.79E-02         1.29E-01         4.46E-03         1.67E-02         7.80E-02         0.00E+00
     TH 4 | TH 2      TH 4 | TH 3      TH 4 | TH 4    OM11 | TH 1      OM11 | TH 2      OM11 | TH 3      OM11 | TH 4
     0.00E+00         0.00E+00         1.48E-02         0.00E+00         0.00E+00         0.00E+00         2.16E-02
   OM11 | OM11      OM22 | TH 1      OM22 | TH 2      OM22 | TH 3      OM22 | TH 4      OM22 | OM11      OM22 | OM22
     1.02E-02         0.00E+00         0.00E+00         0.00E+00         1.77E-01         4.46E-04         3.71E-03
   OM33 | TH 1      OM33 | TH 2      OM33 | TH 3      OM33 | TH 4      OM33 | OM11      OM33 | OM22      OM33 | OM33
     0.00E+00         0.00E+00         0.00E+00        -1.88E-03         1.29E-05        -1.00E-04         8.59E-02
   SG11 | TH 1      SG11 | TH 2      SG11 | TH 3      SG11 | TH 4      SG11 | OM11      SG11 | OM22      SG11 | OM33
     0.00E+00         0.00E+00         0.00E+00        -8.07E-01        -2.45E-02        -1.98E-01        -1.62E-03
   SG11 | SG11
     1.09E-03
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 Elapsed finaloutput time in seconds:     0.05
 #CPUT: Total CPU Time in Seconds,        1.109
