Sun 03/21/2021
11:59 AM
$PROBLEM WARFARIN
$INPUT ID TIME AMT RATE EVID MDV DV TSTRAT   TMIN   TMAX   REPZ
$DATA warfarinz2.csv ignore=@
$SUBROUTINES ADVAN2 TRANS2
$ABBR DECLARE T(NO), INTEGER I, DOWHILE J
$PK
MU_1=LOG(THETA(1))
MU_2=LOG(THETA(2))
MU_3=LOG(THETA(3))
CL=THETA(1)*EXP(ETA(1))
V=THETA(2)*EXP(ETA(2))
KA=THETA(3)*EXP(ETA(3))
S2=V
F1=1.0
$ERROR
 IPRED=A(2)/V
 MEASURE=DV
; MEASURE=LOG(DV) ; Alternative measure
 IF(NEWIND.NE.2) I=0
 IF (NEWL2 ==1 .AND. MDV==0) THEN
    I=I+1
    T(I)=MEASURE
    CORRL2(I,1)=1.0
    J=1
    DO WHILE (J<I)
    DVAL1=MEASURE
    DVAL2=T(J)
; 0.999 needed to make sure correlation between two different data
; points is less than 1, even if they are of identical value
    CORRL2(J,1)=0.999*EXP(-THETA(4)* &
SQRT( (DVAL1-DVAL2)*(DVAL1-DVAL2)/(DVAL1*DVAL1+DVAL2*DVAL2)   ) )
; Alternative correlation algorithm
;    CORRL2(J,1)=0.999*EXP(-THETA(4)*ABS((DVAL1-DVAL2))/(ABS(DVAL1)+ABS(DVAL2)) )
    J=J+1
    ENDDO
 ENDIF
Y=IPRED*(1.0+EPS(1)) + EPS(2)
$THETA
0.15 ;[CL]
8.0  ;[V]
1.0  ;[KA]
(1.0 FIXED) ; [COR]
$OMEGA (0.07 ) (0.02 ) (0.6 )
$SIGMA (0.01 ) (0.001 FIXED)
$DESIGN GROUPSIZE=100 FIMDIAG=1 APPROX=FOI
         MAXEVAL=99999 PRINT=200 SIGL=9 DESEL=TIME DESELSTRAT=TSTRAT DESELMIN=TMIN DESELMAX=TMAX
$EST GRD=TS(4)
$TABLE ID TIME AMT EVID MDV DV IPRED NOPRINT NOAPPEND FILE=warfarin_fobc5.tab

NM-TRAN MESSAGES
 WARNINGS AND ERRORS (IF ANY) FOR PROBLEM    1
 (WARNING  2) NM-TRAN INFERS THAT THE DATA ARE POPULATION.
Note: Analytical 2nd Derivatives are constructed in FSUBS but are never used.
      You may insert $ABBR DERIV2=NO after the first $PROB to save FSUBS construction and compilation time

1NONLINEAR MIXED EFFECTS MODEL PROGRAM (NONMEM) VERSION 7.5.1
 ORIGINALLY DEVELOPED BY STUART BEAL, LEWIS SHEINER, AND ALISON BOECKMANN
 CURRENT DEVELOPERS ARE ROBERT BAUER, ICON DEVELOPMENT SOLUTIONS,
 AND ALISON BOECKMANN. IMPLEMENTATION, EFFICIENCY, AND STANDARDIZATION
 PERFORMED BY NOUS INFOSYSTEMS.
 PROBLEM NO.:         1
 WARFARIN
 TOT. NO. OF OBS RECS:        8
 TOT. NO. OF INDIVIDUALS:        1
 ONE COMPARTMENT MODEL WITH FIRST-ORDER ABSORPTION (ADVAN2)
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 #TBLN:      1
 #METH: First Order with Interaction: D-OPTIMALITY
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
 #TERM:
 NO. OF FUNCTION EVALUATIONS USED:     1262
0MINIMIZATION SUCCESSFUL

 ETABAR IS THE ARITHMETIC MEAN OF THE ETA-ESTIMATES,
 AND THE P-VALUE IS GIVEN FOR THE NULL HYPOTHESIS THAT THE TRUE MEAN IS 0.

 ETABAR:         0.0000E+00  0.0000E+00  0.0000E+00
 SE:             0.0000E+00  0.0000E+00  0.0000E+00
 N:                       1           1           1

 P VAL.:         1.0000E+00  1.0000E+00  1.0000E+00

 ETASHRINKSD(%)  1.0000E+02  1.0000E+02  1.0000E+02
 ETASHRINKVR(%)  1.0000E+02  1.0000E+02  1.0000E+02
 EBVSHRINKSD(%)  3.2135E+00  1.3439E+01  8.8001E-02
 EBVSHRINKVR(%)  6.3237E+00  2.5073E+01  1.7593E-01
 RELATIVEINF(%)  9.1907E+01  7.3507E+01  9.9818E+01
 EPSSHRINKSD(%)  1.0000E+02  1.0000E+02
 EPSSHRINKVR(%)  1.0000E+02  1.0000E+02


 #TERE:
 Elapsed opt. design time in seconds:     1.16
 Elapsed postprocess time in seconds:     0.00

 ********************                    FIRST ORDER WITH INTERACTION: D-OPTIMALITY                  ********************
 #OBJT:**************                MINIMUM VALUE OF OBJECTIVE FUNCTION: D-OPTIMALITY               ********************
 #OBJV:********************************************      -60.051       **************************************************

 ********************                    FIRST ORDER WITH INTERACTION: D-OPTIMALITY                  ********************
 ********************                             FINAL PARAMETER ESTIMATE                           ********************

 THETA - VECTOR OF FIXED EFFECTS PARAMETERS   *********
         TH 1      TH 2      TH 3      TH 4
         1.50E-01  8.00E+00  1.00E+00  1.00E+00

 OMEGA - COV MATRIX FOR RANDOM EFFECTS - ETAS  ********
         ETA1      ETA2      ETA3
 ETA1
+        7.00E-02
 ETA2
+        0.00E+00  2.00E-02
 ETA3
+        0.00E+00  0.00E+00  6.00E-01

 SIGMA - COV MATRIX FOR RANDOM EFFECTS - EPSILONS  ****
         EPS1      EPS2
 EPS1
+        1.00E-02
 EPS2
+        0.00E+00  1.00E-03

 OMEGA - CORR MATRIX FOR RANDOM EFFECTS - ETAS  *******
         ETA1      ETA2      ETA3
 ETA1
+        2.65E-01
 ETA2
+        0.00E+00  1.41E-01
 ETA3
+        0.00E+00  0.00E+00  7.75E-01

 SIGMA - CORR MATRIX FOR RANDOM EFFECTS - EPSILONS  ***
         EPS1      EPS2
 EPS1
+        1.00E-01
 EPS2
+        0.00E+00  3.16E-02

 ********************                    FIRST ORDER WITH INTERACTION: D-OPTIMALITY                  ********************
 ********************                            STANDARD ERROR OF ESTIMATE                          ********************

 THETA - VECTOR OF FIXED EFFECTS PARAMETERS   *********
         TH 1      TH 2      TH 3      TH 4
         4.17E-03  1.37E-01  7.80E-02 .........

 OMEGA - COV MATRIX FOR RANDOM EFFECTS - ETAS  ********
         ETA1      ETA2      ETA3
 ETA1
+        1.04E-02
 ETA2
+       .........  4.08E-03
 ETA3
+       ......... .........  7.41E-02

 SIGMA - COV MATRIX FOR RANDOM EFFECTS - EPSILONS  ****
         EPS1      EPS2
 EPS1
+        7.11E-04
 EPS2
+       ......... .........

 OMEGA - CORR MATRIX FOR RANDOM EFFECTS - ETAS  *******
         ETA1      ETA2      ETA3
 ETA1
+        1.97E-02
 ETA2
+       .........  1.44E-02
 ETA3
+       ......... .........  4.78E-02

 SIGMA - CORR MATRIX FOR RANDOM EFFECTS - EPSILONS  ***
         EPS1      EPS2
 EPS1
+        3.55E-03
 EPS2
+       ......... .........

 ********************                    FIRST ORDER WITH INTERACTION: D-OPTIMALITY                  ********************
 ********************                          COVARIANCE MATRIX OF ESTIMATE                         ********************

     TH 1 | TH 1      TH 2 | TH 1      TH 2 | TH 2      TH 3 | TH 1      TH 3 | TH 2      TH 3 | TH 3    OM11 | TH 1
     1.74E-05         8.32E-05         1.87E-02         4.47E-07         2.13E-04         6.08E-03         0.00E+00
   OM11 | TH 2      OM11 | TH 3      OM11 | OM11      OM22 | TH 1      OM22 | TH 2      OM22 | TH 3      OM22 | OM11
     0.00E+00         0.00E+00         1.09E-04         0.00E+00         0.00E+00         0.00E+00        -4.24E-07
   OM22 | OM22      OM33 | TH 1      OM33 | TH 2      OM33 | TH 3      OM33 | OM11      OM33 | OM22      OM33 | OM33
     1.66E-05         0.00E+00         0.00E+00         0.00E+00        -7.62E-06         5.40E-06         5.49E-03
   SG11 | TH 1      SG11 | TH 2      SG11 | TH 3      SG11 | OM11      SG11 | OM22      SG11 | OM33      SG11 | SG11
     0.00E+00         0.00E+00         0.00E+00        -8.80E-07        -5.09E-07        -1.63E-05         5.05E-07

 ********************                    FIRST ORDER WITH INTERACTION: D-OPTIMALITY                  ********************
 ********************                          CORRELATION MATRIX OF ESTIMATE                        ********************

     TH 1 | TH 1      TH 2 | TH 1      TH 2 | TH 2      TH 3 | TH 1      TH 3 | TH 2      TH 3 | TH 3    OM11 | TH 1
     4.17E-03         1.46E-01         1.37E-01         1.38E-03         1.99E-02         7.80E-02         0.00E+00
   OM11 | TH 2      OM11 | TH 3      OM11 | OM11      OM22 | TH 1      OM22 | TH 2      OM22 | TH 3      OM22 | OM11
     0.00E+00         0.00E+00         1.04E-02         0.00E+00         0.00E+00         0.00E+00        -9.97E-03
   OM22 | OM22      OM33 | TH 1      OM33 | TH 2      OM33 | TH 3      OM33 | OM11      OM33 | OM22      OM33 | OM33
     4.08E-03         0.00E+00         0.00E+00         0.00E+00        -9.87E-03         1.79E-02         7.41E-02
   SG11 | TH 1      SG11 | TH 2      SG11 | TH 3      SG11 | OM11      SG11 | OM22      SG11 | OM33      SG11 | SG11
     0.00E+00         0.00E+00         0.00E+00        -1.19E-01        -1.76E-01        -3.09E-01         7.11E-04
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 Elapsed finaloutput time in seconds:     0.04
 #CPUT: Total CPU Time in Seconds,        1.328
