Wed 01/06/2021
01:00 PM
$PROBLEM WARFARIN, EVALUATION
$INPUT ID TIME AMT RATE EVID MDV DV TSTRAT TMIN TMAX
$DATA warfarin_pfim2.csv ignore=@ REPL=3200

$SUBROUTINES ADVAN2 TRANS2

$PK
MU_1=LOG(THETA(1))
MU_2=LOG(THETA(2))
MU_3=LOG(THETA(3))
gamma=THETA(4)
CL=EXP(MU_1+ETA(1))
V=EXP(MU_2+ETA(2))
KA=EXP(MU_3+ETA(3))
S2=V
F1=1.0

$ERROR
IPRED=A(2)/V
Y=IPRED + (IPRED**gamma)*EPS(1)

$THETA
0.15 ;[CL]
8.0  ;[V]
1.0  ;[KA]
1.0 ;[gamma]

$OMEGA (0.07) (0.02) (0.6)
$SIGMA 0.01

;$DESIGN GROUPSIZE=32 FIMTYPE=1 VARCROSS=1 APPROX=FO

$SIML (11232456) SUBP=1
$EST METHOD=IMP INTERACTION NOHABORT NITER=5 EONLY=1 PRINT=1 ISAMPLE=1000 RANMETHOD=3S2
$COV UNCONDITIONAL MATRIX=R

NM-TRAN MESSAGES
 WARNINGS AND ERRORS (IF ANY) FOR PROBLEM    1
 (WARNING  2) NM-TRAN INFERS THAT THE DATA ARE POPULATION.
 (WARNING  97) A RANDOM QUANTITY IS RAISED TO A POWER. IF THE RESULT AFFECTS
 THE VALUE OF THE OBJECTIVE FUNCTION, THE USER SHOULD ENSURE THAT THE
 RANDOM QUANTITY IS NEVER 0 WHEN THE POWER IS < 1.
Note: Analytical 2nd Derivatives are constructed in FSUBS but are never used.
      You may insert $ABBR DERIV2=NO after the first $PROB to save FSUBS construction and compilation time

1NONLINEAR MIXED EFFECTS MODEL PROGRAM (NONMEM) VERSION 7.5.1
 ORIGINALLY DEVELOPED BY STUART BEAL, LEWIS SHEINER, AND ALISON BOECKMANN
 CURRENT DEVELOPERS ARE ROBERT BAUER, ICON DEVELOPMENT SOLUTIONS,
 AND ALISON BOECKMANN. IMPLEMENTATION, EFFICIENCY, AND STANDARDIZATION
 PERFORMED BY NOUS INFOSYSTEMS.
 PROBLEM NO.:         1
 WARFARIN, EVALUATION
 TOT. NO. OF DATA RECS:     28800
 TOT. NO. OF OBS RECS:    25600
 TOT. NO. OF INDIVIDUALS:     3200
 ONE COMPARTMENT MODEL WITH FIRST-ORDER ABSORPTION (ADVAN2)
 PROBLEM NO.:           1      SUBPROBLEM NO.:           1
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 SIMULATION STEP PERFORMED
 Elapsed simulation  time in seconds:     0.05
 #TBLN:      1
 #METH: Objective Function Evaluation by Importance Sampling
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
 #TERM:
 EXPECTATION ONLY PROCESS WAS NOT TESTED FOR CONVERGENCE

 ETABAR IS THE ARITHMETIC MEAN OF THE ETA-ESTIMATES,
 AND THE P-VALUE IS GIVEN FOR THE NULL HYPOTHESIS THAT THE TRUE MEAN IS 0.

 ETABAR:         5.5110E-03  2.4347E-03 -5.1728E-03
 SE:             4.5031E-03  2.2618E-03  1.3248E-02
 N:                    3200        3200        3200

 P VAL.:         2.2102E-01  2.8172E-01  6.9619E-01

 ETASHRINKSD(%)  3.7038E+00  9.5144E+00  3.2369E+00
 ETASHRINKVR(%)  7.2705E+00  1.8124E+01  6.3690E+00
 EBVSHRINKSD(%)  1.4233E+00  9.1739E+00  2.3029E+00
 EBVSHRINKVR(%)  2.8264E+00  1.7506E+01  4.5527E+00
 RELATIVEINF(%)  9.7075E+01  8.2132E+01  9.5110E+01
 EPSSHRINKSD(%)  1.9439E+01
 EPSSHRINKVR(%)  3.5099E+01


 TOTAL DATA POINTS NORMALLY DISTRIBUTED (N):        25600
 N*LOG(2PI) CONSTANT TO OBJECTIVE FUNCTION:    47049.6529000792
 OBJECTIVE FUNCTION VALUE WITHOUT CONSTANT:    5600.18700682973
 OBJECTIVE FUNCTION VALUE WITH CONSTANT:       52649.8399069090
 REPORTED OBJECTIVE FUNCTION DOES NOT CONTAIN CONSTANT

 TOTAL EFFECTIVE ETAS (NIND*NETA):                          9600


 #TERE:
 Elapsed estimation  time in seconds:   251.82
 Elapsed covariance  time in seconds:   592.31

 ********************               OBJECTIVE FUNCTION EVALUATION BY IMPORTANCE SAMPLING             ********************
 #OBJT:**************                        FINAL VALUE OF OBJECTIVE FUNCTION                       ********************
 #OBJV:********************************************     5600.187       **************************************************

 ********************               OBJECTIVE FUNCTION EVALUATION BY IMPORTANCE SAMPLING             ********************
 ********************                             FINAL PARAMETER ESTIMATE                           ********************

 THETA - VECTOR OF FIXED EFFECTS PARAMETERS   *********
         TH 1      TH 2      TH 3      TH 4
         1.50E-01  8.00E+00  1.00E+00  1.00E+00

 OMEGA - COV MATRIX FOR RANDOM EFFECTS - ETAS  ********
         ETA1      ETA2      ETA3
 ETA1
+        7.00E-02
 ETA2
+        0.00E+00  2.00E-02
 ETA3
+        0.00E+00  0.00E+00  6.00E-01

 SIGMA - COV MATRIX FOR RANDOM EFFECTS - EPSILONS  ****
         EPS1
 EPS1
+        1.00E-02

 OMEGA - CORR MATRIX FOR RANDOM EFFECTS - ETAS  *******
         ETA1      ETA2      ETA3
 ETA1
+        2.65E-01
 ETA2
+        0.00E+00  1.41E-01
 ETA3
+        0.00E+00  0.00E+00  7.75E-01

 SIGMA - CORR MATRIX FOR RANDOM EFFECTS - EPSILONS  ***
         EPS1
 EPS1
+        1.00E-01

 ********************               OBJECTIVE FUNCTION EVALUATION BY IMPORTANCE SAMPLING             ********************
 ********************                          STANDARD ERROR OF ESTIMATE (R)                        ********************

 THETA - VECTOR OF FIXED EFFECTS PARAMETERS   *********
         TH 1      TH 2      TH 3      TH 4
         7.11E-04  2.21E-02  1.41E-02  9.59E-03

 OMEGA - COV MATRIX FOR RANDOM EFFECTS - ETAS  ********
         ETA1      ETA2      ETA3
 ETA1
+        1.90E-03
 ETA2
+        0.00E+00  6.12E-04
 ETA3
+        0.00E+00  0.00E+00  1.67E-02

 SIGMA - COV MATRIX FOR RANDOM EFFECTS - EPSILONS  ****
         EPS1
 EPS1
+        2.99E-04

 OMEGA - CORR MATRIX FOR RANDOM EFFECTS - ETAS  *******
         ETA1      ETA2      ETA3
 ETA1
+        3.58E-03
 ETA2
+       .........  2.16E-03
 ETA3
+       ......... .........  1.08E-02

 SIGMA - CORR MATRIX FOR RANDOM EFFECTS - EPSILONS  ***
         EPS1
 EPS1
+        1.50E-03

 ********************               OBJECTIVE FUNCTION EVALUATION BY IMPORTANCE SAMPLING             ********************
 ********************                        COVARIANCE MATRIX OF ESTIMATE (R)                       ********************

            TH 1      TH 2      TH 3      TH 4      OM11      OM12      OM13      OM22      OM23      OM33      SG11
 TH 1
+        5.05E-07
 TH 2
+        4.77E-07  4.87E-04
 TH 3
+        9.49E-08  1.85E-05  1.99E-04
 TH 4
+       -7.02E-09  1.30E-06 -1.97E-07  9.20E-05
 OM11
+       -5.47E-08  1.02E-06  2.15E-07 -8.88E-08  3.60E-06
 OM12
+       ......... ......... ......... ......... ......... .........
 OM13
+       ......... ......... ......... ......... ......... ......... .........
 OM22
+       -5.58E-09 -2.62E-07  2.65E-08 -2.33E-07  1.10E-08  0.00E+00  0.00E+00  3.75E-07
 OM23
+       ......... ......... ......... ......... ......... ......... ......... ......... .........
 OM33
+        2.33E-08  2.34E-06  1.51E-05 -2.63E-06 -3.27E-08  0.00E+00  0.00E+00 -2.11E-08  0.00E+00  2.79E-04
 SG11
+        1.39E-09  4.95E-08  8.67E-09 -2.66E-06 -1.99E-09  0.00E+00  0.00E+00  8.29E-10  0.00E+00  2.94E-08  8.97E-08

 ********************               OBJECTIVE FUNCTION EVALUATION BY IMPORTANCE SAMPLING             ********************
 ********************                        CORRELATION MATRIX OF ESTIMATE (R)                      ********************

            TH 1      TH 2      TH 3      TH 4      OM11      OM12      OM13      OM22      OM23      OM33      SG11
 TH 1
+        7.11E-04
 TH 2
+        3.04E-02  2.21E-02
 TH 3
+        9.46E-03  5.94E-02  1.41E-02
 TH 4
+       -1.03E-03  6.13E-03 -1.46E-03  9.59E-03
 OM11
+       -4.06E-02  2.43E-02  8.05E-03 -4.88E-03  1.90E-03
 OM12
+       ......... ......... ......... ......... ......... .........
 OM13
+       ......... ......... ......... ......... ......... ......... .........
 OM22
+       -1.28E-02 -1.94E-02  3.07E-03 -3.97E-02  9.45E-03  0.00E+00  0.00E+00  6.12E-04
 OM23
+       ......... ......... ......... ......... ......... ......... ......... ......... .........
 OM33
+        1.96E-03  6.35E-03  6.39E-02 -1.64E-02 -1.03E-03  0.00E+00  0.00E+00 -2.07E-03  0.00E+00  1.67E-02
 SG11
+        6.54E-03  7.49E-03  2.05E-03 -9.27E-01 -3.50E-03  0.00E+00  0.00E+00  4.52E-03  0.00E+00  5.88E-03  2.99E-04
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 Elapsed postprocess time in seconds:     0.00
 Elapsed finaloutput time in seconds:     0.00
 #CPUT: Total CPU Time in Seconds,      857.938
