Thu 09/23/2021
12:18 PM
; Based on sde_ex2_base.ctl, with SDE equations put in, and .dat file modified.  From Christoffer Tornoe, example 2
; This example shows SDE with FAST (analytical) derivatives
$PROBLEM PK ODE HANDS ON ONE
$INPUT ID HOUR DV AMT CMT FLAG EVID MDV SDE TIME
$DATA   sde_ex2.dat
        IGNORE=@
$SUBROUTINE ADVAN6 TOL 10
$MODEL
       COMP = (CENTRAL);
       COMP = (P1)

$THETA (0,10)               ;1 CL
$THETA (0,32)               ;2 VD
$THETA (0, 2)               ;4 SIGMA
$THETA (0,1) ; SGW1

$OMEGA 0.1                  ;1 CL
$OMEGA 0.01                 ;2 VD
$OMEGA 0.0 FIXED 0.0 FIXED

$SIGMA 1 FIX                ; PK

$PK
  IF(NEWIND.NE.2) OT = 0
  TVCL  = THETA(1)
  CL    = TVCL*EXP(ETA(1))
  TVVD  = THETA(2)
  VD    = TVVD*EXP(ETA(2))
  MU_1=LOG(THETA(1))
  MU_2=LOG(THETA(2))
  MU_3=THETA(3)
  MU_4=THETA(4)
  SV1=MU_3+ETA(3)
  SGW1=MU_4+ETA(4)


IF(NEWIND.NE.2) THEN
  AHT1 = 0
  PHT1 = 0
ENDIF

IF(EVID.NE.3) THEN
  A1 = A(1)
  A2 = A(2)
ELSE
  A1 = A1
  A2 = A2
ENDIF

IF(EVID.EQ.0) OBS = DV

IF(EVID.GT.2.AND.SDE.EQ.2) THEN
  RVAR = A2*(1/VD)**2+ SV1**2
  K1   = A2*(1/VD)/RVAR
  AHT1 = A1 + K1*(OBS -( A1/VD))
  PHT1 = A2 - K1*RVAR*K1
ENDIF

IF(EVID.GT.2.AND.SDE.EQ.3) THEN
  AHT1 = A1
  PHT1 = 0
ENDIF

IF(EVID.GT.2.AND.SDE.EQ.4) THEN
  AHT1 = 0
  PHT1 = A2
ENDIF

IF(A_0FLG.EQ.1) THEN
  A_0(1) = AHT1
  A_0(2) = PHT1
ENDIF

$DES
 DADT(1) = - CL/VD*A(1) ;+0
DADT(2) = (-CL/VD)*(A(2))+(-CL/VD)*(A(2))+SGW1*SGW1

$ERROR (OBS ONLY)
     IPRED = A(1)/VD
     IRES  = DV - IPRED
     W=SQRT(A(2)*(1/VD)**2+ SV1**2)
     IWRES = IRES/W
     Y     = IPRED+W*EPS(1)

$EST MAXEVAL=9999 METHOD=1 INTER NOHABORT SIGDIGITS=3 PRINT=1 FAST
$COV MATRIX=R
$TABLE ID TIME FLAG AMT CMT IPRED IRES IWRES EVID
       ONEHEADER NOPRINT FILE=sde_ex2_foce_fast.tab

NM-TRAN MESSAGES
 WARNINGS AND ERRORS (IF ANY) FOR PROBLEM    1
 (WARNING  2) NM-TRAN INFERS THAT THE DATA ARE POPULATION.
 (WARNING  3) THERE MAY BE AN ERROR IN THE ABBREVIATED CODE. THE FOLLOWING
 ONE OR MORE RANDOM VARIABLES ARE DEFINED WITH "IF" STATEMENTS THAT DO NOT
 PROVIDE DEFINITIONS FOR BOTH THE "THEN" AND "ELSE" CASES. IF ALL
 CONDITIONS FAIL, THE VALUES OF THESE VARIABLES WILL BE ZERO.
   RVAR K1
 (MU_WARNING 24) ABBREVIATED CODE IS TOO COMPLEX. UNABLE TO CHECK USE OF MU_ VARIABLES.
Note: Analytical 2nd Derivatives are constructed in FSUBS but are never used.
      You may insert $ABBR DERIV2=NO after the first $PROB to save FSUBS construction and compilation time

1NONLINEAR MIXED EFFECTS MODEL PROGRAM (NONMEM) VERSION 7.5.1
 ORIGINALLY DEVELOPED BY STUART BEAL, LEWIS SHEINER, AND ALISON BOECKMANN
 CURRENT DEVELOPERS ARE ROBERT BAUER, ICON DEVELOPMENT SOLUTIONS,
 AND ALISON BOECKMANN. IMPLEMENTATION, EFFICIENCY, AND STANDARDIZATION
 PERFORMED BY NOUS INFOSYSTEMS.
 PROBLEM NO.:         1
 PK ODE HANDS ON ONE
 TOT. NO. OF OBS RECS:      540
 TOT. NO. OF INDIVIDUALS:       30
 GENERAL NONLINEAR KINETICS MODEL (DVERK1, ADVAN6)
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 #TBLN:      1
 #METH: First Order Conditional Estimation with Interaction
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
 #TERM:
0MINIMIZATION SUCCESSFUL
 NO. OF FUNCTION EVALUATIONS USED:       59
 NO. OF SIG. DIGITS IN FINAL EST.:  3.8

 ETABAR IS THE ARITHMETIC MEAN OF THE ETA-ESTIMATES,
 AND THE P-VALUE IS GIVEN FOR THE NULL HYPOTHESIS THAT THE TRUE MEAN IS 0.

 ETABAR:         7.0376E-03 -1.2219E-03  0.0000E+00  0.0000E+00
 SE:             4.4311E-02  6.1645E-02  0.0000E+00  0.0000E+00
 N:                      30          30          30          30

 P VAL.:         8.7381E-01  9.8419E-01  1.0000E+00  1.0000E+00

 ETASHRINKSD(%)  1.1404E+01  1.8480E+00  0.0000E+00  0.0000E+00
 ETASHRINKVR(%)  2.1508E+01  3.6618E+00  0.0000E+00  0.0000E+00
 EBVSHRINKSD(%)  1.0823E+01  1.7219E+00  0.0000E+00  0.0000E+00
 EBVSHRINKVR(%)  2.0474E+01  3.4141E+00  0.0000E+00  0.0000E+00
 RELATIVEINF(%)  7.9492E+01  9.6545E+01  0.0000E+00  0.0000E+00
 EPSSHRINKSD(%)  4.8808E+00
 EPSSHRINKVR(%)  9.5234E+00


 TOTAL DATA POINTS NORMALLY DISTRIBUTED (N):          540
 N*LOG(2PI) CONSTANT TO OBJECTIVE FUNCTION:    992.453615861047
 OBJECTIVE FUNCTION VALUE WITHOUT CONSTANT:    1210.72727875354
 OBJECTIVE FUNCTION VALUE WITH CONSTANT:       2203.18089461458
 REPORTED OBJECTIVE FUNCTION DOES NOT CONTAIN CONSTANT

 TOTAL EFFECTIVE ETAS (NIND*NETA):                            60


 #TERE:
 Elapsed estimation  time in seconds:    19.25
 Elapsed covariance  time in seconds:     5.24
 Elapsed postprocess time in seconds:     0.26

 ********************               FIRST ORDER CONDITIONAL ESTIMATION WITH INTERACTION              ********************
 #OBJT:**************                       MINIMUM VALUE OF OBJECTIVE FUNCTION                      ********************
 #OBJV:********************************************     1210.727       **************************************************

 ********************               FIRST ORDER CONDITIONAL ESTIMATION WITH INTERACTION              ********************
 ********************                             FINAL PARAMETER ESTIMATE                           ********************

 THETA - VECTOR OF FIXED EFFECTS PARAMETERS   *********
         TH 1      TH 2      TH 3      TH 4
         1.09E+01  3.25E+01  9.10E-01  5.32E+01

 OMEGA - COV MATRIX FOR RANDOM EFFECTS - ETAS  ********
         ETA1      ETA2      ETA3      ETA4
 ETA1
+        7.50E-02
 ETA2
+        0.00E+00  1.18E-01
 ETA3
+        0.00E+00  0.00E+00  0.00E+00
 ETA4
+        0.00E+00  0.00E+00  0.00E+00  0.00E+00

 SIGMA - COV MATRIX FOR RANDOM EFFECTS - EPSILONS  ****
         EPS1
 EPS1
+        1.00E+00

 OMEGA - CORR MATRIX FOR RANDOM EFFECTS - ETAS  *******
         ETA1      ETA2      ETA3      ETA4
 ETA1
+        2.74E-01
 ETA2
+        0.00E+00  3.44E-01
 ETA3
+        0.00E+00  0.00E+00  0.00E+00
 ETA4
+        0.00E+00  0.00E+00  0.00E+00  0.00E+00

 SIGMA - CORR MATRIX FOR RANDOM EFFECTS - EPSILONS  ***
         EPS1
 EPS1
+        1.00E+00

 ********************               FIRST ORDER CONDITIONAL ESTIMATION WITH INTERACTION              ********************
 ********************                            STANDARD ERROR OF ESTIMATE                          ********************

 THETA - VECTOR OF FIXED EFFECTS PARAMETERS   *********
         TH 1      TH 2      TH 3      TH 4
         6.15E-01  2.08E+00  7.85E-02  3.93E+00

 OMEGA - COV MATRIX FOR RANDOM EFFECTS - ETAS  ********
         ETA1      ETA2      ETA3      ETA4
 ETA1
+        2.50E-02
 ETA2
+       .........  3.18E-02
 ETA3
+       ......... ......... .........
 ETA4
+       ......... ......... ......... .........

 SIGMA - COV MATRIX FOR RANDOM EFFECTS - EPSILONS  ****
         EPS1
 EPS1
+       .........

 OMEGA - CORR MATRIX FOR RANDOM EFFECTS - ETAS  *******
         ETA1      ETA2      ETA3      ETA4
 ETA1
+        4.57E-02
 ETA2
+       .........  4.62E-02
 ETA3
+       ......... ......... .........
 ETA4
+       ......... ......... ......... .........

 SIGMA - CORR MATRIX FOR RANDOM EFFECTS - EPSILONS  ***
         EPS1
 EPS1
+       .........

 ********************               FIRST ORDER CONDITIONAL ESTIMATION WITH INTERACTION              ********************
 ********************                          COVARIANCE MATRIX OF ESTIMATE                         ********************

            TH 1      TH 2      TH 3      TH 4      OM11      OM12      OM13      OM14      OM22      OM23      OM24      OM33
             OM34      OM44      SG11
 TH 1
+        3.78E-01
 TH 2
+       -2.50E-02  4.32E+00
 TH 3
+       -2.17E-03  1.32E-05  6.16E-03
 TH 4
+        1.42E-01  2.25E-01 -2.03E-01  1.55E+01
 OM11
+       -1.02E-03 -2.33E-04  1.51E-04 -1.19E-02  6.26E-04
 OM12
+       ......... ......... ......... ......... ......... .........
 OM13
+       ......... ......... ......... ......... ......... ......... .........
 OM14
+       ......... ......... ......... ......... ......... ......... ......... .........
 OM22
+       -9.72E-05  1.21E-04  5.94E-05 -4.71E-03  7.79E-06 ......... ......... .........  1.01E-03
 OM23
+       ......... ......... ......... ......... ......... ......... ......... ......... ......... .........
 OM24
+       ......... ......... ......... ......... ......... ......... ......... ......... ......... ......... .........
 OM33
+       ......... ......... ......... ......... ......... ......... ......... ......... ......... ......... ......... .........
 OM34
+       ......... ......... ......... ......... ......... ......... ......... ......... ......... ......... ......... .........
         .........
 OM44
+       ......... ......... ......... ......... ......... ......... ......... ......... ......... ......... ......... .........
         ......... .........
 SG11
+       ......... ......... ......... ......... ......... ......... ......... ......... ......... ......... ......... .........
         ......... ......... .........

 ********************               FIRST ORDER CONDITIONAL ESTIMATION WITH INTERACTION              ********************
 ********************                          CORRELATION MATRIX OF ESTIMATE                        ********************

            TH 1      TH 2      TH 3      TH 4      OM11      OM12      OM13      OM14      OM22      OM23      OM24      OM33
             OM34      OM44      SG11
 TH 1
+        6.15E-01
 TH 2
+       -1.95E-02  2.08E+00
 TH 3
+       -4.49E-02  8.06E-05  7.85E-02
 TH 4
+        5.86E-02  2.75E-02 -6.58E-01  3.93E+00
 OM11
+       -6.63E-02 -4.49E-03  7.70E-02 -1.21E-01  2.50E-02
 OM12
+       ......... ......... ......... ......... ......... .........
 OM13
+       ......... ......... ......... ......... ......... ......... .........
 OM14
+       ......... ......... ......... ......... ......... ......... ......... .........
 OM22
+       -4.97E-03  1.84E-03  2.38E-02 -3.77E-02  9.79E-03 ......... ......... .........  3.18E-02
 OM23
+       ......... ......... ......... ......... ......... ......... ......... ......... ......... .........
 OM24
+       ......... ......... ......... ......... ......... ......... ......... ......... ......... ......... .........
 OM33
+       ......... ......... ......... ......... ......... ......... ......... ......... ......... ......... ......... .........
 OM34
+       ......... ......... ......... ......... ......... ......... ......... ......... ......... ......... ......... .........
         .........
 OM44
+       ......... ......... ......... ......... ......... ......... ......... ......... ......... ......... ......... .........
         ......... .........
 SG11
+       ......... ......... ......... ......... ......... ......... ......... ......... ......... ......... ......... .........
         ......... ......... .........
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 Elapsed finaloutput time in seconds:     0.19
 #CPUT: Total CPU Time in Seconds,       25.781
