; Using the SDE in-line equations after the manner of Christoffer Tornoe, but MU modeling theta(1) and theta(2).
; Note that IMP method results are similar in sde_ex2_impo and sde_ex2_imp_mu, since this method did not
; rely on NMTRAN having
; exposure to analytical SDE equations.  But ITS and Laplace in sde_ex2_impo is not correct, relative to sde_ex2_impo_mu.
; Although their LAPLACE OBJ's are far apart, in fact the parameters are similar.
$PROBLEM PK ODE HANDS ON ONE
$INPUT ID HOUR DV AMT CMT FLAG EVID MDV SDE TIME
$DATA   sde_ex2.dat
        IGNORE=@
$SUBROUTINE ADVAN6 TOL 10 DP
$MODEL
       COMP = (CENTRAL);
       COMP = (P1)

$THETA (0,2.3)               ;1 CL
$THETA (0,3.5)               ;2 VD
$THETA (0, 2)               ;4 SIGMA
$THETA (0,1) ; SGW1

$OMEGA 0.1                  ;1 CL
$OMEGA 0.01                 ;2 VD

$SIGMA 1 FIX                ; PK

$PK
  IF(NEWIND.NE.2) OT = 0

  MU_1  = THETA(1)
  CL    = EXP(MU_1+ETA(1))
  MU_2  = THETA(2)
  VD    = EXP(MU_2+ETA(2))
  SGW1 = THETA(4)

IF(NEWIND.NE.2) THEN
  AHT1 = 0
  PHT1 = 0
ENDIF

IF(EVID.NE.3) THEN
  A1 = A(1)
  A2 = A(2)
ELSE
  A1 = A1
  A2 = A2
ENDIF

IF(EVID.EQ.0) OBS = DV

IF(EVID.GT.2.AND.SDE.EQ.2) THEN
  RVAR = A2*(1/VD)**2+ THETA(3)**2
  K1   = A2*(1/VD)/RVAR
  AHT1 = A1 + K1*(OBS -( A1/VD))
  PHT1 = A2 - K1*RVAR*K1
ENDIF

IF(EVID.GT.2.AND.SDE.EQ.3) THEN
  AHT1 = A1
  PHT1 = 0
ENDIF

IF(EVID.GT.2.AND.SDE.EQ.4) THEN
  AHT1 = 0
  PHT1 = A2
ENDIF

IF(A_0FLG.EQ.1) THEN
  A_0(1) = AHT1
  A_0(2) = PHT1
ENDIF

$DES
 DADT(1) = - CL/VD*A(1) ;+0
DADT(2) = (-CL/VD)*(A(2))+(-CL/VD)*(A(2))+SGW1*SGW1

$ERROR (OBS ONLY)
     IPRED = A(1)/VD
     IRES  = DV - IPRED
W=SQRT(ABS(A(2))*(1/VD)**2+ THETA(3)**2)
     IWRES = IRES/W
     Y     = IPRED+W*EPS(1)

$EST METHOD=ITS INTERACTION LAPLACE NUMERICAL SLOW NOABORT PRINT=1 CTYPE=3
$EST METHOD=IMP INTERACTION NOABORT SIGL=5 PRINT=1 IACCEPT=1.0 CTYPE=3
$EST MAXEVAL=9999 METHOD=1 LAPLACE INTER NOABORT NUMERICAL SLOW NSIG=3 PRINT=1
$COV MATRIX=R
$TABLE ID TIME FLAG AMT CMT IPRED IRES IWRES EVID
       ONEHEADER NOPRINT FILE=sde_ex2_imp_mu.tab
