Thu 09/23/2021
10:37 AM
$PROBLEM EX4model2, FOCE, using OTHER routine sde.f90
$ABBR DECLARE SGW(3) ; need at least nde of these
$ABBR DES=FULL

$INPUT ID TIME DV MDV EVID AMT CMT AGE SEX BSA SDEX SDE

$DATA sde_ex4o.dat
      IGNORE @

$SUBROUTINE ADVAN13 TOL=6 ATOL=6 OTHER=SDE.F90

$MODEL
COMP=(CENTRAL)
COMP=(PERIPH)
COMP=(ISR)
COMP=(OBSQ)
COMP=(P1)
COMP=(P2)
COMP=(P3)
COMP=(P4)
COMP=(P5)
COMP=(P6)

$THETA (0 0.1) ; ISR0
$THETA (0 0.6) ; W
$THETA (0, 0.1) ; SGW3

$OMEGA 0.5     ; ISR0

$SIGMA 1 FIX
$SIGMA 1 FIX

$PK
T12A=4.52
ALPHA=LOG(2)/T12A
FRACA=0.78
FRACB=1-FRACA
T12B=0.14*AGE+29.2
BETA=LOG(2)/T12B
K21=(FRACA*BETA+FRACB*ALPHA)/(FRACA+FRACB)
K10=(ALPHA*BETA)/K21
K12=ALPHA+BETA-K21-K10
V1=1
IF (SEX.EQ.0) V1=1.92*BSA+0.64
IF (SEX.EQ.1) V1=1.11*BSA+2.04
TVISR0=THETA(1)
ISR0=TVISR0*EXP(ETA(1))
F1=ISR0/K10
F2=K12*F1/K21
F3=ISR0
SGW3=THETA(3)

ISR=A(3)
ISRV=0

NCMT=1
NDE=3

$DES
FIRSTEM=1
DADT(1) = A(3)-K10*A(1)-K12*A(1)+K21*A(2)
DADT(2) = K12*A(1)-K21*A(2)
DADT(3) = 0
DADT(4)=A(1)/V1
SGW(1)=0.0
SGW(2)=0.0
SGW(3)=SGW3
"LAST
"      CALL SDE_DER(DADT,A,DA,IR,SGW,NDE,NCMT)

$ERROR (OBS ONLY)
IPRED=A(1)/V1
IRES=DV-IPRED
W=THETA(2)
IWRES=IRES/W
WS=1000.0
Y=IPRED+W*EPS(1)+WS*EPS(2)
"LAST
"       CALL SDE_CADD(A,HH,TIME,DV,CMT,NDE,NCMT,SDE)

;$EST MAXEVAL=9999 METHOD=1 INTER NOABORT NSIG=2 PRINT=1 OPTMAP=1 ETADER=2 SIGL=6 MCETA=1 SLOW
$EST METHOD=IMP PRINT=1 CTYPE=3 OPTMAP=1 ETADER=2 SIGL=5 MCETA=1 SLOW NITER=200 IACCEPT=0.4

$COVARIANCE UNCONDITIONAL MATRIX=R

$TABLE ID TIME EVID SDE IPRED IRES IWRES
       TVISR0 W
       ISR ISRV
       AGE SEX BSA
       NOPRINT ONEHEADER FILE=sde_ex4_impo.tab

NM-TRAN MESSAGES
 WARNINGS AND ERRORS (IF ANY) FOR PROBLEM    1
 (WARNING  2) NM-TRAN INFERS THAT THE DATA ARE POPULATION.
 (WARNING  121) INTERACTION IS IMPLIED WITH EM/BAYES ESTIMATION METHODS
 (WARNING  45) $DES: VALUES HAVE NOT BEEN ASSIGNED TO ALL DADT VARIABLES.
 UNUSED COMPARTMENTS SHOULD BE OFF.
Note: Analytical 2nd Derivatives are constructed in FSUBS but are never used.
      You may insert $ABBR DERIV2=NO after the first $PROB to save FSUBS construction and compilation time

1NONLINEAR MIXED EFFECTS MODEL PROGRAM (NONMEM) VERSION 7.5.1
 ORIGINALLY DEVELOPED BY STUART BEAL, LEWIS SHEINER, AND ALISON BOECKMANN
 CURRENT DEVELOPERS ARE ROBERT BAUER, ICON DEVELOPMENT SOLUTIONS,
 AND ALISON BOECKMANN. IMPLEMENTATION, EFFICIENCY, AND STANDARDIZATION
 PERFORMED BY NOUS INFOSYSTEMS.
 PROBLEM NO.:         1
 EX4model2, FOCE, using OTHER routine sde.f90
 TOT. NO. OF OBS RECS:      420
 TOT. NO. OF INDIVIDUALS:       12
 GENERAL NONLINEAR KINETICS MODEL WITH STIFF/NONSTIFF EQUATIONS (LSODA, ADVAN13)
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 #TBLN:      1
 #METH: Importance Sampling
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
 #TERM:
 OPTIMIZATION WAS NOT COMPLETED PRIOR TO USER INTERRUPT

 ETABAR IS THE ARITHMETIC MEAN OF THE ETA-ESTIMATES,
 AND THE P-VALUE IS GIVEN FOR THE NULL HYPOTHESIS THAT THE TRUE MEAN IS 0.

 ETABAR:        -5.5438E-03
 SE:             1.0919E-01
 N:                      12

 P VAL.:         9.5951E-01

 ETASHRINKSD(%)  1.0163E+01
 ETASHRINKVR(%)  1.9293E+01
 EBVSHRINKSD(%)  2.4056E+00
 EBVSHRINKVR(%)  4.7534E+00
 RELATIVEINF(%)  9.5247E+01
 EPSSHRINKSD(%)  2.0080E+00  7.6722E-01
 EPSSHRINKVR(%)  3.9757E+00  1.5286E+00


 TOTAL DATA POINTS NORMALLY DISTRIBUTED (N):          420
 N*LOG(2PI) CONSTANT TO OBJECTIVE FUNCTION:    771.908367891925
 OBJECTIVE FUNCTION VALUE WITHOUT CONSTANT:   -556.408319712375
 OBJECTIVE FUNCTION VALUE WITH CONSTANT:       215.500048179550
 REPORTED OBJECTIVE FUNCTION DOES NOT CONTAIN CONSTANT

 TOTAL EFFECTIVE ETAS (NIND*NETA):                            12


 #TERE:
 Elapsed estimation  time in seconds:  2170.50
 Elapsed covariance  time in seconds:   165.13

 ********************                               IMPORTANCE SAMPLING                              ********************
 #OBJT:**************                        FINAL VALUE OF OBJECTIVE FUNCTION                       ********************
 #OBJV:********************************************     -556.408       **************************************************

 ********************                               IMPORTANCE SAMPLING                              ********************
 ********************                             FINAL PARAMETER ESTIMATE                           ********************

 THETA - VECTOR OF FIXED EFFECTS PARAMETERS   *********
         TH 1      TH 2      TH 3
         2.42E-01  9.00E-02  2.66E-02

 OMEGA - COV MATRIX FOR RANDOM EFFECTS - ETAS  ********
         ETA1
 ETA1
+        1.77E-01

 SIGMA - COV MATRIX FOR RANDOM EFFECTS - EPSILONS  ****
         EPS1      EPS2
 EPS1
+        1.00E+00
 EPS2
+        0.00E+00  1.00E+00

 OMEGA - CORR MATRIX FOR RANDOM EFFECTS - ETAS  *******
         ETA1
 ETA1
+        4.21E-01

 SIGMA - CORR MATRIX FOR RANDOM EFFECTS - EPSILONS  ***
         EPS1      EPS2
 EPS1
+        1.00E+00
 EPS2
+        0.00E+00  1.00E+00

 ********************                               IMPORTANCE SAMPLING                              ********************
 ********************                          STANDARD ERROR OF ESTIMATE (R)                        ********************

 THETA - VECTOR OF FIXED EFFECTS PARAMETERS   *********
         TH 1      TH 2      TH 3
         2.19E-02  7.65E-03  1.22E-03

 OMEGA - COV MATRIX FOR RANDOM EFFECTS - ETAS  ********
         ETA1
 ETA1
+        7.88E-02

 SIGMA - COV MATRIX FOR RANDOM EFFECTS - EPSILONS  ****
         EPS1      EPS2
 EPS1
+        0.00E+00
 EPS2
+        0.00E+00  0.00E+00

 OMEGA - CORR MATRIX FOR RANDOM EFFECTS - ETAS  *******
         ETA1
 ETA1
+        9.36E-02

 SIGMA - CORR MATRIX FOR RANDOM EFFECTS - EPSILONS  ***
         EPS1      EPS2
 EPS1
+       .........
 EPS2
+       ......... .........

 ********************                               IMPORTANCE SAMPLING                              ********************
 ********************                        COVARIANCE MATRIX OF ESTIMATE (R)                       ********************

            TH 1      TH 2      TH 3      OM11      SG11      SG12      SG22
 TH 1
+        4.78E-04
 TH 2
+        9.83E-06  5.85E-05
 TH 3
+       -5.13E-07 -2.48E-06  1.48E-06
 OM11
+       -1.73E-04 -4.96E-05  3.94E-07  6.21E-03
 SG11
+       ......... ......... ......... ......... .........
 SG12
+       ......... ......... ......... ......... ......... .........
 SG22
+       ......... ......... ......... ......... ......... ......... .........

 ********************                               IMPORTANCE SAMPLING                              ********************
 ********************                        CORRELATION MATRIX OF ESTIMATE (R)                      ********************

            TH 1      TH 2      TH 3      OM11      SG11      SG12      SG22
 TH 1
+        2.19E-02
 TH 2
+        5.88E-02  7.65E-03
 TH 3
+       -1.93E-02 -2.67E-01  1.22E-03
 OM11
+       -1.01E-01 -8.24E-02  4.11E-03  7.88E-02
 SG11
+       ......... ......... ......... ......... .........
 SG12
+       ......... ......... ......... ......... ......... .........
 SG22
+       ......... ......... ......... ......... ......... ......... .........
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 Elapsed postprocess time in seconds:     1.31
 Elapsed finaloutput time in seconds:     0.04
 #CPUT: Total CPU Time in Seconds,     2334.719
