Fri 10/01/2021
05:02 PM
$PROBLEM EX4model1
$INPUT ID HOUR DV MDV EVID AMT CMT AGE SEX BSA SDE TIME
$DATA EX4.dataODESDE
      IGNORE @
$SUBROUTINE ADVAN6 TOL 6 DP
$MODEL
COMP=(CENTRAL)
COMP=(PERIPH)
COMP=(ISR)
       COMP = (P1)
       COMP = (P2)
       COMP = (P3)
       COMP = (P4)
       COMP = (P5)
       COMP = (P6)

$THETA (0 0.1) ; ISR0
$THETA (0 0.6) ; W
$THETA (0,.1) ; SGW3

$OMEGA 0.5     ; ISR0

$SIGMA 1 FIX

$PK
T12A=4.52
ALPHA=LOG(2)/T12A
FRACA=0.78
FRACB=1-FRACA
T12B=0.14*AGE+29.2
BETA=LOG(2)/T12B
K21=(FRACA*BETA+FRACB*ALPHA)/(FRACA+FRACB)
K10=(ALPHA*BETA)/K21
K12=ALPHA+BETA-K21-K10
V1=1
IF (SEX.EQ.0) V1=1.92*BSA+0.64
IF (SEX.EQ.1) V1=1.11*BSA+2.04
TVISR0=THETA(1)
ISR0=TVISR0*EXP(ETA(1))
F1=ISR0/K10
F2=K12*F1/K21
F3=ISR0
SGW3 = THETA(3)

IF(NEWIND.NE.2) THEN
  AHT1 = 0
  AHT2 = 0
  AHT3 = 0
  PHT1 = 0
  PHT2 = 0
  PHT3 = 0
  PHT4 = 0
  PHT5 = 0
  PHT6 = 0
ENDIF

IF(EVID.NE.3) THEN
  A1 = A(1)
  A2 = A(2)
  A3 = A(3)
  A4 = A(4)
  A5 = A(5)
  A6 = A(6)
  A7 = A(7)
  A8 = A(8)
  A9 = A(9)
ELSE
  A1 = A1
  A2 = A2
  A3 = A3
  A4 = A4
  A5 = A5
  A6 = A6
  A7 = A7
  A8 = A8
  A9 = A9
ENDIF

IF(EVID.EQ.0) OBS = DV

IF(EVID.GT.2.AND.SDE.EQ.2) THEN
  RVAR = A4*(1/V1)**2+THETA(2)**2
  K1   = A4*(1/V1)/RVAR
  K2   = A5*(1/V1)/RVAR
  K3   = A6*(1/V1)/RVAR
  AHT1 = A1 + K1*(OBS -(A1/V1))
  AHT2 = A2 + K2*(OBS -(A1/V1))
  AHT3 = A3 + K3*(OBS -(A1/V1))
  PHT1 = A4 - K1*RVAR*K1
  PHT2 = A5 - K1*RVAR*K2
  PHT3 = A6 - K1*RVAR*K3
  PHT4 = A7 - K2*RVAR*K2
  PHT5 = A8 - K2*RVAR*K3
  PHT6 = A9 - K3*RVAR*K3
ENDIF

IF(EVID.GT.2.AND.SDE.EQ.3) THEN
  AHT1 = A1
  AHT2 = A2
  AHT3 = A3
  PHT1 = 0
  PHT2 = 0
  PHT3 = 0
  PHT4 = 0
  PHT5 = 0
  PHT6 = 0
ENDIF

IF(EVID.GT.2.AND.SDE.EQ.4) THEN
  AHT1 = 0
  AHT2 = 0
  AHT3 = 0
  PHT1 = A4
  PHT2 = A5
  PHT3 = A6
  PHT4 = A7
  PHT5 = A8
  PHT6 = A9
ENDIF

IF(A_0FLG.EQ.1) THEN
  A_0(1) = AHT1
  A_0(2) = AHT2
  A_0(3) = AHT3
  A_0(4) = PHT1
  A_0(5) = PHT2
  A_0(6) = PHT3
  A_0(7) = PHT4
  A_0(8) = PHT5
  A_0(9) = PHT6
ENDIF

ISR=AHT3
ISRV=PHT6

$DES
DADT(1) = A(3)-K10*A(1)-K12*A(1)+K21*A(2)
DADT(2) = K12*A(1)-K21*A(2)
DADT(3) = 0 ;+0
DADT(4) = (-(K10+K12))*(A(4))+(K21)*(A(5))+(1)*(A(6))+(-(K10+K12))*(A(4))+(K21)*(A(5))+(1)*(A(6))
DADT(5) = (-(K10+K12))*(A(5))+(K21)*(A(7))+(1)*(A(8))+(K12)*(A(4))+(-K21)*(A(5))+(0)*(A(6))
DADT(6) = (-(K10+K12))*(A(6))+(K21)*(A(8))+(1)*(A(9))+(0)*(A(4))+(0)*(A(5))+(0)*(A(6))
DADT(7) = (K12)*(A(5))+(-K21)*(A(7))+(0)*(A(8))+(K12)*(A(5))+(-K21)*(A(7))+(0)*(A(8))
DADT(8) = (K12)*(A(6))+(-K21)*(A(8))+(0)*(A(9))+(0)*(A(5))+(0)*(A(7))+(0)*(A(8))
DADT(9) = (0)*(A(6))+(0)*(A(8))+(0)*(A(9))+(0)*(A(6))+(0)*(A(8))+(0)*(A(9))+SGW3*SGW3

$ERROR
IPRED=A(1)/V1
IRES=DV-IPRED
W=SQRT(A(4)*(1/V1)**2+THETA(2)**2)
IWRES=IRES/W
Y=IPRED+W*EPS(1)
$ESTIMATION MAXEVALS=9999 METHOD=1 INTERACTION NOABORT SIGDIGITS=3 PRINT=5
$COVARIANCE
$TABLE ID HOUR EVID SDE IPRED IRES IWRES
       TVISR0 W
       ISR ISRV
       AGE SEX BSA
       NOPRINT ONEHEADER FILE=EX4.table1

NM-TRAN MESSAGES
 WARNINGS AND ERRORS (IF ANY) FOR PROBLEM    1
 (WARNING  2) NM-TRAN INFERS THAT THE DATA ARE POPULATION.
 (WARNING  3) THERE MAY BE AN ERROR IN THE ABBREVIATED CODE. THE FOLLOWING
 ONE OR MORE RANDOM VARIABLES ARE DEFINED WITH "IF" STATEMENTS THAT DO NOT
 PROVIDE DEFINITIONS FOR BOTH THE "THEN" AND "ELSE" CASES. IF ALL
 CONDITIONS FAIL, THE VALUES OF THESE VARIABLES WILL BE ZERO.
   RVAR K1 K2 K3
Note: Analytical 2nd Derivatives are constructed in FSUBS but are never used.
      You may insert $ABBR DERIV2=NO after the first $PROB to save FSUBS construction and compilation time

1NONLINEAR MIXED EFFECTS MODEL PROGRAM (NONMEM) VERSION 7.5.1
 ORIGINALLY DEVELOPED BY STUART BEAL, LEWIS SHEINER, AND ALISON BOECKMANN
 CURRENT DEVELOPERS ARE ROBERT BAUER, ICON DEVELOPMENT SOLUTIONS,
 AND ALISON BOECKMANN. IMPLEMENTATION, EFFICIENCY, AND STANDARDIZATION
 PERFORMED BY NOUS INFOSYSTEMS.
 PROBLEM NO.:         1
 EX4model1
 TOT. NO. OF OBS RECS:      420
 TOT. NO. OF INDIVIDUALS:       12
 GENERAL NONLINEAR KINETICS MODEL (DVERK1, ADVAN6)
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 #TBLN:      1
 #METH: First Order Conditional Estimation with Interaction
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
 #TERM:
0MINIMIZATION SUCCESSFUL
 NO. OF FUNCTION EVALUATIONS USED:      105
 NO. OF SIG. DIGITS IN FINAL EST.:  3.4

 ETABAR IS THE ARITHMETIC MEAN OF THE ETA-ESTIMATES,
 AND THE P-VALUE IS GIVEN FOR THE NULL HYPOTHESIS THAT THE TRUE MEAN IS 0.

 ETABAR:         1.7427E-02
 SE:             8.8982E-02
 N:                      12

 P VAL.:         8.4473E-01

 ETASHRINKSD(%)  1.1418E+01
 ETASHRINKVR(%)  2.1532E+01
 EBVSHRINKSD(%)  1.0206E+01
 EBVSHRINKVR(%)  1.9370E+01
 RELATIVEINF(%)  8.0630E+01
 EPSSHRINKSD(%)  1.1307E+00
 EPSSHRINKVR(%)  2.2486E+00


 TOTAL DATA POINTS NORMALLY DISTRIBUTED (N):          420
 N*LOG(2PI) CONSTANT TO OBJECTIVE FUNCTION:    771.908367891925
 OBJECTIVE FUNCTION VALUE WITHOUT CONSTANT:   -556.532207121363
 OBJECTIVE FUNCTION VALUE WITH CONSTANT:       215.376160770562
 REPORTED OBJECTIVE FUNCTION DOES NOT CONTAIN CONSTANT

 TOTAL EFFECTIVE ETAS (NIND*NETA):                            12


 #TERE:
 Elapsed estimation  time in seconds:    64.27
 Elapsed covariance  time in seconds:    33.21
 Elapsed postprocess time in seconds:     1.21

 ********************               FIRST ORDER CONDITIONAL ESTIMATION WITH INTERACTION              ********************
 #OBJT:**************                       MINIMUM VALUE OF OBJECTIVE FUNCTION                      ********************
 #OBJV:********************************************     -556.532       **************************************************

 ********************               FIRST ORDER CONDITIONAL ESTIMATION WITH INTERACTION              ********************
 ********************                             FINAL PARAMETER ESTIMATE                           ********************

 THETA - VECTOR OF FIXED EFFECTS PARAMETERS   *********
         TH 1      TH 2      TH 3
         2.33E-01  8.86E-02  2.64E-02

 OMEGA - COV MATRIX FOR RANDOM EFFECTS - ETAS  ********
         ETA1
 ETA1
+        1.21E-01

 SIGMA - COV MATRIX FOR RANDOM EFFECTS - EPSILONS  ****
         EPS1
 EPS1
+        1.00E+00

 OMEGA - CORR MATRIX FOR RANDOM EFFECTS - ETAS  *******
         ETA1
 ETA1
+        3.48E-01

 SIGMA - CORR MATRIX FOR RANDOM EFFECTS - EPSILONS  ***
         EPS1
 EPS1
+        1.00E+00

 ********************               FIRST ORDER CONDITIONAL ESTIMATION WITH INTERACTION              ********************
 ********************                            STANDARD ERROR OF ESTIMATE                          ********************

 THETA - VECTOR OF FIXED EFFECTS PARAMETERS   *********
         TH 1      TH 2      TH 3
         2.75E-02  1.58E-02  2.73E-03

 OMEGA - COV MATRIX FOR RANDOM EFFECTS - ETAS  ********
         ETA1
 ETA1
+        5.39E-02

 SIGMA - COV MATRIX FOR RANDOM EFFECTS - EPSILONS  ****
         EPS1
 EPS1
+       .........

 OMEGA - CORR MATRIX FOR RANDOM EFFECTS - ETAS  *******
         ETA1
 ETA1
+        7.74E-02

 SIGMA - CORR MATRIX FOR RANDOM EFFECTS - EPSILONS  ***
         EPS1
 EPS1
+       .........

 ********************               FIRST ORDER CONDITIONAL ESTIMATION WITH INTERACTION              ********************
 ********************                          COVARIANCE MATRIX OF ESTIMATE                         ********************

            TH 1      TH 2      TH 3      OM11      SG11
 TH 1
+        7.54E-04
 TH 2
+        2.10E-04  2.49E-04
 TH 3
+        4.55E-05  2.82E-05  7.44E-06
 OM11
+       -5.36E-04 -3.57E-04 -8.05E-05  2.90E-03
 SG11
+       ......... ......... ......... ......... .........

 ********************               FIRST ORDER CONDITIONAL ESTIMATION WITH INTERACTION              ********************
 ********************                          CORRELATION MATRIX OF ESTIMATE                        ********************

            TH 1      TH 2      TH 3      OM11      SG11
 TH 1
+        2.75E-02
 TH 2
+        4.85E-01  1.58E-02
 TH 3
+        6.08E-01  6.55E-01  2.73E-03
 OM11
+       -3.62E-01 -4.19E-01 -5.47E-01  5.39E-02
 SG11
+       ......... ......... ......... ......... .........
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 Elapsed finaloutput time in seconds:     0.14
 #CPUT: Total CPU Time in Seconds,      100.734
