$PROB RUN#
$INPUT C ID TIME DV AMT RATE EVID MDV CMT ROWNUM SID
$DATA superid3.csv IGNORE=C

$SUBROUTINES ADVAN2 TRANS2

$PK
MU_4=THETA(1)
MU_5=THETA(2)
MU_6=THETA(3)
KA=DEXP(MU_4+ETA(4)+ETA(1))
CL=DEXP(MU_5+ETA(5)+ETA(2))
V=DEXP(MU_6+ETA(6)+ETA(3))
S2=V

$ERROR
IPRE=F
Y = IPRE + IPRE*EPS(1)

; Initial values of THETA


; theta results from superid3_21c.ext
$THETA  1.80785E-01 -5.31285E+00 -3.08196E+00
;INITIAL values of OMEGA
$OMEGA BLOCK(3)

 9.86080E-03
 1.39934E-04  9.60331E-03
 5.06628E-04  6.34611E-04  9.52273E-03


$OMEGA BLOCK(3)
 3.24545E-02
 -4.32801E-03  2.52337E-02
  2.75669E-02 -5.11563E-03  4.99318E-02

;Initial value of SIGMA
$SIGMA
 2.99981E-03 FIXED    ;[P]

$EST METHOD=ITS PRINT=1 SIGL=8 FNLETA=0 NOPRIOR=1 NITER=0
$EST METHOD=1 PRINT=1 NSIG=3 SIGL=10 FNLETA=0 SLOW NONINFETA=1 NOPRIOR=1 MAXEVAL=0
$COV MATRIX=R PRINT=R UNCONDITIONAL
