Mon 02/01/2021
12:50 PM
$PROB RUN#
$INPUT C ID TIME DV AMT RATE EVID MDV CMT ROWNUM SID
$DATA superid3.csv IGNORE=C

$SUBROUTINES ADVAN2 TRANS2

$PK
MU_1=THETA(1)
MU_2=THETA(2)
MU_3=THETA(3)
KA=DEXP(MU_1+ETA(1))
CL=DEXP(MU_2+ETA(2))
V=DEXP(MU_3+ETA(3))
S2=V

$ERROR
IPRE=F
Y = IPRE + IPRE*EPS(1)

; Initial values of THETA

$THETA  1.80785E-01 -5.31285E+00 -3.08196E+00
;INITIAL values of OMEGA
$OMEGA BLOCK(3)

 9.86080E-03
 1.39934E-04  9.60331E-03
 5.06628E-04  6.34611E-04  9.52273E-03

;Initial value of SIGMA
$SIGMA
 2.99981E-03    ;[P]

;$CHAIN FILE=superid3_21_old.ext TBLN=4 ISAMPLE=-1000000000 nsample=0

$EST METHOD=ITS INTERACTION PRINT=1 SIGL=8 FNLETA=0 NOPRIOR=1 NITER=15
$EST METHOD=1 INTERACTION PRINT=1 NSIG=3 SIGL=10 FNLETA=0 SLOW NONINFETA=1 NOPRIOR=1 MAXEVAL=9999
$COV MATRIX=R PRINT=R UNCONDITIONAL

NM-TRAN MESSAGES
 WARNINGS AND ERRORS (IF ANY) FOR PROBLEM    1
 (WARNING  126) ONLY THE LAST FNLETA LISTED IN THE SERIES OF $EST RECORDS FOR
 THIS PROBLEM WILL BE USED
 (WARNING  2) NM-TRAN INFERS THAT THE DATA ARE POPULATION.
Note: Analytical 2nd Derivatives are constructed in FSUBS but are never used.
      You may insert $ABBR DERIV2=NO after the first $PROB to save FSUBS construction and compilation time

1NONLINEAR MIXED EFFECTS MODEL PROGRAM (NONMEM) VERSION 7.5.1
 ORIGINALLY DEVELOPED BY STUART BEAL, LEWIS SHEINER, AND ALISON BOECKMANN
 CURRENT DEVELOPERS ARE ROBERT BAUER, ICON DEVELOPMENT SOLUTIONS,
 AND ALISON BOECKMANN. IMPLEMENTATION, EFFICIENCY, AND STANDARDIZATION
 PERFORMED BY NOUS INFOSYSTEMS.
 PROBLEM NO.:         1
 RUN#
 TOT. NO. OF OBS RECS:     8000
 TOT. NO. OF INDIVIDUALS:      800
 ONE COMPARTMENT MODEL WITH FIRST-ORDER ABSORPTION (ADVAN2)
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 #TBLN:      1
 #METH: Iterative Two Stage (No Prior)
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
 #TERM:
 OPTIMIZATION WAS NOT TESTED FOR CONVERGENCE

 ETABAR IS THE ARITHMETIC MEAN OF THE ETA-ESTIMATES,
 AND THE P-VALUE IS GIVEN FOR THE NULL HYPOTHESIS THAT THE TRUE MEAN IS 0.

 ETABAR:         1.2540E-06  2.3264E-08  3.0898E-08
 SE:             5.7660E-03  6.5542E-03  8.5710E-03
 N:                     800         800         800

 P VAL.:         9.9983E-01  1.0000E+00  1.0000E+00

 ETASHRINKSD(%)  2.0576E+01  6.3640E-01  4.8917E-01
 ETASHRINKVR(%)  3.6918E+01  1.2688E+00  9.7595E-01
 EBVSHRINKSD(%)  2.0580E+01  6.3641E-01  4.8921E-01
 EBVSHRINKVR(%)  3.6924E+01  1.2688E+00  9.7603E-01
 RELATIVEINF(%)  4.7073E+01  9.8477E+01  9.9861E+01
 EPSSHRINKSD(%)  1.3007E+01
 EPSSHRINKVR(%)  2.4323E+01


 TOTAL DATA POINTS NORMALLY DISTRIBUTED (N):         8000
 N*LOG(2PI) CONSTANT TO OBJECTIVE FUNCTION:    14703.0165312748
 OBJECTIVE FUNCTION VALUE WITHOUT CONSTANT:   -15727.3146860425
 OBJECTIVE FUNCTION VALUE WITH CONSTANT:      -1024.29815476772
 REPORTED OBJECTIVE FUNCTION DOES NOT CONTAIN CONSTANT

 TOTAL EFFECTIVE ETAS (NIND*NETA):                          2400


 #TERE:
 Elapsed estimation  time in seconds:    12.35
 Elapsed covariance  time in seconds:     0.16

 ********************                          ITERATIVE TWO STAGE (NO PRIOR)                        ********************
 #OBJT:**************                        FINAL VALUE OF OBJECTIVE FUNCTION                       ********************
 #OBJV:********************************************   -15727.315       **************************************************

 ********************                          ITERATIVE TWO STAGE (NO PRIOR)                        ********************
 ********************                             FINAL PARAMETER ESTIMATE                           ********************

 THETA - VECTOR OF FIXED EFFECTS PARAMETERS   *********
         TH 1      TH 2      TH 3
         1.80E-01 -5.31E+00 -3.08E+00

 OMEGA - COV MATRIX FOR RANDOM EFFECTS - ETAS  ********
         ETA1      ETA2      ETA3
 ETA1
+        4.22E-02
 ETA2
+       -4.27E-03  3.49E-02
 ETA3
+        2.80E-02 -4.54E-03  5.94E-02

 SIGMA - COV MATRIX FOR RANDOM EFFECTS - EPSILONS  ****
         EPS1
 EPS1
+        3.00E-03

 OMEGA - CORR MATRIX FOR RANDOM EFFECTS - ETAS  *******
         ETA1      ETA2      ETA3
 ETA1
+        2.05E-01
 ETA2
+       -1.11E-01  1.87E-01
 ETA3
+        5.58E-01 -9.97E-02  2.44E-01

 SIGMA - CORR MATRIX FOR RANDOM EFFECTS - EPSILONS  ***
         EPS1
 EPS1
+        5.48E-02

 ********************                          ITERATIVE TWO STAGE (NO PRIOR)                        ********************
 ********************                          STANDARD ERROR OF ESTIMATE (S)                        ********************

 THETA - VECTOR OF FIXED EFFECTS PARAMETERS   *********
         TH 1      TH 2      TH 3
         1.03E-02  7.00E-03  9.03E-03

 OMEGA - COV MATRIX FOR RANDOM EFFECTS - ETAS  ********
         ETA1      ETA2      ETA3
 ETA1
+        2.96E-03
 ETA2
+        2.00E-03  2.15E-03
 ETA3
+        2.95E-03  1.82E-03  3.88E-03

 SIGMA - COV MATRIX FOR RANDOM EFFECTS - EPSILONS  ****
         EPS1
 EPS1
+        5.52E-05

 OMEGA - CORR MATRIX FOR RANDOM EFFECTS - ETAS  *******
         ETA1      ETA2      ETA3
 ETA1
+        7.20E-03
 ETA2
+        5.18E-02  5.75E-03
 ETA3
+        3.85E-02  3.84E-02  7.96E-03

 SIGMA - CORR MATRIX FOR RANDOM EFFECTS - EPSILONS  ***
         EPS1
 EPS1
+        5.04E-04

 ********************                          ITERATIVE TWO STAGE (NO PRIOR)                        ********************
 ********************                        COVARIANCE MATRIX OF ESTIMATE (S)                       ********************

            TH 1      TH 2      TH 3      OM11      OM12      OM13      OM22      OM23      OM33      SG11
 TH 1
+        1.06E-04
 TH 2
+       -6.35E-06  4.90E-05
 TH 3
+        3.85E-05 -6.16E-06  8.15E-05
 OM11
+        6.19E-06  5.76E-07  3.36E-06  8.76E-06
 OM12
+       -1.68E-06 -5.68E-07  3.83E-06  2.17E-07  3.98E-06
 OM13
+        3.53E-06  4.86E-06  1.81E-06  5.61E-06 -4.16E-07  8.70E-06
 OM22
+       -5.91E-08  1.48E-06 -2.15E-06  3.21E-07 -7.62E-07  6.22E-07  4.61E-06
 OM23
+        3.23E-06 -2.30E-06  2.69E-06 -8.23E-08  1.83E-06 -1.35E-06 -8.57E-07  3.33E-06
 OM33
+        6.03E-07  4.88E-06  2.04E-06  3.23E-06 -1.13E-06  7.58E-06  4.74E-07 -2.70E-06  1.51E-05
 SG11
+       -3.71E-10  3.03E-09 -8.71E-09 -1.55E-09 -2.09E-09  9.90E-10  6.11E-10  6.01E-10 -2.85E-09  3.05E-09

 ********************                          ITERATIVE TWO STAGE (NO PRIOR)                        ********************
 ********************                        CORRELATION MATRIX OF ESTIMATE (S)                      ********************

            TH 1      TH 2      TH 3      OM11      OM12      OM13      OM22      OM23      OM33      SG11
 TH 1
+        1.03E-02
 TH 2
+       -8.80E-02  7.00E-03
 TH 3
+        4.14E-01 -9.76E-02  9.03E-03
 OM11
+        2.03E-01  2.78E-02  1.26E-01  2.96E-03
 OM12
+       -8.17E-02 -4.07E-02  2.13E-01  3.67E-02  2.00E-03
 OM13
+        1.16E-01  2.35E-01  6.81E-02  6.43E-01 -7.07E-02  2.95E-03
 OM22
+       -2.67E-03  9.89E-02 -1.11E-01  5.05E-02 -1.78E-01  9.83E-02  2.15E-03
 OM23
+        1.72E-01 -1.80E-01  1.63E-01 -1.52E-02  5.03E-01 -2.50E-01 -2.19E-01  1.82E-03
 OM33
+        1.51E-02  1.80E-01  5.82E-02  2.81E-01 -1.46E-01  6.62E-01  5.69E-02 -3.81E-01  3.88E-03
 SG11
+       -6.52E-04  7.85E-03 -1.75E-02 -9.45E-03 -1.90E-02  6.08E-03  5.15E-03  5.97E-03 -1.33E-02  5.52E-05
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 #TBLN:      2
 #METH: First Order Conditional Estimation with Interaction (No Prior)
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
 #TERM:
0MINIMIZATION SUCCESSFUL
 NO. OF FUNCTION EVALUATIONS USED:      236
 NO. OF SIG. DIGITS IN FINAL EST.:  3.4

 ETABAR IS THE ARITHMETIC MEAN OF THE ETA-ESTIMATES,
 AND THE P-VALUE IS GIVEN FOR THE NULL HYPOTHESIS THAT THE TRUE MEAN IS 0.

 ETABAR:        -2.4704E-04 -8.0332E-05 -1.4134E-04
 SE:             5.7663E-03  6.5541E-03  8.5709E-03
 N:                     800         800         800

 P VAL.:         9.6583E-01  9.9022E-01  9.8684E-01

 ETASHRINKSD(%)  2.0540E+01  5.7708E-01  4.3542E-01
 ETASHRINKVR(%)  3.6861E+01  1.1508E+00  8.6894E-01
 EBVSHRINKSD(%)  2.0579E+01  6.3723E-01  4.8978E-01
 EBVSHRINKVR(%)  3.6922E+01  1.2704E+00  9.7716E-01
 RELATIVEINF(%)  4.7070E+01  9.8475E+01  9.9860E+01
 EPSSHRINKSD(%)  1.3011E+01
 EPSSHRINKVR(%)  2.4329E+01


 TOTAL DATA POINTS NORMALLY DISTRIBUTED (N):         8000
 N*LOG(2PI) CONSTANT TO OBJECTIVE FUNCTION:    14703.0165312748
 OBJECTIVE FUNCTION VALUE WITHOUT CONSTANT:   -15727.3187103616
 OBJECTIVE FUNCTION VALUE WITH CONSTANT:      -1024.30217908685
 REPORTED OBJECTIVE FUNCTION DOES NOT CONTAIN CONSTANT

 TOTAL EFFECTIVE ETAS (NIND*NETA):                          2400


 #TERE:
 Elapsed estimation  time in seconds:   104.43
 Elapsed covariance  time in seconds:    35.80
 Elapsed postprocess time in seconds:     0.00

 ********************          FIRST ORDER CONDITIONAL ESTIMATION WITH INTERACTION (NO PRIOR)        ********************
 #OBJT:**************                       MINIMUM VALUE OF OBJECTIVE FUNCTION                      ********************
 #OBJV:********************************************   -15727.319       **************************************************

 ********************          FIRST ORDER CONDITIONAL ESTIMATION WITH INTERACTION (NO PRIOR)        ********************
 ********************                             FINAL PARAMETER ESTIMATE                           ********************

 THETA - VECTOR OF FIXED EFFECTS PARAMETERS   *********
         TH 1      TH 2      TH 3
         1.81E-01 -5.31E+00 -3.08E+00

 OMEGA - COV MATRIX FOR RANDOM EFFECTS - ETAS  ********
         ETA1      ETA2      ETA3
 ETA1
+        4.22E-02
 ETA2
+       -4.27E-03  3.48E-02
 ETA3
+        2.79E-02 -4.54E-03  5.94E-02

 SIGMA - COV MATRIX FOR RANDOM EFFECTS - EPSILONS  ****
         EPS1
 EPS1
+        3.00E-03

 OMEGA - CORR MATRIX FOR RANDOM EFFECTS - ETAS  *******
         ETA1      ETA2      ETA3
 ETA1
+        2.05E-01
 ETA2
+       -1.11E-01  1.87E-01
 ETA3
+        5.58E-01 -9.98E-02  2.44E-01

 SIGMA - CORR MATRIX FOR RANDOM EFFECTS - EPSILONS  ***
         EPS1
 EPS1
+        5.48E-02

 ********************          FIRST ORDER CONDITIONAL ESTIMATION WITH INTERACTION (NO PRIOR)        ********************
 ********************                            STANDARD ERROR OF ESTIMATE                          ********************

 THETA - VECTOR OF FIXED EFFECTS PARAMETERS   *********
         TH 1      TH 2      TH 3
         9.69E-03  6.64E-03  8.66E-03

 OMEGA - COV MATRIX FOR RANDOM EFFECTS - ETAS  ********
         ETA1      ETA2      ETA3
 ETA1
+        3.06E-03
 ETA2
+        1.78E-03  1.76E-03
 ETA3
+        2.58E-03  1.63E-03  3.00E-03

 SIGMA - COV MATRIX FOR RANDOM EFFECTS - EPSILONS  ****
         EPS1
 EPS1
+        5.49E-05

 OMEGA - CORR MATRIX FOR RANDOM EFFECTS - ETAS  *******
         ETA1      ETA2      ETA3
 ETA1
+        7.45E-03
 ETA2
+        4.59E-02  4.73E-03
 ETA3
+        3.41E-02  3.55E-02  6.15E-03

 SIGMA - CORR MATRIX FOR RANDOM EFFECTS - EPSILONS  ***
         EPS1
 EPS1
+        5.01E-04

 ********************          FIRST ORDER CONDITIONAL ESTIMATION WITH INTERACTION (NO PRIOR)        ********************
 ********************                          COVARIANCE MATRIX OF ESTIMATE                         ********************

            TH 1      TH 2      TH 3      OM11      OM12      OM13      OM22      OM23      OM33      SG11
 TH 1
+        9.38E-05
 TH 2
+       -4.45E-06  4.41E-05
 TH 3
+        3.60E-05 -5.03E-06  7.50E-05
 OM11
+        4.06E-07  1.42E-08  2.50E-08  9.38E-06
 OM12
+       -1.89E-07 -6.24E-09 -1.48E-08 -6.59E-07  3.16E-06
 OM13
+        3.21E-07  7.43E-09  2.14E-08  5.40E-06 -5.11E-07  6.67E-06
 OM22
+       -4.89E-09  4.13E-09  5.36E-09  3.41E-08 -3.13E-07  3.80E-08  3.11E-06
 OM23
+       -8.12E-10 -1.87E-09 -6.74E-09 -2.59E-07  1.29E-06 -4.14E-07 -3.53E-07  2.66E-06
 OM33
+        4.55E-08 -5.18E-09  6.63E-09  2.07E-06 -2.91E-07  4.31E-06  4.32E-08 -6.04E-07  8.99E-06
 SG11
+       -3.93E-10  3.02E-09  2.99E-09 -2.05E-09 -6.90E-10 -7.70E-10 -4.85E-10 -5.16E-10 -5.85E-10  3.01E-09

 ********************          FIRST ORDER CONDITIONAL ESTIMATION WITH INTERACTION (NO PRIOR)        ********************
 ********************                          CORRELATION MATRIX OF ESTIMATE                        ********************

            TH 1      TH 2      TH 3      OM11      OM12      OM13      OM22      OM23      OM33      SG11
 TH 1
+        9.69E-03
 TH 2
+       -6.91E-02  6.64E-03
 TH 3
+        4.29E-01 -8.75E-02  8.66E-03
 OM11
+        1.37E-02  7.00E-04  9.41E-04  3.06E-03
 OM12
+       -1.09E-02 -5.28E-04 -9.64E-04 -1.21E-01  1.78E-03
 OM13
+        1.28E-02  4.33E-04  9.56E-04  6.83E-01 -1.11E-01  2.58E-03
 OM22
+       -2.86E-04  3.53E-04  3.51E-04  6.32E-03 -9.98E-02  8.35E-03  1.76E-03
 OM23
+       -5.13E-05 -1.72E-04 -4.77E-04 -5.19E-02  4.44E-01 -9.82E-02 -1.23E-01  1.63E-03
 OM33
+        1.57E-03 -2.60E-04  2.55E-04  2.25E-01 -5.47E-02  5.57E-01  8.17E-03 -1.24E-01  3.00E-03
 SG11
+       -7.38E-04  8.27E-03  6.30E-03 -1.22E-02 -7.06E-03 -5.43E-03 -5.01E-03 -5.76E-03 -3.56E-03  5.49E-05
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 Elapsed finaloutput time in seconds:     0.02
 #CPUT: Total CPU Time in Seconds,      159.266
