Sat 01/30/2021
11:27 PM
$PROB RUN#
$INPUT C ID TIME DV AMT RATE EVID MDV CMT ROWNUM SID
$DATA superid3.csv IGNORE=C

$SUBROUTINES ADVAN2 TRANS2

$PK
MU_4=THETA(1)
MU_5=THETA(2)
MU_6=THETA(3)
KA=DEXP(MU_4+ETA(4)+ETA(1))
CL=DEXP(MU_5+ETA(5)+ETA(2))
V=DEXP(MU_6+ETA(6)+ETA(3))
S2=V

$ERROR
IPRE=F
Y = IPRE + IPRE*EPS(1)

; Initial values of THETA
$THETA 0.2 -4 -2
;INITIAL values of OMEGA
$OMEGA BLOCK(3)
0.1
0.001 0.1
0.001 0.001 0.1

$OMEGA BLOCK(3)
0.3
0.001 0.3
0.001 0.001 0.3

;Initial value of SIGMA
$SIGMA
0.1     ;[P]

$PRIOR NWPRI
$OMEGAP BLOCK(3)
0.01
0.001 0.01
0.001 0.001 0.01

$OMEGAP BLOCK(3)
0.03
0.001 0.03
0.001 0.001 0.03

$OMEGAPD (3 FIXED)X2

$LEVEL
SID=(4[1],5[2],6[3])

$EST METHOD=ITS AUTO=1 PRINT=1 SIGL=8 FNLETA=0 NOPRIOR=1
     LEVCENTER=0 LEVOBJTYPE=0
$EST METHOD=ITS PRINT=1 SIGL=8 FNLETA=0 NOPRIOR=1 NITER=0
     LEVCENTER=0 LEVOBJTYPE=1
;$EST METHOD=IMP AUTO=1 PRINT=1 NOPRIOR=1
;$EST METHOD=BAYES AUTO=1 PRINT=25 NITER=2000 NOPRIOR=0
$EST METHOD=1 PRINT=1 NSIG=3 SIGL=10 FNLETA=0 SLOW NONINFETA=1 NOPRIOR=1
     LEVCENTER=0 LEVOBJTYPE=0
$EST METHOD=1 PRINT=1 NSIG=3 MAXEVAL=0 SIGL=10 FNLETA=0 SLOW NONINFETA=1 NOPRIOR=1
     LEVCENTER=0 LEVOBJTYPE=1
;$COV MATRIX=R UNCONDITIONAL

NM-TRAN MESSAGES
 WARNINGS AND ERRORS (IF ANY) FOR PROBLEM    1
 (WARNING  126) ONLY THE LAST FNLETA LISTED IN THE SERIES OF $EST RECORDS FOR
 THIS PROBLEM WILL BE USED
 (WARNING  2) NM-TRAN INFERS THAT THE DATA ARE POPULATION.
 (WARNING  121) INTERACTION IS IMPLIED WITH EM/BAYES ESTIMATION METHODS
 (MU_WARNING 12) MU_004: SHOULD NOT BE ASSOCIATED WITH ETA(001)
 (MU_WARNING 22) MU_004: HAS ALREADY BEEN MU_ ASSOCIATED, CANNOT BE USED AGAIN.
 (MU_WARNING 12) MU_005: SHOULD NOT BE ASSOCIATED WITH ETA(002)
 (MU_WARNING 22) MU_005: HAS ALREADY BEEN MU_ ASSOCIATED, CANNOT BE USED AGAIN.
 (MU_WARNING 12) MU_006: SHOULD NOT BE ASSOCIATED WITH ETA(003)
 (MU_WARNING 22) MU_006: HAS ALREADY BEEN MU_ ASSOCIATED, CANNOT BE USED AGAIN.
Note: Analytical 2nd Derivatives are constructed in FSUBS but are never used.
      You may insert $ABBR DERIV2=NO after the first $PROB to save FSUBS construction and compilation time

1NONLINEAR MIXED EFFECTS MODEL PROGRAM (NONMEM) VERSION 7.5.1
 ORIGINALLY DEVELOPED BY STUART BEAL, LEWIS SHEINER, AND ALISON BOECKMANN
 CURRENT DEVELOPERS ARE ROBERT BAUER, ICON DEVELOPMENT SOLUTIONS,
 AND ALISON BOECKMANN. IMPLEMENTATION, EFFICIENCY, AND STANDARDIZATION
 PERFORMED BY NOUS INFOSYSTEMS.
 PROBLEM NO.:         1
 RUN#
 TOT. NO. OF OBS RECS:     8000
 TOT. NO. OF INDIVIDUALS:      800
 ONE COMPARTMENT MODEL WITH FIRST-ORDER ABSORPTION (ADVAN2)
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 #TBLN:      1
 #METH: Iterative Two Stage (No Prior)
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
 #TERM:
 OPTIMIZATION WAS COMPLETED

 ETABAR IS THE ARITHMETIC MEAN OF THE ETA-ESTIMATES,
 AND THE P-VALUE IS GIVEN FOR THE NULL HYPOTHESIS THAT THE TRUE MEAN IS 0.

 ETABAR:         1.0497E-04 -3.3514E-05 -3.6480E-05  1.8460E-07 -5.6683E-07 -5.5145E-07
 SE:             2.2443E-03  3.3919E-03  3.3554E-03  4.2783E-02  3.9225E-02  5.5270E-02
 N:                     800         800         800          16          16          16

 P VAL.:         9.6270E-01  9.9212E-01  9.9133E-01  1.0000E+00  9.9999E-01  9.9999E-01

 ETASHRINKSD(%)  3.6009E+01  2.0808E+00  2.7414E+00  7.8535E-06  5.1742E-06  5.3079E-06
 ETASHRINKVR(%)  5.9051E+01  4.1182E+00  5.4076E+00  1.5707E-05  1.0348E-05  1.0616E-05
 EBVSHRINKSD(%)  3.6008E+01  2.0807E+00  2.7414E+00  0.0000E+00  0.0000E+00  0.0000E+00
 EBVSHRINKVR(%)  5.9051E+01  4.1182E+00  5.4076E+00  0.0000E+00  0.0000E+00  0.0000E+00
 RELATIVEINF(%)  4.0919E+01  9.5854E+01  9.4821E+01  0.0000E+00  0.0000E+00  0.0000E+00
 EPSSHRINKSD(%)  1.2278E+01
 EPSSHRINKVR(%)  2.3049E+01


 TOTAL DATA POINTS NORMALLY DISTRIBUTED (N):         8000
 N*LOG(2PI) CONSTANT TO OBJECTIVE FUNCTION:    14703.0165312748
 OBJECTIVE FUNCTION VALUE WITHOUT CONSTANT:   -17188.4516828379
 OBJECTIVE FUNCTION VALUE WITH CONSTANT:      -2485.43515156312
 REPORTED OBJECTIVE FUNCTION DOES NOT CONTAIN CONSTANT

 TOTAL EFFECTIVE ETAS (NIND*NETA):                          2445


 #TERE:
 Elapsed estimation  time in seconds:    54.60

 ********************                          ITERATIVE TWO STAGE (NO PRIOR)                        ********************
 #OBJT:**************                        FINAL VALUE OF OBJECTIVE FUNCTION                       ********************
 #OBJV:********************************************   -17188.452       **************************************************

 ********************                          ITERATIVE TWO STAGE (NO PRIOR)                        ********************
 ********************                             FINAL PARAMETER ESTIMATE                           ********************

 THETA - VECTOR OF FIXED EFFECTS PARAMETERS   *********
         TH 1      TH 2      TH 3
         1.79E-01 -5.31E+00 -3.08E+00

 OMEGA - COV MATRIX FOR RANDOM EFFECTS - ETAS  ********
         ETA1      ETA2      ETA3      ETA4      ETA5      ETA6
 ETA1
+        9.84E-03
 ETA2
+        1.32E-04  9.60E-03
 ETA3
+        5.10E-04  6.35E-04  9.52E-03
 ETA4
+        0.00E+00  0.00E+00  0.00E+00  3.12E-02
 ETA5
+        0.00E+00  0.00E+00  0.00E+00 -5.62E-03  2.63E-02
 ETA6
+        0.00E+00  0.00E+00  0.00E+00  2.73E-02 -6.29E-03  5.21E-02

 SIGMA - COV MATRIX FOR RANDOM EFFECTS - EPSILONS  ****
         EPS1
 EPS1
+        3.00E-03

 OMEGA - CORR MATRIX FOR RANDOM EFFECTS - ETAS  *******
         ETA1      ETA2      ETA3      ETA4      ETA5      ETA6
 ETA1
+        9.92E-02
 ETA2
+        1.36E-02  9.80E-02
 ETA3
+        5.27E-02  6.64E-02  9.76E-02
 ETA4
+        0.00E+00  0.00E+00  0.00E+00  1.77E-01
 ETA5
+        0.00E+00  0.00E+00  0.00E+00 -1.96E-01  1.62E-01
 ETA6
+        0.00E+00  0.00E+00  0.00E+00  6.76E-01 -1.70E-01  2.28E-01

 SIGMA - CORR MATRIX FOR RANDOM EFFECTS - EPSILONS  ***
         EPS1
 EPS1
+        5.48E-02
 #TBLN:      2
 #METH: Iterative Two Stage (No Prior)
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
 #TERM:
 OPTIMIZATION WAS NOT TESTED FOR CONVERGENCE

 ETABAR IS THE ARITHMETIC MEAN OF THE ETA-ESTIMATES,
 AND THE P-VALUE IS GIVEN FOR THE NULL HYPOTHESIS THAT THE TRUE MEAN IS 0.

 ETABAR:         1.0497E-04 -3.3514E-05 -3.6480E-05  1.8459E-07 -5.6683E-07 -5.5146E-07
 SE:             2.2443E-03  3.3919E-03  3.3554E-03  4.2783E-02  3.9225E-02  5.5270E-02
 N:                     800         800         800          16          16          16

 P VAL.:         9.6270E-01  9.9212E-01  9.9133E-01  1.0000E+00  9.9999E-01  9.9999E-01

 ETASHRINKSD(%)  3.6009E+01  2.0808E+00  2.7414E+00  7.8427E-06  5.1797E-06  5.3041E-06
 ETASHRINKVR(%)  5.9051E+01  4.1182E+00  5.4076E+00  1.5685E-05  1.0359E-05  1.0608E-05
 EBVSHRINKSD(%)  3.6008E+01  2.0807E+00  2.7414E+00  0.0000E+00  0.0000E+00  0.0000E+00
 EBVSHRINKVR(%)  5.9051E+01  4.1182E+00  5.4076E+00  0.0000E+00  0.0000E+00  0.0000E+00
 RELATIVEINF(%)  4.0919E+01  9.5854E+01  9.4821E+01  0.0000E+00  0.0000E+00  0.0000E+00
 EPSSHRINKSD(%)  1.2278E+01
 EPSSHRINKVR(%)  2.3049E+01


 TOTAL DATA POINTS NORMALLY DISTRIBUTED (N):         8000
 N*LOG(2PI) CONSTANT TO OBJECTIVE FUNCTION:    14703.0165312748
 OBJECTIVE FUNCTION VALUE WITHOUT CONSTANT:   -18651.3962514816
 OBJECTIVE FUNCTION VALUE WITH CONSTANT:      -3948.37972020686
 REPORTED OBJECTIVE FUNCTION DOES NOT CONTAIN CONSTANT

 TOTAL EFFECTIVE ETAS (NIND*NETA):                          2445


 #TERE:
 Elapsed estimation  time in seconds:     0.58

 ********************                          ITERATIVE TWO STAGE (NO PRIOR)                        ********************
 #OBJT:**************                        FINAL VALUE OF OBJECTIVE FUNCTION                       ********************
 #OBJV:********************************************   -18651.396       **************************************************

 ********************                          ITERATIVE TWO STAGE (NO PRIOR)                        ********************
 ********************                             FINAL PARAMETER ESTIMATE                           ********************

 THETA - VECTOR OF FIXED EFFECTS PARAMETERS   *********
         TH 1      TH 2      TH 3
         1.79E-01 -5.31E+00 -3.08E+00

 OMEGA - COV MATRIX FOR RANDOM EFFECTS - ETAS  ********
         ETA1      ETA2      ETA3      ETA4      ETA5      ETA6
 ETA1
+        9.84E-03
 ETA2
+        1.32E-04  9.60E-03
 ETA3
+        5.10E-04  6.35E-04  9.52E-03
 ETA4
+        0.00E+00  0.00E+00  0.00E+00  3.12E-02
 ETA5
+        0.00E+00  0.00E+00  0.00E+00 -5.62E-03  2.63E-02
 ETA6
+        0.00E+00  0.00E+00  0.00E+00  2.73E-02 -6.29E-03  5.21E-02

 SIGMA - COV MATRIX FOR RANDOM EFFECTS - EPSILONS  ****
         EPS1
 EPS1
+        3.00E-03

 OMEGA - CORR MATRIX FOR RANDOM EFFECTS - ETAS  *******
         ETA1      ETA2      ETA3      ETA4      ETA5      ETA6
 ETA1
+        9.92E-02
 ETA2
+        1.36E-02  9.80E-02
 ETA3
+        5.27E-02  6.64E-02  9.76E-02
 ETA4
+        0.00E+00  0.00E+00  0.00E+00  1.77E-01
 ETA5
+        0.00E+00  0.00E+00  0.00E+00 -1.96E-01  1.62E-01
 ETA6
+        0.00E+00  0.00E+00  0.00E+00  6.76E-01 -1.70E-01  2.28E-01

 SIGMA - CORR MATRIX FOR RANDOM EFFECTS - EPSILONS  ***
         EPS1
 EPS1
+        5.48E-02
 #TBLN:      3
 #METH: First Order Conditional Estimation with Interaction (No Prior)
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
 #TERM:
0MINIMIZATION TERMINATED
 DUE TO MAX. NO. OF FUNCTION EVALUATIONS EXCEEDED
 NO. OF FUNCTION EVALUATIONS USED:      447
 NO. OF SIG. DIGITS UNREPORTABLE

 ETABAR IS THE ARITHMETIC MEAN OF THE ETA-ESTIMATES,
 AND THE P-VALUE IS GIVEN FOR THE NULL HYPOTHESIS THAT THE TRUE MEAN IS 0.

 ETABAR:         4.3577E-05 -4.8121E-05 -5.0468E-05 -1.8300E-03 -1.0314E-04 -1.7970E-04
 SE:             2.2444E-03  3.3920E-03  3.3554E-03  4.2888E-02  3.9227E-02  5.5279E-02
 N:                     800         800         800          16          16          16

 P VAL.:         9.8451E-01  9.8868E-01  9.8800E-01  9.6597E-01  9.9790E-01  9.9741E-01

 ETASHRINKSD(%)  3.6073E+01  2.0985E+00  2.7462E+00  1.6504E+00  1.0000E-10  1.0000E-10
 ETASHRINKVR(%)  5.9133E+01  4.1530E+00  5.4171E+00  3.2735E+00  1.0000E-10  1.0000E-10
 EBVSHRINKSD(%)  3.5998E+01  2.0802E+00  2.7417E+00  5.5757E-02  1.5670E-02  1.0315E-02
 EBVSHRINKVR(%)  5.9037E+01  4.1171E+00  5.4082E+00  1.1148E-01  3.1337E-02  2.0628E-02
 RELATIVEINF(%)  4.0936E+01  9.5862E+01  9.4817E+01  9.9799E+01  9.9965E+01  9.9970E+01
 EPSSHRINKSD(%)  1.2282E+01
 EPSSHRINKVR(%)  2.3056E+01


 TOTAL DATA POINTS NORMALLY DISTRIBUTED (N):         8000
 N*LOG(2PI) CONSTANT TO OBJECTIVE FUNCTION:    14703.0165312748
 OBJECTIVE FUNCTION VALUE WITHOUT CONSTANT:   -17194.8093067183
 OBJECTIVE FUNCTION VALUE WITH CONSTANT:      -2491.79277544351
 REPORTED OBJECTIVE FUNCTION DOES NOT CONTAIN CONSTANT

 TOTAL EFFECTIVE ETAS (NIND*NETA):                          2448


 #TERE:
 Elapsed estimation  time in seconds:   564.04

 ********************          FIRST ORDER CONDITIONAL ESTIMATION WITH INTERACTION (NO PRIOR)        ********************
 #OBJT:**************                       MINIMUM VALUE OF OBJECTIVE FUNCTION                      ********************
 #OBJV:********************************************   -17194.809       **************************************************

 ********************          FIRST ORDER CONDITIONAL ESTIMATION WITH INTERACTION (NO PRIOR)        ********************
 ********************                             FINAL PARAMETER ESTIMATE                           ********************

 THETA - VECTOR OF FIXED EFFECTS PARAMETERS   *********
         TH 1      TH 2      TH 3
         1.81E-01 -5.31E+00 -3.08E+00

 OMEGA - COV MATRIX FOR RANDOM EFFECTS - ETAS  ********
         ETA1      ETA2      ETA3      ETA4      ETA5      ETA6
 ETA1
+        9.86E-03
 ETA2
+        1.41E-04  9.60E-03
 ETA3
+        5.07E-04  6.35E-04  9.52E-03
 ETA4
+        0.00E+00  0.00E+00  0.00E+00  3.25E-02
 ETA5
+        0.00E+00  0.00E+00  0.00E+00 -4.33E-03  2.52E-02
 ETA6
+        0.00E+00  0.00E+00  0.00E+00  2.76E-02 -5.12E-03  4.99E-02

 SIGMA - COV MATRIX FOR RANDOM EFFECTS - EPSILONS  ****
         EPS1
 EPS1
+        3.00E-03

 OMEGA - CORR MATRIX FOR RANDOM EFFECTS - ETAS  *******
         ETA1      ETA2      ETA3      ETA4      ETA5      ETA6
 ETA1
+        9.93E-02
 ETA2
+        1.44E-02  9.80E-02
 ETA3
+        5.23E-02  6.64E-02  9.76E-02
 ETA4
+        0.00E+00  0.00E+00  0.00E+00  1.80E-01
 ETA5
+        0.00E+00  0.00E+00  0.00E+00 -1.51E-01  1.59E-01
 ETA6
+        0.00E+00  0.00E+00  0.00E+00  6.85E-01 -1.44E-01  2.23E-01

 SIGMA - CORR MATRIX FOR RANDOM EFFECTS - EPSILONS  ***
         EPS1
 EPS1
+        5.48E-02
 #TBLN:      4
 #METH: First Order Conditional Estimation with Interaction (No Prior) (Evaluation)
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 Elapsed evaluation time in seconds:     1.37
 Elapsed postprocess time in seconds:     0.00

 ********************   FIRST ORDER CONDITIONAL ESTIMATION WITH INTERACTION (NO PRIOR) (EVALUATION)  ********************
 #OBJT:**************                       MINIMUM VALUE OF OBJECTIVE FUNCTION                      ********************
 #OBJV:********************************************   -18662.308       **************************************************

 ********************   FIRST ORDER CONDITIONAL ESTIMATION WITH INTERACTION (NO PRIOR) (EVALUATION)  ********************
 ********************                             FINAL PARAMETER ESTIMATE                           ********************

 THETA - VECTOR OF FIXED EFFECTS PARAMETERS   *********
         TH 1      TH 2      TH 3
         1.81E-01 -5.31E+00 -3.08E+00

 OMEGA - COV MATRIX FOR RANDOM EFFECTS - ETAS  ********
         ETA1      ETA2      ETA3      ETA4      ETA5      ETA6
 ETA1
+        9.86E-03
 ETA2
+        1.41E-04  9.60E-03
 ETA3
+        5.07E-04  6.35E-04  9.52E-03
 ETA4
+        0.00E+00  0.00E+00  0.00E+00  3.25E-02
 ETA5
+        0.00E+00  0.00E+00  0.00E+00 -4.33E-03  2.52E-02
 ETA6
+        0.00E+00  0.00E+00  0.00E+00  2.76E-02 -5.12E-03  4.99E-02

 SIGMA - COV MATRIX FOR RANDOM EFFECTS - EPSILONS  ****
         EPS1
 EPS1
+        3.00E-03

 OMEGA - CORR MATRIX FOR RANDOM EFFECTS - ETAS  *******
         ETA1      ETA2      ETA3      ETA4      ETA5      ETA6
 ETA1
+        9.93E-02
 ETA2
+        1.44E-02  9.80E-02
 ETA3
+        5.23E-02  6.64E-02  9.76E-02
 ETA4
+        0.00E+00  0.00E+00  0.00E+00  1.80E-01
 ETA5
+        0.00E+00  0.00E+00  0.00E+00 -1.51E-01  1.59E-01
 ETA6
+        0.00E+00  0.00E+00  0.00E+00  6.85E-01 -1.44E-01  2.23E-01

 SIGMA - CORR MATRIX FOR RANDOM EFFECTS - EPSILONS  ***
         EPS1
 EPS1
+        5.48E-02
 Elapsed finaloutput time in seconds:     0.01
 #CPUT: Total CPU Time in Seconds,      624.875
